Simulations: Version=221
  Memo ToDoList
    Things we need to improve for next run:

    1. Reset soil at StartGrowth for each crop

    2. Tailor soil parameters to each crops (now it's single SCRUM s-map set up)

    3. Output DOY when key events occur (Sowing | Flowering | Harvest)

    4. Done: Output explaining variables: Cycle length | Light Interception | RUE | FlowerNumber | ProductSize

    5. N dynamics in soil/plant and N fertiliser application in response - not present - test
  DataStore
  Folder Replacements
    Plant DEROPAPY: PlantType=DEROPAPY
      Memo TitlePage
        # DEROPAPY

        This model has been built using the Plant Modelling Framework (PMF) of [#brown_plant_2014] to provide a simple representation of perennial tree and vine crops.  Its scope is intended for use in water and nitrogen balance studies where the focus is on soil processes and a very simple crop is adequate.  The model has simple functions for estimating the growht and nitrogen uptake of different organs and anohter simple function for predicting canopy size so water uptake can be predicted.

        The model has currently been parameterised and tested for 4 genotpes; Apple, Kiwifruit, Grape and Peach.

        DEROPAPY has a simple phenology model that breaks the annual growth cycle into 4 phases:

           1. The <b>Dormancy</b> phase when the tree is a bare trunk, using no water, growing no biomass and taking up no Nitrogen
           2. The <b>CanopyExpansion</b> phase which occurs in the spring when the bulk of biomass assimilation is partitioned to the new leaves with smaller proportions going to trunk and root growth
           3. The <b>FruitGrowth</b> phase where the bulk of biomass assimilation is partitioned to the growing fruit with smaller proportions going to leaf, trunk and root growth
           4. The <b>LeafFall</b> phase where any further biomass assimilated is partitioned to the trunk and roots.

        As infered above the DEROPAPY consists of 4 organs:

           1. <b>Leaf</b> which ls represented with the Simpleleaf class and provides estimates of:
            - Leaf area index that the MicroClimate model uses to estimate the radiation of the tree canopy and the grass in the underlying alley
            - Water uptake demand that the soil arbitrator uses to estimate soil water extraction
            - Photosynthesis estimates (Using radiation use efficiency) to drive tree biomass production
            - Biomass demand that is used to grow leaf biomass and determine N demand for leaf growth
           2. <b>Fruit</b> which represents the biomass and nitrogen that may be removed from the orchard each year as harvested product
           3. <b>Trunk</b> which represents the perennial biomass of the trees and will grow a small amount each year but is mostly pruned out at the end of the year and may be returned to the soil surface.
           4. <b>Root</b> which extracts water and nitrogen from the soil for plant growth, grows a small amount of biomass each year and senesesses a proportion of this to the soil.

        #Inclusion in APSIM simulations
        A DEROPAPY crop is included in a simulation the same as any other APSIM crop

         * The DEROPAPY object needs to be dragged or copied from the Crop folder in the tool box into the field of your simulation.
         * It is then planted with a sowing rule
        ~~~
        DEROPAPY.Sow(cultivar: StaticCrop, population: 1, depth: 10, rowSpacing: 150);
        ~~~

          * Note that the SimpleTreeModel has no notion of population or rowSpacing but these parameters are required by the Sow method so filler values are provided
          * `depth` in the Sow arguement is the depth that the crop is sown at.  In most cases the Sow argument is used to initialise an established tree crop so sow depth arguement is used to set the root depth of the trees.  This depth should be set to the rooting depth that is expected as roots will not grow during the simulation.

        #Representing and Orchard System
         * While the DEROPAPY model will run as a stand alone model, in most cases fruit trees and vines are grown in rows with a grass or herb ley growing in the alleys.  As such it is important to set up a simulation with two rectangular zones, one with the fruit tree established within and another with the pasture or herb ley established.  In most cases a SPRUM is adequate to represent the energy, water and nitrogen balance of the alleys.
         * As part of the development of this crop model the Microclimate radiation arbitration was improved to be suitable for fruit crop set ups.  This involved modifying the strip crop radiation interception code to allow:
           1. The entire depth of the tallest (tree) canopy to be taller than the grass growing in the alleys
           2. The width of the canopy of the trees to exceed the width of the zone that the trees are planted in so they may intercept more radiation that would be possible if they were kept within the spatial confines of the row zone
        ![Schematic of radiation interception scheme as modeled for tree row crops](RadInt.jpg)

        #Further development requirements
        The greatest effort has been spent on getting the models water balance predictions working to an adequate standard.  This included running an optimisation procedure against the validation data set to obtain the most suitalbe parameters for water extraction parameters (kl pattern through the soil) and water demand parameters (max canopy conductance and conductance response to light) as well as weather the roots of the alley should be allowed to grow sideways into the row.
        The model has been set up to predict biomass accumulation and N uptake but the parameters for this functionality have not be determined from observed or published data so further work is required here.  The rates of senescence of the FruitTree root system and the contribution of the mown grass in the alley to the N and C balance have not yet been established correctly.
        Kl patterns are currently parameterised in a manager script (so they could be optimised) this needs to be moved into model set up.
        Optimisation was not able to give good fits for both row and alley zones for grape suggesting the kl patterns differ between alley and row.  Further investigation is required to better determine spatial water extraction parameters.
      BiomassArbitrator Arbitrator
        Memo
          The partitioning of biomass to fodder beet organs follows a "Relative Allocation" routine (see Arbitrator module documentation) guided by coefficients derived from the October sowing date data of the test dataset
        PlantNutrientsDelta Carbon
        PlantNutrientsDelta Nitrogen
      RootUptakesArbitrator
      Phenology
        Memo Description
          As ThermalTime accumulates the crop progresses through the following phases:
        WeightedTemperatureFunction ThermalTimeEco: MaximumTemperatureWeighting=0.5
          XYPairs: X=[4, 12, 30]; Y=[0, 8, 0]
        WeightedTemperatureFunction ThermalTime: MaximumTemperatureWeighting=0.5
          XYPairs: X=[0, 30, 40]; Y=[0, 30, 0]
        GenericPhase EndoDormancy: Start=StartEndo; End=StartEco; IsEmerged=true
          Memo Description
            Grain filling is nearly complete
          VariableReference Progression: VariableName=[Phenology].ChillDuringDormancy
          LessThanFunction Target
            VariableReference DOY: VariableName=[Clock].Today.DayOfYear
            Constant EndEndoDoy: FixedValue=300
            LinearInterpolationFunction Target
              XYPairs: X=[0, 0]; Y=[0, 0]
                Memo Param value set at establishment
                  SCRUM calculates this parameter value during run-time when the crop is established from parameter values set in the relevent SCRUMcrop and SCRUMmanagement objects
              VariableReference XValue: VariableName=[DEROPAPY].Phenology.ChillDuringDormancy
            VariableReference Progression: VariableName=[Phenology].ChillDuringDormancy
        GenericPhase EcoDormancy: Start=StartEco; End=StartGrowth; IsEmerged=true
          Constant Target: FixedValue=140; Units=<sup>o</sup>Cd
          VariableReference Progression: VariableName=[Phenology].ThermalTimeEco
        GenericPhase Growing: Start=StartGrowth; End=FullCanopy; IsEmerged=true
          Memo Description
            The phase that runs from emergence until the seedlings are established (later that emergence)
          Constant Target: FixedValue=0; Units=<sup>o</sup>Cd
            Memo Param value set at establishment
              SCRUM calculates this parameter value during run-time when the crop is established from parameter values set in the relevent SCRUMcrop and SCRUMmanagement objects
          VariableReference Progression: VariableName=[Phenology].ThermalTime
        GenericPhase FullCover: Start=FullCanopy; End=StartSenescence; IsEmerged=true
          Memo Description
            During the early reproductive stage the crop will be flowering
          VariableReference Progression: VariableName=[Phenology].ThermalTime
          LinearInterpolationFunction Target
            XYPairs: X=[0, 0]; Y=[0, 0]
              Memo Param value set at establishment
                SCRUM calculates this parameter value during run-time when the crop is established from parameter values set in the relevent SCRUMcrop and SCRUMmanagement objects
            VariableReference XValue: VariableName=[DEROPAPY].Phenology.PhotoPeriod
        GenericPhase Senescent: Start=StartSenescence; End=Maturity; IsEmerged=true
          Memo Description
            During this phase the crop is completing grain filling
          VariableReference Progression: VariableName=[Phenology].ThermalTime
          Constant Target: FixedValue=0; Units=<sup>o</sup>Cd
            Memo Param value set at establishment
              SCRUM calculates this parameter value during run-time when the crop is established from parameter values set in the relevent SCRUMcrop and SCRUMmanagement objects
        GenericPhase Mature: Start=Maturity; End=ReStart; IsEmerged=true
          Memo Description
            Grain filling is nearly complete
          Constant Target: FixedValue=0; Units=<sup>o</sup>Cd
            Memo Param value set at establishment
              SCRUM calculates this parameter value during run-time when the crop is established from parameter values set in the relevent SCRUMcrop and SCRUMmanagement objects
          VariableReference Progression: VariableName=[Phenology].ThermalTime
        GotoPhase EndOrHarvest: Start=ReStart; IsEmerged=true; PhaseNameToGoto=HarvestAndPrune; RemovalType=0
          Memo Param value set at establishment
            For a pasture crop the PhaseToGoTo is set to "Graize" so phenology will jump over all later phases to grazing which will remove biomass and wind phenology back to "Growing".  For other crops PhaseToGoTo is set to "Flowering" so phenology and growth carries on uninterupted
        GotoPhase HarvestAndPrune: Start=OnHarvestAndPrune; IsEmerged=true; PhaseNameToGoto=EndCrop; RemovalType=0
        GotoPhase EndCrop: Start=EndCrop; IsEmerged=true; PhaseNameToGoto=EndoDormancy; RemovalType=0
        Age: AnniversaryOnWinterSolstice=false
        AddFunction AgeDecimal
          VariableReference AgeInt: VariableName=[Phenology].Age
          DivideFunction Decimal
            VariableReference DOY: VariableName=[Weather].DaysSinceWinterSolstice
            Constant DaysInAYear: FixedValue=365
        WeightedTemperatureFunction DailyChill: MaximumTemperatureWeighting=0.5
          XYPairs: X=[-5, 0, 8, 12]; Y=[0, 0, 0, 0]
        AccumulateFunctionGeneral ChillDuringDormancy: AccumulateToday=false; NameOfPlantToLink=DEROPAPY; EndStageName=StartEco; StartDate=1-May; ReduceStageName=StartGrowth; FractionRemovedOnStage=1; FractionRemovedOnEvent=0; FractionRemovedOnDate=0; FractionRemovedOnCut=0; FractionRemovedOnHarvest=0; FractionRemovedOnGraze=0; FractionRemovedOnPrune=0
          VariableReference DailyChill: VariableName=[DEROPAPY].Phenology.DailyChill
        PhotoperiodFunction Photoperiod: Twilight=-6; DayLength=0
        ParallelPhaseStart DormancyParallel: StartStage=1.01; IsInPhase=false
          VariableReference Progression: VariableName=[Phenology].ChillDuringDormancy
          VariableReference Target: VariableName=[Phenology].EndoDormancy.Target
        ParallelPhaseStart Vegetative: StartStage=2.01; IsInPhase=false
          VariableReference Progression: VariableName=[Phenology].ThermalTime
          LinearInterpolationFunction Target
            XYPairs: X=[0, 0]; Y=[0, 0]
              Memo Param value set at establishment
                SCRUM calculates this parameter value during run-time when the crop is established from parameter values set in the relevent SCRUMcrop and SCRUMmanagement objects
            VariableReference XValue: VariableName=[DEROPAPY].Phenology.Photoperiod
        ParallelPhaseFollowing Flowering: PriorParallelPhaseName=Vegetative
          Constant Target: FixedValue=0; Units=<sup>o</sup>Cd
            Memo Param value set at establishment
              SCRUM calculates this parameter value during run-time when the crop is established from parameter values set in the relevent SCRUMcrop and SCRUMmanagement objects
          VariableReference Progression: VariableName=[Phenology].ThermalTime
        ParallelPhaseFollowing Reproductive: PriorParallelPhaseName=Flowering
          Constant Target: FixedValue=0; Units=<sup>o</sup>Cd
            Memo Param value set at establishment
              SCRUM calculates this parameter value during run-time when the crop is established from parameter values set in the relevent SCRUMcrop and SCRUMmanagement objects
          VariableReference Progression: VariableName=[Phenology].ThermalTime
        AccumulateFunction CycleLength: StartStageName=StartGrowth; EndStageName=Maturity; ResetStageName=StartGrowth; FractionRemovedOnCut=0; FractionRemovedOnHarvest=0; FractionRemovedOnGraze=0; FractionRemovedOnPrune=0
          Constant: FixedValue=1
        AccumulateFunction GrowingAccTT: StartStageName=StartGrowth; EndStageName=FullCanopy; ResetStageName=StartEndo; FractionRemovedOnCut=0; FractionRemovedOnHarvest=0; FractionRemovedOnGraze=0; FractionRemovedOnPrune=0
          VariableReference TT: VariableName=[Phenology].ThermalTime
        ProtectedDivideFunction AveWinterTemp: NumeratorErrVal=0; DenominatorErrVal=0
          AccumulateFunctionGeneral WinterTemps: AccumulateToday=false; NameOfPlantToLink=DEROPAPY; StartDate=1-May; EndDate=1-Aug; ReduceStageName=OnHarvestAndPrune; FractionRemovedOnStage=1; FractionRemovedOnEvent=0; FractionRemovedOnDate=0; FractionRemovedOnCut=0; FractionRemovedOnHarvest=0; FractionRemovedOnGraze=0; FractionRemovedOnPrune=0
            VariableReference DailyTemp: VariableName=[Weather].MeanT
          Constant NumDays: FixedValue=90
      Organ Leaf: Cconc=0.4; IsAboveGround=true
        Constant InitialWt: FixedValue=1; Units=g/m2
        Respiration
          Constant MaintenanceRespirationFunction: FixedValue=0; Units=0-1
          NutrientFunctions AssimilationCostFunctions
            Constant C: FixedValue=0; Units=0-1
            Constant N: FixedValue=0; Units=0-1
            Constant P: FixedValue=0; Units=0-1
            Constant K: FixedValue=0; Units=0-1
          NutrientFunctions MobilisationCostFunctions: same as Replacements.DEROPAPY.Leaf.Respiration.AssimilationCostFunctions
        PhaseLookup senescenceRate
          PhaseLookupValue LeafFall: Start=StartSenescence; End=Maturity
            Constant: FixedValue=0
        Constant detachmentRate: FixedValue=0; Units=/d
        OrganNutrientDelta Carbon: MaxCDelta=0
          OrganNutrientSupplies Supplies: Fixation=0; Uptake=0
            NutrientPoolsState ReAllocation
            NutrientPoolsState ReTranslocation
          NutrientDemandFunctions DemandFunctions
            PhaseLookupValue Structural: Start=StartGrowth; End=Maturity
              VariableReference Structural: VariableName=[Deropapy].Leaf.TotalCarbonDemand
            Constant Metabolic: FixedValue=0
            PhaseLookupValue Storage: Start=StartGrowth; End=StartSenescence
              VariableReference Everything: VariableName=[Deropapy].Leaf.Photosynthesis
            Constant QStructuralPriority: FixedValue=1
            Constant QMetabolicPriority: FixedValue=0
            Constant QStoragePriority: FixedValue=0
          NutrientSupplyFunctions SupplyFunctions
            MultiplyFunction Fixation
              VariableReference Fixation: VariableName=[Leaf].Photosynthesis
              VariableReference Cconc: VariableName=[Leaf].Cconc
            Constant Uptake: FixedValue=0
            NutrientPoolFunctions ReAllocation
              Constant Structural: FixedValue=0
              Constant Metabolic: FixedValue=0
              Constant Storage: FixedValue=0
            NutrientPoolFunctions ReTranslocation
              Constant Structural: FixedValue=0
              Constant Metabolic: FixedValue=0
              MultiplyFunction Storage
                VariableReference Storage: VariableName=[Leaf].Live.Carbon.Storage
                Constant Fraction: FixedValue=0.03
          NutrientProportionFunctions PoolFractions
            Constant Structural: FixedValue=1
            Constant Metabolic: FixedValue=0
            Constant Storage: FixedValue=0
        OrganNutrientDelta Nitrogen: MaxCDelta=0
          OrganNutrientSupplies Supplies: Fixation=0; Uptake=0
            NutrientPoolsState ReAllocation
            NutrientPoolsState ReTranslocation
          NutrientDemandFunctions DemandFunctions
            DeficitDemandFunction Structural
            DeficitDemandFunction Metabolic
            DeficitDemandFunction Storage
            Constant QStructuralPriority: FixedValue=56.642
            Constant QMetabolicPriority: FixedValue=56.642
            Constant QStoragePriority: FixedValue=20.4379
          NutrientSupplyFunctions SupplyFunctions
            Constant Fixation: FixedValue=0
            Constant Uptake: FixedValue=0
            NutrientPoolFunctions ReAllocation: same as Replacements.DEROPAPY.Leaf.Carbon.SupplyFunctions.ReAllocation
            NutrientPoolFunctions ReTranslocation: same as Replacements.DEROPAPY.Leaf.Carbon.SupplyFunctions.ReAllocation
          NutrientConcentrationFunctions ConcFunctions
            Constant Maximum: FixedValue=0.01
            AddFunction Critical
              VariableReference MinNConc: VariableName=[Leaf].Nitrogen.ConcFunctions.Minimum
              MultiplyFunction
                SubtractFunction NonStructural
                  VariableReference MaxNConc: VariableName=[Leaf].Nitrogen.ConcFunctions.Maximum
                  VariableReference MinNConc: VariableName=[Leaf].Nitrogen.ConcFunctions.Minimum
                Constant Fraction: FixedValue=0.01
            Constant Minimum: FixedValue=0.01
        EnergyBalance Canopy: Albedo=0.25; Gsmax350=0.011; R50=150; KDead=0; LAIDead=0
          MinimumFunction FRGRer
            VariableReference RUE_FT: VariableName=[Leaf].Photosynthesis.FT
            MinimumFunction Others
              VariableReference RUE_FN: VariableName=[Leaf].Photosynthesis.FN
              VariableReference RUE_FVPD: VariableName=[Leaf].Photosynthesis.FVPD
          StomatalConductanceCO2Modifier
            VariableReference PhotosynthesisCO2Modifier: VariableName=[Leaf].Photosynthesis.FCO2
          VariableReference Tallness: VariableName=[Deropapy].Height
          SubtractFunction Deepness
            VariableReference Tallness: VariableName=[Deropapy].Height
            VariableReference CanopyBase: VariableName=[Deropapy].Height.CanopyBaseHeight
          AccumulateFunction ExpandedGreenArea: StartStageName=StartGrowth; EndStageName=FullCanopy; ResetStageName=ReStart; FractionRemovedOnCut=0; FractionRemovedOnHarvest=0; FractionRemovedOnGraze=0; FractionRemovedOnPrune=0
            MultiplyFunction Expansion
              DeltaFunction Delta: StartStageName=StartGrowth
                MultiplyFunction Integral
                  Constant LAIAnnualGrowth: FixedValue=0
                  LinearInterpolationFunction GrowthPattern
                    XYPairs: X=[0, 500, 1000, 1500]; Y=[0, 0.4, 0.3, 0.1]
                    VariableReference XValue: VariableName=[Phenology].GrowingAccTT
              LinearInterpolationFunction WaterStressFactor
                XYPairs: X=[0.5, 1]; Y=[1, 1]
                VariableReference XValue: VariableName=[Leaf].Canopy.Fw
          AddFunction DeadAreaIndex
            MultiplyFunction AgeSenescence
              SubtractFunction LAIToSenesc
                HoldFunction LAIMax: WhenToHold=StartSenescence
                  VariableReference ValueToHold: VariableName=[Leaf].Canopy.ExpandedGreenArea
                VariableReference FrostedLAI: VariableName=[Leaf].Canopy.DeadAreaIndex.FrostedLAI
                VariableReference DroughtedLAI: VariableName=[Leaf].Canopy.DeadAreaIndex.DroughtedLAI
              MinimumFunction SenescedLAIPropn
                Constant One: FixedValue=1
                PhaseLookupValue ProportionDead: Start=StartSenescence; End=ReStart
                  DivideFunction ProportionDead
                    SubtractFunction TTSenesce
                      VariableReference AccumulatedThermalTime: VariableName=[Phenology].AccumulatedEmergedTT
                      HoldFunction ThermalTimeAtStartSenescence: WhenToHold=StartSenescence
                        VariableReference ValueToHold: VariableName=[Phenology].AccumulatedEmergedTT
                    VariableReference SenescencePhaseDuration: VariableName=[Phenology].Senescent.Target
            AccumulateFunction FrostedLAI: StartStageName=StartEndo; EndStageName=Maturity; ResetStageName=ReStart; FractionRemovedOnCut=1; FractionRemovedOnHarvest=1; FractionRemovedOnGraze=1; FractionRemovedOnPrune=1
              MultiplyFunction DailyFrosting
                VariableReference CurrentGAI: VariableName=[Deropapy].Leaf.Canopy.LAI
                VariableReference FrostFraction: VariableName=[Deropapy].Leaf.FrostFraction
            AccumulateFunction DroughtedLAI: StartStageName=StartGrowth; EndStageName=Maturity; ResetStageName=ReStart; FractionRemovedOnCut=1; FractionRemovedOnHarvest=1; FractionRemovedOnGraze=1; FractionRemovedOnPrune=1
              MultiplyFunction DailyDroughtSenescence
                VariableReference CurrentGAI: VariableName=[Deropapy].Leaf.Canopy.LAI
                LinearInterpolationFunction WaterStressFactor
                  XYPairs: X=[0.5, 1]; Y=[1, 1]
                  VariableReference XValue: VariableName=[Leaf].Canopy.Fw
          AddFunction GreenAreaIndex
            MaximumFunction SeasonalGrowth
              VariableReference ExpandedGreenArea: VariableName=[Deropapy].Leaf.Canopy.ExpandedGreenArea
              Constant: FixedValue=0
            MultiplyFunction SeasonalDeath
              VariableReference DeadAreaIndex: VariableName=[Deropapy].Leaf.Canopy.DeadAreaIndex
              Constant invert: FixedValue=-1
            MinimumFunction WinterBase
              Constant PrunThreshold: FixedValue=4.5
              OnEventFunction GAICarryover: SetEvent=ReStart
                Constant PreEventValue: FixedValue=3.5
                VariableReference PostEventValue: VariableName=[Deropapy].Leaf.Canopy.LAI
          MultiplyFunction GreenExtinctionCoefficient
            Constant PotentialExtinctionCoeff: FixedValue=0.95
            LinearInterpolationFunction WaterStress
              XYPairs: X=[0.4, 1]; Y=[0.2, 1]
              VariableReference XValue: VariableName=[DEROPAPY].Leaf.Canopy.Fw
          Constant DeadExtinctionCoefficient: FixedValue=0.1
          Constant Wideness: FixedValue=1500
        RUEModel Photosynthesis
          Constant RUE: FixedValue=0.75
          Constant FVPD: FixedValue=1
          LinearInterpolationFunction FW
            XYPairs: X=[0, 1]; Y=[1, 1]
            VariableReference XValue: VariableName=[Leaf].Canopy.Fw
          WeightedTemperatureFunction FT: MaximumTemperatureWeighting=0.75
            XYPairs: X=[0, 14.1007, 30, 45]; Y=[0, 1, 1, 0]
          RUECO2Function FCO2: PhotosyntheticPathway=C3
          VariableReference RadnInt: VariableName=[Leaf].Canopy.RadiationIntercepted
          LinearInterpolationFunction FN
            XYPairs: X=[0, 1, 1.5]; Y=[1, 1, 1]
            VariableReference XValue: VariableName=[Leaf].FNmetabolic
        MultiplyFunction TotalCarbonDemand
          MultiplyFunction TotalDMDemand
            VariableReference PotentialPhotosynthesis: VariableName=[Leaf].Photosynthesis
            Constant PartitionFraction: FixedValue=0
          VariableReference CarbonConc: VariableName=[Leaf].Cconc
        Constant SpecificArea: FixedValue=0.015; Units=m<sup>2</sup>/g
        BiomassRemoval BiomassRemovalDefaults: HarvestFractionLiveToRemove=0; HarvestFractionDeadToRemove=0; HarvestFractionLiveToResidue=1; HarvestFractionDeadToResidue=1
        LinearInterpolationFunction FrostFraction
          XYPairs: X=[-4, 0]; Y=[1, 0]
          VariableReference XValue: VariableName=[Weather].MinT
      Organ Root: Cconc=0.4; IsAboveGround=false
        Constant InitialWt: FixedValue=0.5; Units=g/m2
        Respiration: same as Replacements.DEROPAPY.Leaf.Respiration
        MultiplyFunction senescenceRate
          ExponentialFunction: A=0; B=1; C=1
            DivideFunction
              SubtractFunction
                SoilTemperatureDepthFunction: Depth=100
                Constant: FixedValue=20
              Constant: FixedValue=10
          Constant Coefficient: FixedValue=0.015
        Constant detachmentRate: FixedValue=0.1; Units=/d
        OrganNutrientDelta Carbon: MaxCDelta=0
          OrganNutrientSupplies Supplies: Fixation=0; Uptake=0
            NutrientPoolsState ReAllocation
            NutrientPoolsState ReTranslocation
          NutrientDemandFunctions DemandFunctions
            PhaseLookupValue Structural: Start=StartGrowth; End=StartSenescence
              VariableReference Structural: VariableName=[Deropapy].Root.TotalCarbonDemand
            Constant Metabolic: FixedValue=0
            Constant Storage: FixedValue=0
            Constant QStructuralPriority: FixedValue=1
            Constant QMetabolicPriority: FixedValue=0
            Constant QStoragePriority: FixedValue=0
          NutrientSupplyFunctions SupplyFunctions: same as Replacements.DEROPAPY.Leaf.Nitrogen.SupplyFunctions
          NutrientProportionFunctions PoolFractions: same as Replacements.DEROPAPY.Leaf.Carbon.PoolFractions
        OrganNutrientDelta Nitrogen: MaxCDelta=0
          OrganNutrientSupplies Supplies: Fixation=0; Uptake=0
            NutrientPoolsState ReAllocation
            NutrientPoolsState ReTranslocation
          NutrientDemandFunctions DemandFunctions
            DeficitDemandFunction Structural
            DeficitDemandFunction Storage
            DeficitDemandFunction Metabolic
            Constant QStructuralPriority: FixedValue=1
            Constant QMetabolicPriority: FixedValue=1
            Constant QStoragePriority: FixedValue=0
          NutrientSupplyFunctions SupplyFunctions: same as Replacements.DEROPAPY.Leaf.Nitrogen.SupplyFunctions
          NutrientConcentrationFunctions ConcFunctions
            Constant Maximum: FixedValue=0.01
            AddFunction Critical
              VariableReference MinNConc: VariableName=[Root].Nitrogen.ConcFunctions.Minimum
              MultiplyFunction
                SubtractFunction NonStructural
                  VariableReference MaxNConc: VariableName=[Root].Nitrogen.ConcFunctions.Maximum
                  VariableReference MinNConc: VariableName=[Root].Nitrogen.ConcFunctions.Minimum
                Constant Fraction: FixedValue=0.01
            Constant Minimum: FixedValue=0.01
        RootNetwork Network
          RootShapeCylinder RootShape
          MultiplyFunction klModifier
            KLModiferVsDepthFunction DepthReduction
              VariableReference LayerDepth: VariableName=[Physical].DepthMidPoints
              VariableReference MaximumRootDepth: VariableName=[Root].Network.MaximumRootDepth
            Constant SurfaceKL: FixedValue=0.06
          Constant SoilWaterEffect: FixedValue=1
          Constant MaximumRootDepth: FixedValue=1400
          MultiplyFunction RootFrontVelocity
            DivideFunction mmPeroCd
              VariableReference MaxRootDepth: VariableName=[Root].Network.MaximumRootDepth
              ExpressionFunction RootTtDuration: Expression=[DEROPAPY].Phenology.Growing.Target
            MinimumFunction YearsToMaxDepthFactor
              Constant One: FixedValue=1; Units=g/plant
              ProtectedDivideFunction ProportionOfTotalRootGrowthAnnually: NumeratorErrVal=1; DenominatorErrVal=1
                Constant One: FixedValue=1; Units=g/plant
                VariableReference YearsToMaxDimension: VariableName=[DEROPAPY].RelativeAnnualDimension.XYPairs.X[2]
            PhaseLookupValue ThermalTimeWhileGrowing: Start=StartGrowth; End=Maturity
              VariableReference ThermalTime: VariableName=[Phenology].ThermalTime
          Constant KNO3: FixedValue=0.02; Units=g/plant
          Constant KNH4: FixedValue=0.01; Units=g/plant
          LinearInterpolationFunction NUptakeSWFactor
            XYPairs: X=[0, 0.5, 1]; Y=[0, 0.2758, 1]
            VariableReference XValue: VariableName=[Root].Network.RWC
          Constant SpecificRootLength: FixedValue=40; Units=m/g
          LinearInterpolationFunction MaxDailyNUptake
            XYPairs: X=[0, 1000]; Y=[10, 100]
            Memo
              Early growth N uptake is assumed to be 0.1 kg N/ha/day, and this increases with root growth reaching a maximumof 5.8 kg N/ha/day. The maximum N uptake per day is assumed from sugar beet data (Armstrong et al., 1986).
            VariableReference XValue: VariableName=[Root].Wt
          Constant RootDepthStressFactor: FixedValue=1
        MultiplyFunction TotalCarbonDemand
          MultiplyFunction TotalDMDemand
            VariableReference PotentialPhotosynthesis: VariableName=[Leaf].Photosynthesis
            Constant PartitionFraction: FixedValue=0
          VariableReference CarbonConc: VariableName=[Root].Cconc
        BiomassRemoval BiomassRemovalDefaults: HarvestFractionLiveToRemove=0; HarvestFractionDeadToRemove=0; HarvestFractionLiveToResidue=1; HarvestFractionDeadToResidue=1
      Organ Trunk: Cconc=0.4; IsAboveGround=true
        Constant InitialWt: FixedValue=1; Units=g/m2
        Constant MatureWt: FixedValue=0.1
        VariableReference senescenceRate: VariableName=[Leaf].senescenceRate
        Respiration: same as Replacements.DEROPAPY.Leaf.Respiration
        Constant detachmentRate: FixedValue=0; Units=/d
        OrganNutrientDelta Carbon: MaxCDelta=0
          OrganNutrientSupplies Supplies: Fixation=0; Uptake=0
            NutrientPoolsState ReAllocation
            NutrientPoolsState ReTranslocation
          NutrientDemandFunctions DemandFunctions
            PhaseLookupValue Structural: Start=StartEndo; End=Maturity
              VariableReference Structural: VariableName=[Deropapy].Trunk.TotalCarbonDemand
            Constant Metabolic: FixedValue=0
            Constant Storage: FixedValue=0
            Constant QStructuralPriority: FixedValue=1
            Constant QMetabolicPriority: FixedValue=0
            Constant QStoragePriority: FixedValue=0
          NutrientSupplyFunctions SupplyFunctions: same as Replacements.DEROPAPY.Leaf.Nitrogen.SupplyFunctions
          NutrientProportionFunctions PoolFractions: same as Replacements.DEROPAPY.Leaf.Carbon.PoolFractions
        OrganNutrientDelta Nitrogen: MaxCDelta=0
          OrganNutrientSupplies Supplies: Fixation=0; Uptake=0
            NutrientPoolsState ReAllocation
            NutrientPoolsState ReTranslocation
          NutrientDemandFunctions DemandFunctions
            DeficitDemandFunction Structural
            DeficitDemandFunction Metabolic
            DeficitDemandFunction Storage
            Constant QStructuralPriority: FixedValue=0
            Constant QMetabolicPriority: FixedValue=0
            Constant QStoragePriority: FixedValue=100
          NutrientSupplyFunctions SupplyFunctions: same as Replacements.DEROPAPY.Leaf.Nitrogen.SupplyFunctions
          NutrientConcentrationFunctions ConcFunctions
            Constant Maximum: FixedValue=0.01
            AddFunction Critical
              VariableReference MinNConc: VariableName=[Trunk].Nitrogen.ConcFunctions.Minimum
              MultiplyFunction
                SubtractFunction NonStructural
                  VariableReference MaxNConc: VariableName=[Trunk].Nitrogen.ConcFunctions.Maximum
                  VariableReference MinNConc: VariableName=[Trunk].Nitrogen.ConcFunctions.Minimum
                Constant Fraction: FixedValue=0.01
            Constant Minimum: FixedValue=0.01
        BiomassRemoval BiomassRemovalDefaults: HarvestFractionLiveToRemove=0; HarvestFractionDeadToRemove=0; HarvestFractionLiveToResidue=0; HarvestFractionDeadToResidue=0
        MultiplyFunction TotalCarbonDemand
          MultiplyFunction TotalDMDemand
            Constant RateControl: FixedValue=0.01; Units=0.01/d
            SubtractFunction TotalDemand
              MultiplyFunction TargetWt
                VariableReference Age pattern: VariableName=[DEROPAPY].RelativeAnnualDimension
                VariableReference MatureWt: VariableName=[DEROPAPY].Trunk.MatureWt
              VariableReference currentWt: VariableName=[Trunk].Wt
          VariableReference CarbonConc: VariableName=[Trunk].Cconc
      Organ Product: Cconc=0.4; IsAboveGround=true
        DivideFunction FreshWeight
          VariableReference LiveWeight: VariableName=[Product].Live.Wt
          Constant DryMatterProportion: FixedValue=0.2; Units=g/g
        Constant InitialWt: FixedValue=1; Units=g/m2
        Respiration: same as Replacements.DEROPAPY.Leaf.Respiration
        VariableReference senescenceRate: VariableName=[Leaf].senescenceRate
        Constant detachmentRate: FixedValue=0; Units=/d
        OrganNutrientDelta Carbon: MaxCDelta=0
          OrganNutrientSupplies Supplies: Fixation=0; Uptake=0
            NutrientPoolsState ReAllocation
            NutrientPoolsState ReTranslocation
          NutrientDemandFunctions DemandFunctions
            VariableReference Structural: VariableName=[DEROPAPY].Product.TotalCarbonDemand
            Constant Metabolic: FixedValue=0
            Constant Storage: FixedValue=0
            Constant QStructuralPriority: FixedValue=1
            Constant QMetabolicPriority: FixedValue=0
            Constant QStoragePriority: FixedValue=0
          NutrientSupplyFunctions SupplyFunctions: same as Replacements.DEROPAPY.Leaf.Nitrogen.SupplyFunctions
          NutrientProportionFunctions PoolFractions: same as Replacements.DEROPAPY.Leaf.Carbon.PoolFractions
        OrganNutrientDelta Nitrogen: MaxCDelta=0
          OrganNutrientSupplies Supplies: Fixation=0; Uptake=0
            NutrientPoolsState ReAllocation
            NutrientPoolsState ReTranslocation
          NutrientDemandFunctions DemandFunctions: same as Replacements.DEROPAPY.Trunk.Nitrogen.DemandFunctions
          NutrientSupplyFunctions SupplyFunctions: same as Replacements.DEROPAPY.Leaf.Nitrogen.SupplyFunctions
          NutrientConcentrationFunctions ConcFunctions
            Constant Maximum: FixedValue=0.01
            AddFunction Critical
              VariableReference MinNConc: VariableName=[Product].Nitrogen.ConcFunctions.Minimum
              MultiplyFunction
                SubtractFunction NonStructural
                  VariableReference MaxNConc: VariableName=[Product].Nitrogen.ConcFunctions.Maximum
                  VariableReference MinNConc: VariableName=[Product].Nitrogen.ConcFunctions.Minimum
                Constant Fraction: FixedValue=0.01
            Constant Minimum: FixedValue=0.01
        BiomassRemoval BiomassRemovalDefaults: HarvestFractionLiveToRemove=1; HarvestFractionDeadToRemove=1; HarvestFractionLiveToResidue=1; HarvestFractionDeadToResidue=1
        MultiplyFunction TotalCarbonDemand
          MinimumFunction TotalDMDemand
            MinimumFunction AllometricDemand
              AllometricDemandFunction AllometricDemand: Power=1
                VariableReference YValue: VariableName=[Product].Live.Wt
                VariableReference XValue: VariableName=[Deropapy].TotalLive.Wt
              VariableReference PotentialFruitGrowth
                VariableName=[Product].TotalCarbonDemand.TotalDMDemand.PotentialFruitGrowth
            MultiplyFunction PotentialFruitGrowth
              MaximumFunction RelativeFruitMass
                DeltaFunction Delta: StartStageName=StartGrowth
                  LinearInterpolationFunction Integral
                    XYPairs: X=[0, 0.1, 0.5, 0.9, 1, 1]; Y=[0, 0.02, 0.5, 0.98, 1, 1]
                    VariableReference XValue: VariableName=[DEROPAPY].Phenology.Reproductive.FractionComplete
                Constant Zero: FixedValue=0
              VariableReference PotentialDW: VariableName=[Product].PotentialFruitDryWt
              VariableReference FruitNumber: VariableName=[Product].FlowerNumber
          VariableReference CarbonConc: VariableName=[Product].Cconc
        MultiplyFunction FlowerNumber
          Constant Maximum: FixedValue=1000; Units=/m2
          ParallelPhaseValue StressDuringDormancy: ParallelPhaseName=DormancyParallel
            Constant StartValue: FixedValue=1; Units=number
            WeightedTemperatureFunction MaxTempStress: MaximumTemperatureWeighting=1
              XYPairs: X=[0, 28, 29, 35, 40]; Y=[1, 1, 0.9, 0.5, 0.1]
          ParallelPhaseValue StressDuringFlowering: ParallelPhaseName=Flowering
            Constant StartValue: FixedValue=1; Units=number
            WeightedTemperatureFunction MinTempStress: MaximumTemperatureWeighting=0
              XYPairs: X=[0, 10, 15]; Y=[0, 1, 1]
            WeightedTemperatureFunction PollinationStress: MaximumTemperatureWeighting=0
              XYPairs: X=[0, 13, 35]; Y=[0.99, 1, 1]
            LinearInterpolationFunction WaterStress
              XYPairs: X=[0, 0.3, 1]; Y=[0.97, 1, 1]
              VariableReference XValue: VariableName=[Leaf].Canopy.Fw
        Constant PotentialFruitDryWt: FixedValue=10; Units=g/fruit
        LinearInterpolationFunction RainfallExcessFactor
          Memo
            Accumulated annual rainfall amounts above which risk of produce damege occurs due to biotic stress
          XYPairs: X=[0, 1200, 1700, 2000]; Y=[1, 1, 0, 0]
          VariableReference XValue: VariableName=[Weather].Rain
        DivideFunction DryWeightPerFruit
          VariableReference TotalDryWt: VariableName=[Product].Live.Wt
          VariableReference FruitNumber: VariableName=[Product].FlowerNumber
        MultiplyFunction TonPerHec
          VariableReference FruitNumberPerM2: VariableName=[Product].FlowerNumber
          VariableReference FreshWeightPerFruit: VariableName=[Product].FreshWeightPerFruit
          Constant UnitConversion: FixedValue=0.01
        MultiplyFunction FreshWeightPerFruit
          DivideFunction PotentialFreshWeightPerFruit
            VariableReference TotalFreshWt: VariableName=[Product].FreshWeight
            VariableReference FruitNumber: VariableName=[Product].FlowerNumber
          LinearInterpolationFunction WarmWinterStress
            XYPairs: X=[0, 7, 10, 12]; Y=[1, 1, 0.7, 0.5]
            VariableReference XValue: VariableName=[Phenology].AveWinterTemp
      CompositeStates AboveGround
        Propertys=[[Leaf].Live, [Leaf].Dead, [Product].Live, [Product].Dead, [Trunk].Live, [Trunk].Dead]
      CompositeStates AboveGroundDead: Propertys=[[Leaf].Dead, [Product].Dead, [Trunk].Dead]
      CompositeStates BelowGround: Propertys=[[Root].Live, [Root].Dead]
      CompositeStates Total
        Propertys=[[Leaf].Live, [Leaf].Dead, [Product].Live, [Product].Dead, [Trunk].Live, [Trunk].Dead, [Root].Live, [Root].Dead]
      CompositeStates TotalLive: Propertys=[[Leaf].Live, [Product].Live, [Trunk].Live, [Root].Live]
      CompositeStates TotalDead: Propertys=[[Leaf].Dead, [Product].Dead, [Trunk].Dead, [Root].Dead]
      Constant SeedMortalityRate: FixedValue=0
      Constant MaxPrunedHeight: FixedValue=0
      AddFunction Height
        MultiplyFunction CanopyBaseHeight
          Constant Maximum: FixedValue=0
          VariableReference Age pattern: VariableName=[DEROPAPY].RelativeAnnualDimension
        MultiplyFunction PrunedCanopyDepth
          SubtractFunction Maximum
            Constant MaxPrunedHeight: FixedValue=0
            VariableReference MaxBaseHeight: VariableName=[DEROPAPY].Height.CanopyBaseHeight.Maximum
          VariableReference Age pattern: VariableName=[DEROPAPY].RelativeAnnualDimension
        MultiplyFunction SeasonalGrowth
          SubtractFunction Maximum
            Constant MaxHeight: FixedValue=0
            VariableReference MaxPurnedHeight: VariableName=[DEROPAPY].Height.PrunedCanopyDepth.Maximum.MaxPrunedHeight
          VariableReference Seasonal pattern: VariableName=[DEROPAPY].RelativeSeasonalDimension
          VariableReference Age pattern: VariableName=[DEROPAPY].RelativeAnnualDimension
      AddFunction Width
        MultiplyFunction PrunedWidth
          VariableReference Age pattern: VariableName=[DEROPAPY].RelativeAnnualDimension
          Constant Maximum: FixedValue=500; Units=mm
        MultiplyFunction SeasonalGrowth
          VariableReference Seasonal pattern: VariableName=[DEROPAPY].RelativeSeasonalDimension
          VariableReference Age pattern: VariableName=[DEROPAPY].RelativeAnnualDimension
          SubtractFunction Maximum
            Constant MaxWidth: FixedValue=0
            VariableReference MaxPurnedWidth: VariableName=[DEROPAPY].Width.PrunedWidth.Maximum
      LinearInterpolationFunction RelativeAnnualDimension
        XYPairs: X=[0, 6]; Y=[0.3, 1]
        VariableReference XValue: VariableName=[Phenology].Age.YearDecimal
        LinearInterpolationFunction RelativeAnnualDimension
          XYPairs: X=[0, 6]; Y=[0.3, 1]
          VariableReference XValue: VariableName=[Phenology].Age.YearDecimal
      LinearInterpolationFunction RelativeSeasonalDimension
        XYPairs: X=[3, 4, 6, 7]; Y=[0, 1, 1, 1]
        VariableReference XValue: VariableName=[Phenology].Stage
      Constant MortalityRate: FixedValue=0
    Report Stages
      VariableNames:
        [Clock].Today
        [Clock].Today.Year
        [Clock].Today.DayOfYear
        [ReportOnEvents].Script.StageName
        [Weather].DaysSinceWinterSolstice
    Report Output
      VariableNames:
        [Clock].Today as ReportDate
        [Clock].Today.Year as Year
        [Clock].Today.DayOfYear as ReportHarvestDOY
        [FactorLabels].Script.AGENT_NO as AGENT_NO
        [FactorLabels].Script.Lat as Lat
        [FactorLabels].Script.Lon as Lon
        [FactorLabels].Script.GCM as GCM
        [FactorLabels].Script.RCP as RCP
        [FactorLabels].Script.TS as TimeSlice
        [FactorLabels].Script.SoilStamp as SoilStamp
        [Deropapy].AboveGround.Wt*10 as AboveGround_kgPerHa
        [Deropapy].Product.Wt*10 as Product_kgPerHa
        [Deropapy].Product.FreshWeight*10 as ProductFresh_kgPerHa
        [Deropapy].Total.Wt*10 as TotalPlantWeight_kgPerHa
        Sum of ([ISoilWater].Es) from [Output].DayAfterLastOutput to [Clock].Today as Es_Cum
        Sum of ([ISoilWater].LeachNH4) from [Output].DayAfterLastOutput to [Clock].Today as LeachNH4_Cum
        Sum of ([ISoilWater].LeachNO3) from [Output].DayAfterLastOutput to [Clock].Today as LeachNO3_Cum
        Sum of ([Weather].Rain) from [Output].DayAfterLastOutput to [Clock].Today as Rainfall_Cum
        Sum of ([Weather].Radn) from [Output].DayAfterLastOutput to [Clock].Today as Radiation_Cum
        Sum of ([Weather].MeanT) from [Output].DayAfterLastOutput to [Clock].Today as Temperature_Cum
        Sum of ([Irrigation].IrrigationApplied) from [Output].DayAfterLastOutput to [Clock].Today as Irrigation_Cum
        Sum of ([Fertiliser].NitrogenApplied) from [Output].DayAfterLastOutput to [Clock].Today as FertiliserN_Cum
        Sum of ([Deropapy].Leaf.Canopy.Transpiration) from [Output].DayAfterLastOutput to [Clock].Today as Transpiration_Cum
        [Deropapy].Leaf.Canopy.DeadAreaIndex.FrostedLAI as FrostStress_Sum
        Sum of (1-[DEROPAPY].Product.FlowerNumber.StressDuringFlowering.MinTempStress) from [Output].DayAfterLastOutput to [Clock].Today as HeatStress_Sum
        Sum of (1-[DEROPAPY].Leaf.Canopy.ExpandedGreenArea.Expansion.WaterStressFactor) from [Output].DayAfterLastOutput to [Clock].Today as WaterStress_Sum
        Sum of (1-[DEROPAPY].Leaf.Photosynthesis.FN) from [Output].DayAfterLastOutput to [Clock].Today as NStress_Sum
        Mean of ([Weather].MeanT) from [Output].DayAfterLastOutput to [Clock].Today as Temperature_Av
        Mean of ([DEROPAPY].Leaf.Photosynthesis.RueAct) from [Output].DayAfterLastOutput to [Clock].Today as RUEa_mean
        Sum of ([DEROPAPY].Leaf.Photosynthesis.RadnInt) from [Output].DayAfterLastOutput to [Clock].Today as IntLight_sum
        Sum of ([WaterStatus].Script.SoilStatusOfMonitoredLayer) from [Output].DayAfterLastOutput to [Clock].Today as SoilWetDays_sum
        [DEROPAPY].Phenology.CycleLength as CycleLength_days
        [DEROPAPY].Product.FlowerNumber as ProductNumber_PerM2
        [DEROPAPY].Product.FreshWeightPerFruit as ProductFreshWeight_GPerUnit
        [FrostFighting].Script.FrostDays as FrostDays
        [FrostFighting].Script.MostSevereFrost as FrostSeverity
      EventNames:
        [OnHarvestAndPrune].Harvesting
        [OnEndCrop].EndCrop
    Report: EventNames=[Clock].DoReport
      VariableNames:
        [AutomaticIrrigation].Script.SeasonAppliedAmount
        [FrostFighting].Script.FrostDays
        [FrostFighting].Script.MostSevereFrost
        [Clock].Today
        [DEROPAPY].Product.FlowerNumber.StressDuringFlowering
        [Deropapy].AboveGround.Wt
        [Deropapy].Arbitrator.Carbon.TotalFixationSupply
        [Deropapy].Arbitrator.Carbon.TotalPlantDemand
        [Deropapy].Arbitrator.Nitrogen.TotalPlantDemand
        [Deropapy].Arbitrator.Nitrogen.TotalUptakeSupply
        [Deropapy].CoverGreen
        [Deropapy].Height
        [Deropapy].Leaf.Canopy.CoverDead
        [Deropapy].Leaf.Canopy.CoverGreen
        [Deropapy].Leaf.Canopy.CoverTotal
        [Deropapy].Leaf.Canopy.DeadAreaIndex
        [Deropapy].Leaf.Canopy.DeadAreaIndex.FrostedLAI
        [Deropapy].Leaf.Canopy.DeadAreaIndex.AgeSenescence
        [Deropapy].Leaf.Canopy.GreenAreaIndex
        [Deropapy].Leaf.Canopy.GreenAreaIndex.SeasonalDeath
        [Deropapy].Leaf.Canopy.GreenAreaIndex.SeasonalGrowth
        [Deropapy].Leaf.Canopy.GreenAreaIndex.WinterBase
        [Deropapy].Leaf.Canopy.Fw
        [Deropapy].Leaf.Canopy.LAI
        [Deropapy].Leaf.Canopy.LAIDead
        [Deropapy].Leaf.Canopy.LAITotal
        [Deropapy].Leaf.Canopy.RadiationIntercepted
        [Deropapy].Leaf.Carbon.Demands.Total
        [Deropapy].Leaf.Carbon.Supplies.Total
        [DEROPAPY].Leaf.FrostFraction
        [Deropapy].Leaf.Live.Carbon.Storage
        [Deropapy].Leaf.Live.Carbon.Structural
        [Deropapy].Leaf.N
        [Deropapy].Leaf.Nitrogen.Demands.Total
        [Deropapy].Leaf.Photosynthesis
        [Deropapy].Leaf.Photosynthesis.FCO2
        [Deropapy].Leaf.Photosynthesis.FN
        [Deropapy].Leaf.Photosynthesis.FT
        [Deropapy].Leaf.Photosynthesis.FVPD
        [Deropapy].Leaf.Photosynthesis.FW
        [Deropapy].Leaf.TotalCarbonDemand
        [Deropapy].Leaf.Wt
        [Deropapy].Phenology.AccumulatedEmergedTT
        [Deropapy].Phenology.CurrentPhaseName
        [Deropapy].Phenology.CurrentStageName
        [DeroPapy].Phenology.Emerged
        [DeroPapy].Phenology.DormancyParallel.IsInPhase
        [DeroPapy].Phenology.Flowering.IsInPhase
        [DEROPAPY].Phenology.Photoperiod
        [DEROPAPY].Phenology.Reproductive.FractionComplete
        [DeroPapy].Phenology.Reproductive.IsInPhase
        [DEROPAPY].Phenology.Reproductive.ProgressThroughPhase
        [DEROPAPY].Phenology.EndoDormancy.ProgressThroughPhase
        [DEROPAPY].Phenology.DormancyParallel.ProgressThroughPhase
        [Deropapy].Phenology.Stage
        [Deropapy].Phenology.ThermalTime
        [DeroPapy].Phenology.Vegetative.IsInPhase
        [DEROPAPY].Phenology.AveWinterTemp
        [Deropapy].Product.Carbon.Demands.Total
        [Deropapy].Product.FlowerNumber
        [DEROPAPY].Product.FreshWeight
        [DEROPAPY].Product.Live.Wt
        [Deropapy].Product.N
        [Deropapy].Product.Nitrogen.Demands.Total
        [Deropapy].Product.TotalCarbonDemand.TotalDMDemand
        [Deropapy].Product.TotalCarbonDemand.TotalDMDemand.AllometricDemand
        [Deropapy].Product.TotalCarbonDemand.TotalDMDemand.PotentialFruitGrowth
        [DEROPAPY].Product.TotalCarbonDemand.TotalDMDemand.PotentialFruitGrowth
        [DEROPAPY].Product.TotalCarbonDemand.TotalDMDemand.PotentialFruitGrowth.RelativeFruitMass
        [Deropapy].Product.Wt
        [Deropapy].Product.FreshWeightPerFruit
        [DEROPAPY].Product.TonPerHec
        [Deropapy].Product.DryWeightPerFruit
        [Deropapy].Product.Carbon.Demands.Total
        [Deropapy].Product.Carbon.DemandsAllocated.Total
        [DEROPAPY].Product.FlowerNumber.StressDuringFlowering.MinTempStress
        [DEROPAPY].Product.FlowerNumber.StressDuringFlowering.WaterStress
        [Deropapy].RelativeAnnualDimension
        [Deropapy].RelativeSeasonalDimension
        [Deropapy].Root.Carbon.Demands.Total
        [Deropapy].Root.N
        [Deropapy].Root.Network.Depth
        [Deropapy].Root.Network.klByLayer
        [Deropapy].RootUptakesArbitrator.NitrogenUptake.Gpm2
        [Deropapy].RootUptakesArbitrator.WaterUptake.MM
        [Deropapy].Root.Nitrogen.Demands.Total
        [Deropapy].Root.Senesced.Weight.Total
        [Deropapy].Root.TotalCarbonDemand
        [Deropapy].Root.TotalCarbonDemand.TotalDMDemand
        [Deropapy].Root.Wt
        [Deropapy].Total.N
        [Deropapy].Total.Wt
        [Deropapy].Trunk.Carbon.Demands.Total
        [Deropapy].Trunk.N
        [Deropapy].Trunk.Nitrogen.Demands.Total
        [Deropapy].Trunk.TotalCarbonDemand
        [Deropapy].Trunk.Wt
        [Deropapy].Width
        [Irrigation].IrrigationApplied
        [Weather].MeanT
        [Weather].MaxT
        [Weather].MinT
        [Weather].Rain
        sum([NO3].kgha + [NH4].kgha + [Urea].kgha)
        sum([Water].PAW)
        sum([Water].PAWmm)
        [Deropapy].Leaf.Canopy.PotentialEP
        [Deropapy].Leaf.Canopy.Transpiration
        [DEROPAPY].RelativeAnnualDimension
        [DEROPAPY].Leaf.Canopy.ExpandedGreenArea.Expansion.Delta.Integral.GrowthPattern
        [DEROPAPY].Leaf.TotalCarbonDemand.TotalDMDemand
        [DEROPAPY].Product.TotalCarbonDemand.TotalDMDemand
        [DEROPAPY].Trunk.TotalCarbonDemand.TotalDMDemand
        [Soil].Water.Volumetric
    Report ReportSensitivity
      VariableNames:
        [Clock].Today as ReportDate
        [Clock].Today.Year as Year
        [FactorLabels].Script.AGENT_NO as AGENT_NO
        [FactorLabels].Script.Lat as Lat
        [FactorLabels].Script.Lon as Lon
        [FactorLabels].Script.GCM as GCM
        [FactorLabels].Script.RCP as RCP
        [FactorLabels].Script.TS as TimeSlice
        [FactorLabels].Script.SoilStamp as SoilStamp
        [Deropapy].AboveGround.Wt*10 as AboveGround_kgPerHa
        [Deropapy].Product.Wt*10 as Product_kgPerHa
        [Deropapy].Total.Wt*10 as TotalPlantWeight_kgPerHa
        Sum of ([ISoilWater].Es) from [ReportSensitivity].DayAfterLastOutput to [Clock].Today as Es_Cum
        Sum of ([ISoilWater].LeachNH4) from [ReportSensitivity].DayAfterLastOutput to [Clock].Today as LeachNH4_Cum
        Sum of ([ISoilWater].LeachNO3) from [ReportSensitivity].DayAfterLastOutput to [Clock].Today as LeachNO3_Cum
        Sum of ([Weather].Rain) from [ReportSensitivity].DayAfterLastOutput to [Clock].Today as Rainfall_Cum
        Sum of ([Weather].Radn) from [ReportSensitivity].DayAfterLastOutput to [Clock].Today as Radiation_Cum
        Sum of ([Weather].MeanT) from [ReportSensitivity].DayAfterLastOutput to [Clock].Today as Temperature_Cum
        Sum of ([Irrigation].IrrigationApplied) from [ReportSensitivity].DayAfterLastOutput to [Clock].Today as Irrigation_Cum
        Sum of ([Fertiliser].NitrogenApplied) from [ReportSensitivity].DayAfterLastOutput to [Clock].Today as FertiliserN_Cum
        [Weather].CO2
        [Weather].MeanT
        Sum of ([Deropapy].Leaf.Canopy.Transpiration) from [ReportSensitivity].DayAfterLastOutput to [Clock].Today as Transpiration_Cum
        Min of [Deropapy].Product.FlowerNumber.StressDuringFlowering from [ReportSensitivity].DayAfterLastOutput to [Clock].Today as RelativeFlowerNumber
        [FrostFighting].Script.FrostDays
        [FrostFighting].Script.MostSevereFrost
      EventNames:
        [OnHarvestAndPrune].Harvesting
        [OnEndCrop].EndCrop
    Report ReportSensitivityDay: EventNames=[Clock].DoReport
      VariableNames:
        [Clock].Today as ReportDate
        [Clock].Today.Year as Year
        [Weather].CO2
        [Weather].MeanT
        [Weather].MaxT
        [Weather].MinT
        [DEROPAPY].Product.FlowerNumber.StressDuringFlowering.WaterStress
        [DEROPAPY].Product.FlowerNumber.StressDuringFlowering.MinTempStress
        [DEROPAPY].Product.FlowerNumber
        [DEROPAPY].Leaf.Canopy.DeadAreaIndex.FrostedLAI
        [DEROPAPY].Leaf.Canopy.DeadAreaIndex.AgeSenescence
        [DEROPAPY].Leaf.Canopy.GreenExtinctionCoefficient.WaterStress
        [DEROPAPY].Leaf.Photosynthesis.FW
  Experiment SimpleIrrigationTest (disabled)
    Factors
      Permutation
        Factor Crop: Specification=[ThisDero].CurrentCropName = Grapevine
    Simulation Rotation2
      Weather: FileName=20993_Lincoln_Had_RCPpast.met
      Clock: Start=1987-07-01; End=1997-06-30
      Summary
      SoilArbitrator Soil Arbitrator
      Zone Block: Area=1; Slope=0; AspectAngle=0; Altitude=50
        Folder ManagerFolder
          Manager FactorLabels
            AGENT_NO = 999
            Lat = 999
            Lon = 999
            SoilStamp = SiltLoam
            GCM = ERA
            RCP = ERA
            TS = BaseLine
```csharp
using Models.Soils;
using Models.Core;
using System;

namespace Models
{
    [Serializable]
    public class Script : Model
    {
        //> Links to other Apsim models
        [Link] Clock Clock;
        [Link] ISummary mySummary;

        //> User inputs from properties tab
        [Separator("Tags used to defined simulation factors")]
        [Description("Agent number: ")]
        public string AGENT_NO { get; set; }
        [Description("Latitude: ")]
        public string Lat { get; set; }
        [Description("Longitude: ")]
        public string Lon { get; set; }
        [Description("SoilStamp: ")]
        public string SoilStamp { get; set; }
        [Description("GCM: ")]
        public string GCM { get; set; }
        [Description("RCP: ")]
        public string RCP { get; set; }
        [Description("Time slice: ")]
        public string TS { get; set; }

        //> Internal variables
        private string someVar;
        
        [EventSubscribe("DoManagementCalculations")]
        private void OnDoManagementCalculations(object sender, EventArgs e)
        {
            // Sort out time slice classification
            if ((Clock.Today.Date.Year <= 2005))
            {
                TS = "Baseline";
            }
            else
            {
                TS = "Future";
            }
        }
    }
}
```
          Manager AutomaticFertiliser
            EachYear = True
            Dates = 30-nov, 15-apr
            UseCritNThreshold = False
            CritNThreshold = 50
            CritNDepth = 75
            Depth = 50
            Amount = 25
            FertiliserType = UreaN
```csharp
using APSIM.Core;
using Models.Soils.Nutrients;
using System;
using Models.Core;
using Models.Soils;
using Models.PMF;
using APSIM.Shared.Utilities;
using System.Linq;
using Models.Interfaces;

namespace Models
{
    [Serializable]
    public class Script : Model, IStructureDependency
    {
        [Link] private Clock clock;
        [Link] private Fertiliser fertiliser;
        [Link] private ISummary summary;
        [Link] private Soil soil;
        private Nutrient nutrient;
        [Link]
        private IPhysical soilPhysical;
        public IStructure Structure { private get; set; }
        
        


        [Separator("Fertiliser will be applied on the date(s) below")]
        [Description("Apply fertiliser on the same day(s) each year? If no, then must include the year of appliaction below")]
        public bool EachYear { get; set; }

        [Description("Dates for one or more fertiliser applications (dd-mmm or dd-mmm-yyyy) as a list with a comma between dates")]
        public string[] Dates { get; set; }

        [Separator("Test for the mineral N in the soil and don't apply the fertiliser if greater than X kgN/ha is stored in the soil above a depth of Y mm")]
        [Description("Use a critical soil mineral N to prevent application above a threshold?")]
        public bool UseCritNThreshold { get; set; }

        [Description("Don't add fertiliser if N in the soil to the depth below exceeds (kg/ha)")]
        public double CritNThreshold { get; set; }

        [Description("Depth to which the amount of N in the soil should be calculated (mm)")]
        public double CritNDepth { get; set; }

        [Separator("Fertiliser application details")]
        [Description("Depth at which to apply the fertiliser (mm)")]
        public double Depth { get; set; }

        [Description("Amount of fertiliser to apply (kg N /ha) per application")]
        public double Amount { get; set; }

        [Description("Fertiliser type - select from the list")]
        [Display(Type = DisplayType.FertiliserType)]public string FertiliserType { get; set; }


        [EventSubscribe("StartOfSimulation")]
        private void FindSoilNOrNutrient(object sender, EventArgs e)
        {
            nutrient =  Structure.Find<Nutrient>() as Nutrient;

            if (nutrient == null)
                throw new Exception(string.Format("Error in script {0}: Unable to find nutrient.", Name));
        }

        [EventSubscribe("DoManagement")]
        private void OnDoManagement(object sender, EventArgs e)
        {
            if (OnApplicationDate())
            {
                if (NContentBelowThreshold())
                    fertiliser.Apply(Amount, FertiliserType, Depth);
                else
                    summary.WriteMessage(this, "Skipping fertiliser application due to soil mineral N content being above critical threshold.", MessageType.Diagnostic);
            }
        }

        /// <summary>Checks if today's date is one of the specified fertiliser application dates.</summary>
        private bool OnApplicationDate()
        {
            if (EachYear)
                return Dates.Any(d => DateUtilities.DatesEqual(d, clock.Today));
            
            DateTime[] dates = Dates.Select(d => DateTime.ParseExact(d, "d-MMM-yyyy", null)).ToArray();
            return dates.Any(d => SameDate(d, clock.Today));
        }

        /// <summary>Checks if N content in soil is below critical threshold.</summary>
        private bool NContentBelowThreshold()
        {
            if (!UseCritNThreshold)
                return true;
            
            double[] weights = GetLayerWeights();
            double cumSoilN = 0;

            for (int i = 0; i < soilPhysical.Thickness.Length; i++)
            {
                cumSoilN += weights[i] * nutrient.MineralN[i];
            }

            return cumSoilN <= CritNThreshold;
        }

        private double[] GetLayerWeights()
        {
            double[] weights = new double[soilPhysical.Thickness.Length];
            double cumDepth = 0;

            for (int i = 0; i < soilPhysical.Thickness.Length; i++)
            {
                cumDepth += soilPhysical.Thickness[i];
                if (cumDepth < CritNDepth)
                    weights[i] = 1;
                else if (cumDepth - soilPhysical.Thickness[i] <= CritNDepth)
                    weights[i] = (CritNDepth - (cumDepth - soilPhysical.Thickness[i])) / soilPhysical.Thickness[i];
                else
                    weights[i] = 0;
            }

            return weights;
        }

        private bool SameDate(DateTime d1, DateTime d2)
        {
            return d1.Year == d2.Year && d1.DayOfYear == d2.DayOfYear;
        }
    }
}
```
          Manager WaterStatus
            DepthToMonitorFollowRoots = False
            MinimumDepth = 0
            DepthToMonitor = 600
```csharp
using APSIM.Core;
using Models.Interfaces;
using Models.PMF.Organs;
using APSIM.Shared.Utilities;
using System.Xml.Serialization;
using Models.Soils;
using Models.PMF;
using Models.Core;
using System;
using System.Linq;
using Models.Soils.Nutrients;
using Models.PMF.Phen;
using Newtonsoft.Json;

        
namespace Models
{
    [Serializable] 
    [System.Xml.Serialization.XmlInclude(typeof(Model))]
    public class Script : Model, IStructureDependency
    {      
        [Link] private Zone myZone;
        [Link] private Clock Clock;
        [Link] private ISummary summary;
        [Link] private IPhysical soilPhysical;
        [Link] private ISoilWater waterBalance;
        private int indexBottomOfMonitoredLayer;
        private double fractionBottomOfMonitoredLayer;
        private double lowerLimitOfMonitoredLayer;
        private double upperLimitOfMonitoredLayer;
        private double depthOfMonitoredLayer;
        
        public IStructure Structure { private get; set; }


        //User inputs from properties tab
        [Description("Depth to monitor soil moisture is based on root depth?")]
        public bool DepthToMonitorFollowRoots { get; set; }
        [Description("Minimum depth to monitor soil moisture (mm):")]
        [Display(VisibleCallback = "usingRootDepth")]
        public double MinimumDepth { get; set; }
        [Description("Depth to monitor soil moisture (mm):")]
        [Display(VisibleCallback = "usingGivenDepth")]
        public double DepthToMonitor { get; set; }

        //Class members
        [JsonIgnore][Units("mm")] public double SoilWaterContentOfMonitoredLayer { get; set; }
        [JsonIgnore][Units("mm")] public double SoilAvailableWaterOfMonitoredLayer { get; set; }
        [JsonIgnore][Units("mm")] public double RelativeSoilMoistureOfMonitoredLayer { get; set; }
        [JsonIgnore][Units("mm")] public double SoilWaterDeficitOfMonitoredLayer { get; set; }
        //[JsonIgnore][Units("dry/moist/wet")] public string SoilStatusOfMonitoredLayer { get; set; }
        [JsonIgnore][Units("0 or 1")] public double SoilStatusOfMonitoredLayer { get; set; }


        
        private bool usingRootDepth  { get { return DepthToMonitorFollowRoots; } }
        private bool usingGivenDepth { get { return !DepthToMonitorFollowRoots; } }



        

        [EventSubscribe("StartOfSimulation")]
        private void OnStartOfSimulation(object sender, EventArgs e)
        {
            // check the depth to monitor
            depthOfMonitoredLayer = DepthToMonitor;
            if (DepthToMonitorFollowRoots)
            {
                depthOfMonitoredLayer = MinimumDepth;
            }

            // get some soil water variables
            getMonitoredLayerParams(depthOfMonitoredLayer);
       }

       //[EventSubscribe("StartOfDay")]
        [EventSubscribe("EndOfDay")]
        private void OnStartOfDay(object sender, EventArgs e)
        {
            // check whether depth to monitor varies
            if (DepthToMonitorFollowRoots)
            {
                // check root depth
                double currentRootDepth = 0.0;
                foreach (Plant species in   Structure.FindChildren<Plant>(recurse: true, relativeTo: (INodeModel)myZone).OfType<IModel>().ToList())
                {
                    if (species.IsAlive)
                    {
                        double thisRootDepth = (double)Structure.Get("[" + species.Name + "].Root.Depth", relativeTo: myZone);
                        currentRootDepth = Math.Max(currentRootDepth, thisRootDepth);
                    }
                }
                currentRootDepth = Math.Min(MinimumDepth, currentRootDepth);
                
                if (Math.Abs(currentRootDepth - depthOfMonitoredLayer) > 0.001)
                { // update some soil water variables
                    depthOfMonitoredLayer = currentRootDepth;
                    getMonitoredLayerParams(depthOfMonitoredLayer);
                }
            }

            // get current soil moisture
            SoilWaterContentOfMonitoredLayer = 0.0;
            for (int layer = 0; layer < indexBottomOfMonitoredLayer; layer++)
            {
                SoilWaterContentOfMonitoredLayer += waterBalance.SWmm[layer];
            }

            SoilWaterContentOfMonitoredLayer += waterBalance.SWmm[indexBottomOfMonitoredLayer] * fractionBottomOfMonitoredLayer;

            // compute soil water deficit and available water
            SoilWaterDeficitOfMonitoredLayer = SoilWaterContentOfMonitoredLayer - upperLimitOfMonitoredLayer;
            SoilAvailableWaterOfMonitoredLayer = SoilWaterContentOfMonitoredLayer - lowerLimitOfMonitoredLayer;
            RelativeSoilMoistureOfMonitoredLayer = SoilAvailableWaterOfMonitoredLayer/(upperLimitOfMonitoredLayer - lowerLimitOfMonitoredLayer);

            // check the water status
            if (RelativeSoilMoistureOfMonitoredLayer >= 1.0)
            {
                //SoilStatusOfMonitoredLayer = "wet";
                SoilStatusOfMonitoredLayer = 1.0;
            }
            else if (RelativeSoilMoistureOfMonitoredLayer >= 0.5)
            {
                //SoilStatusOfMonitoredLayer = "moist";
                SoilStatusOfMonitoredLayer = 0.0;
            }
            else
            {
                //SoilStatusOfMonitoredLayer = "dry";
                SoilStatusOfMonitoredLayer = 0.0;
            }
        }
              
        
        ///<summary>Computes a selection of soil params over the given depth.</summary>
        private void getMonitoredLayerParams(double depthToCompute)
        {
            // Calculate some soil water variables
            double depthFromSurface = 0.0;
            lowerLimitOfMonitoredLayer = 0.0;
            upperLimitOfMonitoredLayer = 0.0;
            for (int layer = 0; layer < soilPhysical.Thickness.Length; layer++)
            {
                fractionBottomOfMonitoredLayer = Math.Min(1.0, (depthToCompute - depthFromSurface) / soilPhysical.Thickness[layer]);
                lowerLimitOfMonitoredLayer += soilPhysical.LL15mm[layer] * fractionBottomOfMonitoredLayer;
                upperLimitOfMonitoredLayer += soilPhysical.DULmm[layer] * fractionBottomOfMonitoredLayer;
                depthFromSurface += soilPhysical.Thickness[layer];
                if (depthFromSurface >= depthToCompute)
                {
                    indexBottomOfMonitoredLayer = layer;
                    layer = soilPhysical.Thickness.Length;
                }
            }
        }
       
    }
}
```
        Report: EventNames=[Clock].DoReport
        Plant DEROPAPY
        Fertiliser
        SurfaceOrganicMatter: InitialResidueName=wheat_stubble; InitialResidueType=wheat; InitialResidueMass=500; InitialStandingFraction=0; InitialCPR=0; InitialCNR=100
        Irrigation
        DEROPAPY ThisDero: CoefficientFile=CropParameters.csv; CurrentCropName=Maize
        MicroClimate: a_interception=0; b_interception=1; c_interception=0; d_interception=0; SoilHeatFluxFraction=0.4; MinimumHeightDiffForNewLayer=0; NightInterceptionFraction=0.5; ReferenceHeight=2
        BiomassRemovalEvents OnDefoliate: NameOfPlantToRemoveFrom=DEROPAPY; RemovalType=1
        BiomassRemovalEvents OnHarvestAndPrune: NameOfPlantToRemoveFrom=DEROPAPY; RemovalType=2
        BiomassRemovalEvents OnEndCrop: NameOfPlantToRemoveFrom=DEROPAPY; RemovalType=4
        Manager ReportOnEvents
```csharp
using Models.Core;
using System;
using Models.PMF.Phen;

namespace Models
{
    [Serializable]
    public class Script : Model
    {
        //> Links to other Apsim models
        [Link(ByName = true)] Report stages; 
        
        public string StageName {get; set;}
        
        private void setAndOutput(PhaseChangedType change)
        {
           StageName = change.StageName;
    	   stages.DoOutput();
        }
        
        [EventSubscribe("PhaseChanged")]
        private void OnPhaseChanged(object sender, PhaseChangedType change)
        {
        	if (change.StageName == "Waiting") {setAndOutput(change);}
        	if (change.StageName == "StartGrowth") {setAndOutput(change);}
        	if (change.StageName == "FullCanopy") {setAndOutput(change);}
        	if (change.StageName == "StartSenescence") {setAndOutput(change);}
        	if (change.StageName == "Maturity") {setAndOutput(change);}
        	if (change.StageName == "ReStart") {setAndOutput(change);}
        	if (change.StageName == "StartEndo") {setAndOutput(change);}
        }
        
        [EventSubscribe("ParallelPhaseChanged")]
        private void OnParallelPhaseChanged(object sender, PhaseChangedType change)
        {
        	if (change.StageName == "StartFlowering"){setAndOutput(change);}
        	if (change.StageName == "StartReproductive"){setAndOutput(change);}
        	if (change.StageName == "EndReproductive"){setAndOutput(change);}
        }
	}
}
```
        Manager Reset on date
          ResetWater = True
          ResetNutrients = True
          ResetSOM = True
```csharp
using Models.Soils.Nutrients;
using APSIM.Shared.Utilities;
using Models.Surface;
using Models.Utilities;
using Models.Soils.Nutrients;
using Models.Soils;
using Models.PMF;
using Models.Core;
using System;
using System.Linq;
using Models.Interfaces;
using Models.PMF.Phen;
using System.Diagnostics;

namespace Models
{
    [Serializable]
    public class Script : Model
    {
        [Link] private Clock Clock;
        [Link] private Plant Wheat;
        [Link] private ISoilWater SoilWater;
        [Link] private Nutrient nutrient;
        [Link] private SurfaceOrganicMatter SOM;
        [Link] private Summary Summary;

        [Description("Reset Water? (Yes or No)")]
        public bool ResetWater {get;set;}

        [Description("Reset Soil Nutrients ? (Yes or No)")]
        public bool ResetNutrients {get;set;}

        [Description("Reset Surface Organic Matter? (Yes or No)")]
        public bool ResetSOM {get;set;}

        [EventSubscribe("PhaseChanged")]
        private void OnDoManagement(object sender, PhaseChangedType pct)
        {
            if (pct.StageName == "StartGrowth")
            {
                if (ResetWater == true)
                {
                    Summary.WriteMessage(this, "Reset Water", MessageType.Diagnostic);
                    SoilWater.Reset();
                }
                if (ResetNutrients == true)
                {
                    Summary.WriteMessage(this, "Reset Nitrogen", MessageType.Diagnostic);
                    nutrient.Reset();
                }
                if (ResetSOM == true)
                {
                    Summary.WriteMessage(this, "Reset Surface OM", MessageType.Diagnostic);
                    SOM.Reset();
                }
            }
        }
    }
}
```
        Report Stages
        Soil: Latitude=0; Longitude=0
          LayerStructure: Thickness=[200, 200, 200, 200, 200, 200, 300, 300, 400, 800]
          Chemical: Thickness=[100, 200, 300, 300, 300, 300]; PH=[6.6, 6.2, 5.7, 5.5, 5.5, 5.5]; PHUnits=Water
          Water: Thickness=[300, 300, 300, 300, 300, 300, 1200]; InitialValues=[0.3, 0.21, 0.18, 0.17, 0.17, 0.17, 0.17]; FilledFromTop=false
          WaterBalance SoilWater: SummerDate=1-Nov; SummerU=9; SummerCona=4.4; WinterDate=1-Apr; WinterU=9; WinterCona=4.4; DiffusConst=88; DiffusSlope=35.4; Salb=0.3; CN2Bare=68; CNRed=20; CNCov=0.8; DischargeWidth=0; CatchmentArea=0; PSIDul=-100
            Thickness  SWCON  KLAT
            300        0.55   0
            300        0.55   0
            300        0.55   0
            300        0.55   0
            300        0.1    0
            300        0.02   0
            400        0.02   0
            800        0      0
          Organic: FOMCNRatio=30; CarbonUnits=Total
            Thickness  Carbon  SoilCNRatio  FBiom  FInert  FOM
            100        1.82    11.5         0.025  0.3     1243.931
            200        1.47    11.5         0.025  0.4     833.832
            300        1.2     11.5         0.015  0.75    457.617
            300        1.03    11.5         0.01   0.9     251.145
            300        0.47    11.5         0.01   0.96    137.831
            300        0.47    11.5         0.01   0.96    75.644
          OutputLayers: Thickness=[300, 300, 300, 300, 300, 300]
          Solute NO3: Thickness=[100, 200, 300, 300, 300, 300]; InitialValues=[217, 15, 1.66667, 1.66667, 0, 0]; InitialValuesUnits=ppm; WaterTableConcentration=0; D0=0; DepthConstant=0; MaxDepthSoluteAccessible=0; RunoffEffectivenessAtMovingSolute=0; MaxEffectiveRunoff=0
          Solute NH4: Thickness=[100, 200, 300, 300, 300, 300]; InitialValues=[0, 0, 0, 0, 0, 0]; InitialValuesUnits=ppm; WaterTableConcentration=0; D0=0; DepthConstant=0; MaxDepthSoluteAccessible=0; RunoffEffectivenessAtMovingSolute=0; MaxEffectiveRunoff=0
          Solute Urea: Thickness=[100, 200, 300, 300, 300, 300]; InitialValues=[0, 0, 0, 0, 0, 0]; InitialValuesUnits=kg/ha; WaterTableConcentration=0; D0=0; DepthConstant=0; MaxDepthSoluteAccessible=0; RunoffEffectivenessAtMovingSolute=0; MaxEffectiveRunoff=0
          Physical
            Thickness  BD  AirDry  LL15  DUL  SAT  KS
            300        1   0.15    0.15  0.3  0.4  100
            300        1   0.15    0.15  0.3  0.4  100
            300        1   0.15    0.15  0.3  0.4  50
            300        1   0.15    0.15  0.3  0.4  40
            300        1   0.15    0.15  0.3  0.4  40
            300        1   0.15    0.15  0.3  0.4  40
            1200       1   0.15    0.15  0.3  0.4  40
            SoilCrop DEROPAPYSoil: LL=[0.15, 0.15, 0.15, 0.15, 0.15, 0.15, 0.15]; KL=[1, 1, 1, 1, 1, 1, 1]; XF=[1, 1, 1, 1, 1, 1, 1]
          Nutrient
          SoilTemperature Temperature: InteractionsPerDay=8
        Manager FrostFighting
          ProtectionAvaialable = True
```csharp
using Newtonsoft.Json;
using Models.Core;
using System.Xml.Serialization;
using System;
using Models.Climate;
using Models.PMF.Phen;
using Models.PMF.SimplePlantModels;
using Models.PMF;

namespace Models
{
    [Serializable]
    public class Script : Model
    {
        // - Links to APSIM models
        [Link] Zone zone;
        [Link] Clock clock;
        [Link] Weather weather;
        [Link] private Phenology phenology;
        [Link] private EnergyBalance eb;
        [Link] ISummary summary = null;
        [Link] private DEROPAPY dero;
        [Link (Type = LinkType.Scoped, ByName = true)] private IParallelPhase flowering;

        // - Paramters for this manager
        [Description("Enable? untick to completely disable this manager")] 
        public bool ProtectionAvaialable { get; set; }

		public int FrostDays {get; set;}
		public double MostSevereFrost {get; set;}
		private bool fightTheFrost {get; set;}
        
        [EventSubscribe("PreparingNewWeatherData")] 
        private void PreparingNewWeatherData(object sender, EventArgs e)
        {
            // Check if this manager is enabled
            fightTheFrost = false;
            
            if ((ProtectionAvaialable)&&(dero.CurrentCropParams != null))
            {
                if (dero.CurrentCropName == "Grapevine")
                {
		            if ((phenology.Stage >= 3) && (phenology.Stage <= 7) )
		               {
		               	if (weather.MinT < dero.GetValueFromStringVector(dero.CurrentCropParams["Frost_Temp_X"],1))
		               		{
						       	MostSevereFrost = Math.Min(MostSevereFrost,weather.MinT);
						       	weather.MinT = 4;
						      	FrostDays +=1;  
		               		}
		               }
                }
		        if ((dero.CurrentCropName == "Avocado") || (dero.CurrentCropName == "Macadamia") || (dero.CurrentCropName == "Lemon"))
		            {
			           	if (weather.MinT < dero.GetValueFromStringVector(dero.CurrentCropParams["Frost_Temp_X"],1))
			           		{
							   	MostSevereFrost = Math.Min(MostSevereFrost,weather.MinT);
							   	weather.MinT = 4;
							  	FrostDays +=1;  
			           		}
				           
		            }
             }
        }
        
        [EventSubscribe("PhaseChanged")]
        private void PhaseChanged(object sender, PhaseChangedType p)
        {
            if (p.StageName == "StartGrowth" )
                {
                	MostSevereFrost = 5;
                   	FrostDays = 0;   
                }
        }
    }
}
```
        Manager AutomaticIrrigation
          allowIrrigation = True
          seasonStart = 1-Aug
          seasonEnd = 30-May
          seasonsAllocation = 1000
          triggerDeficit = 70
          targetDeficit = 95
          returndays = 3
          maximumAmount = 30
          depthPAWC = 650
```csharp
using Newtonsoft.Json;
using APSIM.Shared.Utilities;
using System.Xml.Serialization;
using Models.Soils;
using Models.PMF;
using Models.Core;
using System;
using System.Linq;
using Models.Interfaces;



        
namespace Models
{
    [Serializable] 
    [System.Xml.Serialization.XmlInclude(typeof(Model))]
    public class Script : Model
    {
        [Link] private ISummary summary;
        [Link] private Irrigation Irrigation;
        [Link] private Clock Clock;
        [Link] private Soil Soil;
        [Link(IsOptional = true)] private IPlant existingCrop;
        private DateTime StartDate;
        private DateTime EndDate;
        private double TopDUL;
        private double TopLL;
        private int nLayers;
        [Link]
        private IPhysical soilPhysical;
        [Link]
        private ISoilWater waterBalance;
        //Communication to other modules
       
        //User inputs from properties tab
        [Description("Turn irrigation on?")]
        public bool allowIrrigation { get; set; }
        [Description("Start of irrigation season (dd-MMM)")]
        public string seasonStart { get; set; }
        [Description("End of irrigation season (dd-MMM)")]
        public string seasonEnd { get; set; }
        [Description("Season allocation (mm)")]
        public double seasonsAllocation { get; set; }
        [Description("Deficit to trigger irrigation (% PAWC)")]
        public double triggerDeficit { get; set; }
        [Description("Deficit to stop irrigaton (% PAWC)")]
        public double targetDeficit { get; set; }
        [Description("Minimum days for irrigation to return")]
        public double returndays { get; set; }
        [Description("Maximum irrigation application (mm/day)")]
        public double maximumAmount { get; set; }
        [Description("Depth to calculate PAWC (mm)")]
        public double depthPAWC { get; set; }

        //Class members
        [JsonIgnore] public double TopSWdeficit { get; set; }
        [JsonIgnore] public double TopSWC { get; set; }
        [JsonIgnore] public double DaysSinceIrrigation { get; set; }
        [JsonIgnore] public double AmountToApply { get; set; }
        [JsonIgnore] public double SeasonAppliedAmount { get; set; }
        
        private bool IrrigationIsAllowed { get; set; }
        private bool SeasonIsOpen { get; set; }
        private bool CropIsActive { get; set; }
        private bool IrrigatorIsAvailable { get; set; }
        private bool SoilIsDry { get; set; }

    
        //Calculate static soil variables
        [EventSubscribe("StartOfSimulation")]
        private void OnStartOfSimulation(object sender, EventArgs e)
        {   
            //Set the season dates
            StartDate = DateTime.Parse(seasonStart + "-" + Clock.Today.Year.ToString());
            EndDate = DateTime.Parse(seasonEnd + "-" + Clock.Today.Year.ToString());
            
            //Can we irrigate at all?
            IrrigationIsAllowed = false; 
            if (allowIrrigation)
                IrrigationIsAllowed = true; 

            //Calculate soil water variables
            double depthFromSurface = 0.0;
            double fracLayer = 0.0;
            nLayers = soilPhysical.Thickness.Length;
            for (int layer = 0; layer < nLayers; layer++)
            {
                fracLayer = Math.Min(1.0, (depthPAWC - depthFromSurface) / soilPhysical.Thickness[layer]);
                TopLL += soilPhysical.LL15mm[layer] * fracLayer;
                TopDUL += soilPhysical.DULmm[layer] * fracLayer;
                depthFromSurface += soilPhysical.Thickness[layer];
                if (depthFromSurface >= depthPAWC)
                    layer = nLayers;
            }
        }
             
        //Determine daily requirement for irrigation
        [EventSubscribe("StartOfDay")]
        private void OnStartOfDay(object sender, EventArgs e)
        {
            //Can we irrigate today?          
            SeasonIsOpen = isBetween(Clock.Today, StartDate, EndDate);
            if (!SeasonIsOpen)
                SeasonAppliedAmount = 0;

            //Is there a crop in the ground that needs irrigation?
            CropIsActive = false;
            if ((existingCrop != null) && (existingCrop.IsAlive))
                CropIsActive = true;
            //if ((existingCrop.Phenology.Stage >= 3.0) && (existingCrop.Phenology.Stage < 6.0))
          
            //Is the irrigator available?
            IrrigatorIsAvailable = false;
            DaysSinceIrrigation += 1;
            if (DaysSinceIrrigation >= returndays)
                IrrigatorIsAvailable = true;
          
            //Is the soil dry enough to require irrigation?
            SoilIsDry = false;
            double depthFromSurface = 0.0;
            double fracLayer = 0.0;
            TopSWC = 0.0;
            for (int layer = 0; layer < nLayers; layer++)
            //for (int layer = 0; depthFromSurface < depthPAWC + soilPhysical.Thickness[layer]; layer++)
            {
                fracLayer = Math.Min(1.0, (depthPAWC - depthFromSurface) / soilPhysical.Thickness[layer]);
                TopSWC += waterBalance.SWmm[layer] * fracLayer;
                depthFromSurface += soilPhysical.Thickness[layer];
                if (depthFromSurface >= depthPAWC)
                    layer = nLayers;
            }
            
            TopSWdeficit = TopSWC - TopDUL;
            if (Math.Max(0.0, -TopSWdeficit) >= (TopDUL - TopLL) * (100 - triggerDeficit) / 100)
                SoilIsDry = true;
                
            //Are all the conditions ratifying irrigation
            if (IrrigationIsAllowed && SeasonIsOpen && CropIsActive && IrrigatorIsAvailable && SoilIsDry)
            {
                //Lets bloody well irrigate then!!!!
                AmountToApply = TopDUL * targetDeficit / 100 - TopSWC;
                AmountToApply = Math.Max(0.0, Math.Min(AmountToApply, seasonsAllocation - SeasonAppliedAmount));
                AmountToApply = Math.Min(AmountToApply,maximumAmount);
                Irrigation.Apply(AmountToApply);
                DaysSinceIrrigation = 0;
                SeasonAppliedAmount += AmountToApply;
            }
        }
        
        ///Checks whether theDate is between iniDate and endDate (non-year specific)
        private bool isBetween(DateTime theDay, DateTime iniDate, DateTime endDate)
        {
            bool result = false;
            if (iniDate.DayOfYear < endDate.DayOfYear)
            {
                // period is within one year, ex: summer in the northern hemisphere
                if ((theDay.DayOfYear >= iniDate.DayOfYear) && (theDay.DayOfYear <= endDate.DayOfYear))
                    result = true;
            }
            else
            {
                // period goes over the end of the year, ex: summer in the southern hemisphere
                if ((theDay.DayOfYear >= iniDate.DayOfYear) || (theDay.DayOfYear <= endDate.DayOfYear))
                    result = true;
            }
            
            return result;
        }
    }
}
```
  Experiment SimpleWeatherTest (disabled)
    Factors
      Permutation
        Factor Crop: Specification=[ThisDero].CurrentCropName =  Grapevine
        Factor Location
          CompositeFactor North: Specifications=[Weather].FileName = 21584_North_Had_RCPpast.met
          CompositeFactor Canterb: Specifications=[Weather].FileName = 20993_Lincoln_Had_RCPpast.met
          CompositeFactor South: Specifications=[Weather].FileName = 10731_South_Had_RCPpast.met
          CompositeFactor SouthFuture
            Specifications:
              [Weather].FileName = 10731_South_Had_RCP85.met
              [Clock].StartDate = 1/7/2080
              [Clock].EndDate = 1/8/2090
          CompositeFactor CentralOtago: Specifications=[Weather].FileName = 14470_CentralOtago_Past.met
          CompositeFactor Marlbrough: Specifications=[Weather].FileName = 27539_Marlbrough_past.met
          CompositeFactor Gisborne: Specifications=[Weather].FileName = 28041_Gisborne_past.met
    Simulation Rotation3
      Weather: FileName=10731_South_Had_RCPpast.met
      Clock: Start=1985-07-01; End=1995-06-30
      Summary
      SoilArbitrator Soil Arbitrator
      Zone Block: Area=1; Slope=0; AspectAngle=0; Altitude=50
        Manager Reset on date: same as SimpleIrrigationTest.Rotation2.Block.Reset on date
        Report: EventNames=[Clock].DoReport
        Report Output
          EventNames:
            [OnHarvestAndPrune].Harvesting
            [OnEndCrop].EndCrop
        Plant DEROPAPY
        SurfaceOrganicMatter: InitialResidueName=wheat_stubble; InitialResidueType=wheat; InitialResidueMass=500; InitialStandingFraction=0; InitialCPR=0; InitialCNR=100
        Fertiliser
        Irrigation
        DEROPAPY ThisDero: CoefficientFile=CropParameters.csv; CurrentCropName=Maize
        MicroClimate: a_interception=0; b_interception=1; c_interception=0; d_interception=0; SoilHeatFluxFraction=0.4; MinimumHeightDiffForNewLayer=0; NightInterceptionFraction=0.5; ReferenceHeight=2
        Soil: Latitude=0; Longitude=0
          LayerStructure: Thickness=[200, 200, 200, 200, 200, 200, 300, 300, 400, 800]
          Chemical: Thickness=[100, 200, 300, 300, 300, 300]; PH=[6.6, 6.2, 5.7, 5.5, 5.5, 5.5]; PHUnits=Water
          Water: Thickness=[300, 300, 300, 300, 300, 300, 1200]; InitialValues=[0.42, 0.41, 0.5, 0.46, 0.45, 0.43, 0.43]; FilledFromTop=false
          WaterBalance SoilWater: same as SimpleIrrigationTest.Rotation2.Block.Soil.SoilWater
          Organic: same as SimpleIrrigationTest.Rotation2.Block.Soil.Organic
          OutputLayers: Thickness=[300, 300, 300, 300, 300, 300]
          Solute NO3: same as SimpleIrrigationTest.Rotation2.Block.Soil.NO3
          Solute NH4: same as SimpleIrrigationTest.Rotation2.Block.Soil.NH4
          Solute Urea: same as SimpleIrrigationTest.Rotation2.Block.Soil.Urea
          Physical
            Thickness  BD  AirDry  LL15  DUL   SAT   KS
            300        1   0.2     0.2   0.4   0.5   100
            300        1   0.2     0.2   0.4   0.5   100
            300        1   0.25    0.25  0.4   0.5   50
            300        1   0.2     0.2   0.46  0.5   40
            300        1   0.2     0.2   0.45  0.5   40
            300        1   0.2     0.2   0.43  0.53  40
            1200       1   0.2     0.2   0.43  0.53  40
            SoilCrop DEROPAPYSoil: LL=[0.2, 0.2, 0.2, 0.2, 0.2, 0.2, 0.2]; KL=[1, 1, 1, 1, 1, 1, 1]; XF=[1, 1, 1, 1, 1, 1, 1]
          Nutrient
          SoilTemperature Temperature: InteractionsPerDay=8
        Report Stages
        Manager ReportOnEvents: same as SimpleIrrigationTest.Rotation2.Block.ReportOnEvents
        BiomassRemovalEvents OnDefoliate: RemovalType=1
        BiomassRemovalEvents OnHarvestAndPrune: RemovalType=2
        BiomassRemovalEvents OnEndCrop: RemovalType=4
        Manager FactorLabels: same as SimpleIrrigationTest.Rotation2.Block.ManagerFolder.FactorLabels
        Manager AutomaticFertiliser: same as SimpleIrrigationTest.Rotation2.Block.ManagerFolder.AutomaticFertiliser
        Manager AutomaticIrrigation
          allowIrrigation = True
          seasonStart = 1-jan
          seasonEnd = 31-dec
          seasonsAllocation = 10000
          triggerDeficit = 50
          targetDeficit = 95
          returndays = 3
          maximumAmount = 30
          depthPAWC = 650
          script: same as in SimpleIrrigationTest.Rotation2.Block.AutomaticIrrigation
        Manager WaterStatus
          DepthToMonitorFollowRoots = False
          MinimumDepth = 0
          DepthToMonitor = 600
```csharp
using APSIM.Core;
using Models.Interfaces;
using Models.PMF.Organs;
using APSIM.Shared.Utilities;
using System.Xml.Serialization;
using Models.Soils;
using Models.PMF;
using Models.Core;
using System;
using System.Linq;
using Models.Soils.Nutrients;
using Models.PMF.Phen;
using Newtonsoft.Json;
        
namespace Models
{
    [Serializable] 
    [System.Xml.Serialization.XmlInclude(typeof(Model))]
    public class Script : Model, IStructureDependency
    {      
        [Link] private Zone myZone;
        [Link] private Clock Clock;
        [Link] private ISummary summary;
        [Link] private IPhysical soilPhysical;
        [Link] private ISoilWater waterBalance;
        private int indexBottomOfMonitoredLayer;
        private double fractionBottomOfMonitoredLayer;
        private double lowerLimitOfMonitoredLayer;
        private double upperLimitOfMonitoredLayer;
        private double depthOfMonitoredLayer;
        
        public IStructure Structure { private get; set; }


        //User inputs from properties tab
        [Description("Depth to monitor soil moisture is based on root depth?")]
        public bool DepthToMonitorFollowRoots { get; set; }
        [Description("Minimum depth to monitor soil moisture (mm):")]
        [Display(VisibleCallback = "usingRootDepth")]
        public double MinimumDepth { get; set; }
        [Description("Depth to monitor soil moisture (mm):")]
        [Display(VisibleCallback = "usingGivenDepth")]
        public double DepthToMonitor { get; set; }

        //Class members
        [JsonIgnore][Units("mm")] public double SoilWaterContentOfMonitoredLayer { get; set; }
        [JsonIgnore][Units("mm")] public double SoilAvailableWaterOfMonitoredLayer { get; set; }
        [JsonIgnore][Units("mm")] public double RelativeSoilMoistureOfMonitoredLayer { get; set; }
        [JsonIgnore][Units("mm")] public double SoilWaterDeficitOfMonitoredLayer { get; set; }
        //[JsonIgnore][Units("dry/moist/wet")] public string SoilStatusOfMonitoredLayer { get; set; }
        [JsonIgnore][Units("0 or 1")] public double SoilStatusOfMonitoredLayer { get; set; }
        [JsonIgnore] public int WetDays_cum { get; set; }

        
        private bool usingRootDepth  { get { return DepthToMonitorFollowRoots; } }
        private bool usingGivenDepth { get { return !DepthToMonitorFollowRoots; } }



        

        [EventSubscribe("StartOfSimulation")]
        private void OnStartOfSimulation(object sender, EventArgs e)
        {
            WetDays_cum = 0;
            
            // check the depth to monitor
            depthOfMonitoredLayer = DepthToMonitor;
            if (DepthToMonitorFollowRoots)
            {
                depthOfMonitoredLayer = MinimumDepth;
            }

            // get some soil water variables
            getMonitoredLayerParams(depthOfMonitoredLayer);
       }

       //[EventSubscribe("StartOfDay")]
        [EventSubscribe("EndOfDay")]
        private void OnStartOfDay(object sender, EventArgs e)
        {
            // check whether depth to monitor varies
            if (DepthToMonitorFollowRoots)
            {
                // check root depth
                double currentRootDepth = 0.0;
                foreach (Plant species in   Structure.FindChildren<Plant>(recurse: true, relativeTo: (INodeModel)myZone).OfType<IModel>().ToList())
                {
                    if (species.IsAlive)
                    {
                        double thisRootDepth = (double)Structure.Get("[" + species.Name + "].Root.Depth", relativeTo: myZone);
                        currentRootDepth = Math.Max(currentRootDepth, thisRootDepth);
                    }
                }
                currentRootDepth = Math.Min(MinimumDepth, currentRootDepth);
                
                if (Math.Abs(currentRootDepth - depthOfMonitoredLayer) > 0.001)
                { // update some soil water variables
                    depthOfMonitoredLayer = currentRootDepth;
                    getMonitoredLayerParams(depthOfMonitoredLayer);
                }
            }

            // get current soil moisture
            SoilWaterContentOfMonitoredLayer = 0.0;
            for (int layer = 0; layer < indexBottomOfMonitoredLayer; layer++)
            {
                SoilWaterContentOfMonitoredLayer += waterBalance.SWmm[layer];
            }

            SoilWaterContentOfMonitoredLayer += waterBalance.SWmm[indexBottomOfMonitoredLayer] * fractionBottomOfMonitoredLayer;

            // compute soil water deficit and available water
            SoilWaterDeficitOfMonitoredLayer = SoilWaterContentOfMonitoredLayer - upperLimitOfMonitoredLayer;
            SoilAvailableWaterOfMonitoredLayer = SoilWaterContentOfMonitoredLayer - lowerLimitOfMonitoredLayer;
            RelativeSoilMoistureOfMonitoredLayer = SoilAvailableWaterOfMonitoredLayer/(upperLimitOfMonitoredLayer - lowerLimitOfMonitoredLayer);

            // check the water status
            if (RelativeSoilMoistureOfMonitoredLayer >= 1.0)
            {
                //SoilStatusOfMonitoredLayer = "wet";
                SoilStatusOfMonitoredLayer = 1.0;
            }
            else if (RelativeSoilMoistureOfMonitoredLayer >= 0.5)
            {
                //SoilStatusOfMonitoredLayer = "moist";
                SoilStatusOfMonitoredLayer = 0.0;
            }
            else
            {
                //SoilStatusOfMonitoredLayer = "dry";
                SoilStatusOfMonitoredLayer = 0.0;
            }
            
            WetDays_cum += (int)SoilStatusOfMonitoredLayer;
        }
              
        [EventSubscribe("PhaseChanged")]
        private void OnPhaseChanged(object sender, PhaseChangedType change)
        {
        summary.WriteMessage(this,"phase " + change.StageName, MessageType.Diagnostic);
        
            if (change.StageName == "StartGrowth")
            {
                WetDays_cum = 0;
            }
        }        
        
        ///<summary>Computes a selection of soil params over the given depth.</summary>
        private void getMonitoredLayerParams(double depthToCompute)
        {
            // Calculate some soil water variables
            double depthFromSurface = 0.0;
            lowerLimitOfMonitoredLayer = 0.0;
            upperLimitOfMonitoredLayer = 0.0;
            for (int layer = 0; layer < soilPhysical.Thickness.Length; layer++)
            {
                fractionBottomOfMonitoredLayer = Math.Min(1.0, (depthToCompute - depthFromSurface) / soilPhysical.Thickness[layer]);
                lowerLimitOfMonitoredLayer += soilPhysical.LL15mm[layer] * fractionBottomOfMonitoredLayer;
                upperLimitOfMonitoredLayer += soilPhysical.DULmm[layer] * fractionBottomOfMonitoredLayer;
                depthFromSurface += soilPhysical.Thickness[layer];
                if (depthFromSurface >= depthToCompute)
                {
                    indexBottomOfMonitoredLayer = layer;
                    layer = soilPhysical.Thickness.Length;
                }
            }
        }
       
    }
}
```
  Experiment SowDateTest (disabled)
    Factors
      Permutation
        Factor Crop: Specification=[ThisDero].CurrentCropName =  Hemp
        Factor StartDate
          CompositeFactor Feb: Specifications=[StartDateSet].Script.StartDOY  = 234
          CompositeFactor Mar: Specifications=[StartDateSet].Script.StartDOY  = 254
          CompositeFactor Apr: Specifications=[StartDateSet].Script.StartDOY  = 284
          CompositeFactor May: Specifications=[StartDateSet].Script.StartDOY  = 315
          CompositeFactor Jun: Specifications=[StartDateSet].Script.StartDOY  = 346
          CompositeFactor Jul: Specifications=[StartDateSet].Script.StartDOY  = 11
          CompositeFactor Aug: Specifications=[StartDateSet].Script.StartDOY  = 41
          CompositeFactor Sep: Specifications=[StartDateSet].Script.StartDOY  = 72
          CompositeFactor Oct: Specifications=[StartDateSet].Script.StartDOY  = 101
          CompositeFactor Nov: Specifications=[StartDateSet].Script.StartDOY  = 132
          CompositeFactor Dec: Specifications=[StartDateSet].Script.StartDOY  = 163
        Factor Location
          CompositeFactor Lincoln_RCPpast: Specifications=[Weather].FileName  = 20993_Lincoln_Had_RCPpast.met
          CompositeFactor North: Specifications=[Weather].FileName  = 21584_North_Had_RCPpast.met
          CompositeFactor South: Specifications=[Weather].FileName  = 10731_South_Had_RCPpast.met
    Simulation WheatBase
      Weather: FileName=20993_Lincoln_Had_RCPpast.met
      Clock: Start=1985-09-01; End=1988-06-30
      Summary
      SoilArbitrator Soil Arbitrator
      Zone Block: Area=1; Slope=0; AspectAngle=0; Altitude=50
        Folder ManagerFolder
          Manager FactorLabels: same as SimpleIrrigationTest.Rotation2.Block.ManagerFolder.FactorLabels
          Manager AutomaticFertiliser: same as SimpleIrrigationTest.Rotation2.Block.ManagerFolder.AutomaticFertiliser
          Manager AutomaticIrrigation: same as SimpleWeatherTest.Rotation3.Block.AutomaticIrrigation
          Manager WaterStatus: same as SimpleIrrigationTest.Rotation2.Block.ManagerFolder.WaterStatus
        Report: EventNames=[Clock].DoReport
        Report Output
          VariableNames:
            [Clock].Today as ReportDate
            [Clock].Today.Year as Year
            [Clock].Today.DayOfYear
            [FactorLabels].Script.AGENT_NO as AGENT_NO
            [FactorLabels].Script.Lat as Lat
            [FactorLabels].Script.Lon as Lon
            [FactorLabels].Script.GCM as GCM
            [FactorLabels].Script.RCP as RCP
            [FactorLabels].Script.TS as TimeSlice
            [FactorLabels].Script.SoilStamp as SoilStamp
            [Deropapy].AboveGround.Wt*10 as AboveGround_kgPerHa
            [Deropapy].Product.Wt*10 as Product_kgPerHa
            [Deropapy].Product.FreshWeight*10 as ProductFresh_kgPerHa
            [Deropapy].Total.Wt*10 as TotalPlantWeight_kgPerHa
            Sum of ([ISoilWater].Es) from [Output].DayAfterLastOutput to [Clock].Today as Es_Cum
            Sum of ([ISoilWater].LeachNH4) from [Output].DayAfterLastOutput to [Clock].Today as LeachNH4_Cum
            Sum of ([ISoilWater].LeachNO3) from [Output].DayAfterLastOutput to [Clock].Today as LeachNO3_Cum
            Sum of ([Weather].Rain) from [Output].DayAfterLastOutput to [Clock].Today as Rainfall_Cum
            Sum of ([Weather].Radn) from [Output].DayAfterLastOutput to [Clock].Today as Radiation_Cum
            Sum of ([Weather].MeanT) from [Output].DayAfterLastOutput to [Clock].Today as Temperature_Cum
            Sum of ([Irrigation].IrrigationApplied) from [Output].DayAfterLastOutput to [Clock].Today as Irrigation_Cum
            Sum of ([Fertiliser].NitrogenApplied) from [Output].DayAfterLastOutput to [Clock].Today as FertiliserN_Cum
            Sum of ([Deropapy].Leaf.Canopy.Transpiration) from [Output].DayAfterLastOutput to [Clock].Today as Transpiration_Cum
          EventNames:
            [OnHarvestAndPrune].Harvesting
            [OnEndCrop].EndCrop
        Soil: same as SimpleWeatherTest.Rotation3.Block.Soil
        SurfaceOrganicMatter: InitialResidueName=wheat_stubble; InitialResidueType=wheat; InitialResidueMass=500; InitialStandingFraction=0; InitialCPR=0; InitialCNR=100
        Plant DEROPAPY
        Fertiliser
        Irrigation
        DEROPAPY ThisDero: CurrentCropName=Wheat
          CoefficientFile=C:\GitHubRepos\ApsimX\Prototypes\DEROPAPY\CropParameters.csv
        MicroClimate: a_interception=0; b_interception=1; c_interception=0; d_interception=0; SoilHeatFluxFraction=0.4; MinimumHeightDiffForNewLayer=0; NightInterceptionFraction=0.5; ReferenceHeight=2
        Manager StartDateSet
          StartDOY = 0
```csharp
using APSIM.Core;
using APSIM.Shared.Utilities;
using Models.PMF;
using Models.Interfaces;
using Models.Core;
using System;

namespace Models
{
    [Serializable]
    public class Script : Model, IStructureDependency
    {
        [Link] private Zone zone;
        public IStructure Structure { private get; set; }
        
        [Description("Start Date")]
        public int StartDOY { get; set; }


        

        [EventSubscribe("PlantSowing")]
        private void onDoDailyInitialisation(object sender, SowingParameters sp)
        {
            object SetValue = StartDOY;
            Structure.Set("[DEROPAPY].Phenology.Waiting.DOYtoProgress", SetValue, relativeTo: zone);
        }
    }
}
```
        BiomassRemovalEvents OnDefoliate: RemovalType=1
        BiomassRemovalEvents OnHarvestAndPrune: RemovalType=2
        BiomassRemovalEvents OnEndCrop: RemovalType=4
  Experiment SimulationExp (disabled)
    Factors
      Permutation
        Factor Crop
          Specification=[ThisDero].CurrentCropName =  Maize, Wheat, OSR, Hemp, GrapeVine, Macadamia, Lemon, Avocado
        Factor Irrigation
          CompositeFactor Rainfed: Specifications=[AutomaticIrrigation].Script.allowIrrigation = FALSE
          CompositeFactor Irrigated: Specifications=[AutomaticIrrigation].Script.allowIrrigation = TRUE
        Factor Location
          CompositeFactor Lincoln_RCPpast
            Specifications:
              [Weather].FileName  = 20993_Lincoln_Had_RCPpast.met
              [Clock].Start = 1/7/1975
              [Clock].End = 1/6/2000
              [FactorLabels].Script.GCM = Had
              [FactorLabels].Script.RCP = RCPpast
              [FactorLabels].Script.TS = Past
          CompositeFactor Lincoln_RCP85
            Specifications:
              [Weather].FileName  = 20993_Lincoln_Had_RCP85.met
              [Clock].Start = 1/7/2050
              [Clock].End = 1/6/2075
              [FactorLabels].Script.GCM = Had
              [FactorLabels].Script.RCP = 85
              [FactorLabels].Script.TS = Future
          CompositeFactor South_RCPpast
            Specifications:
              [Weather].FileName  = 10731_South_Had_RCPpast.met
              [Clock].Start = 1/7/1975
              [Clock].End = 1/6/2000
              [FactorLabels].Script.GCM = Had
              [FactorLabels].Script.RCP = RCPpast
              [FactorLabels].Script.TS = Past
          CompositeFactor South_RCP85
            Specifications:
              [Weather].FileName  = 10731_South_Had_RCP85.met
              [Clock].Start = 1/7/2050
              [Clock].End = 1/6/2075
              [FactorLabels].Script.GCM = Had
              [FactorLabels].Script.RCP = 85
              [FactorLabels].Script.TS = Future
          CompositeFactor North_RCPpast
            Specifications:
              [Weather].FileName  = 21584_North_Had_RCPpast.met
              [Clock].Start = 1/7/1975
              [Clock].End = 1/6/2000
              [FactorLabels].Script.GCM = Had
              [FactorLabels].Script.RCP = RCPpast
              [FactorLabels].Script.TS = Past
          CompositeFactor North_RCP85
            Specifications:
              [Weather].FileName  = 21584_North_Had_RCP85.met
              [Clock].Start = 1/7/2050
              [Clock].End = 1/6/2075
              [FactorLabels].Script.GCM = Had
              [FactorLabels].Script.RCP = 85
              [FactorLabels].Script.TS = Future
    Simulation Rotation
      Weather: FileName=20993_Lincoln_Had_RCPpast.met
      Clock: Start=2000-07-01; End=2005-06-30
      Summary
      SoilArbitrator Soil Arbitrator
      Zone Block: Area=1; Slope=0; AspectAngle=0; Altitude=50
        Manager FactorLabels: same as SimpleIrrigationTest.Rotation2.Block.ManagerFolder.FactorLabels
        Manager Reset on date: same as SimpleIrrigationTest.Rotation2.Block.Reset on date
        Manager AutomaticFertiliser
          EachYear = True
          Dates = 30-nov, 15-apr
          UseCritNThreshold = True
          CritNThreshold = 50
          CritNDepth = 75
          Depth = 50
          Amount = 25
          FertiliserType = UreaN
          script: same as in SimpleIrrigationTest.Rotation2.Block.ManagerFolder.AutomaticFertiliser
        Manager FrostFighting: same as SimpleIrrigationTest.Rotation2.Block.FrostFighting
        Manager AutomaticIrrigation: same as SimpleIrrigationTest.Rotation2.Block.AutomaticIrrigation
        Manager WaterStatus: same as SimpleWeatherTest.Rotation3.Block.WaterStatus
        Soil: Latitude=0; Longitude=0
          LayerStructure: Thickness=[200, 200, 200, 200, 200, 200, 300, 300, 400, 800]
          Chemical: Thickness=[100, 200, 300, 300, 300, 300]; PH=[6.6, 6.2, 5.7, 5.5, 5.5, 5.5]; PHUnits=Water
          Water: Thickness=[300, 300, 300, 300, 300, 300, 1200]; InitialValues=[0.25, 0.18, 0.17, 0.17, 0.17, 0.17, 0.17]; FilledFromTop=true
          WaterBalance SoilWater: same as SimpleIrrigationTest.Rotation2.Block.Soil.SoilWater
          Organic: same as SimpleIrrigationTest.Rotation2.Block.Soil.Organic
          OutputLayers: Thickness=[300, 300, 300, 300, 300, 300]
          Solute NO3: same as SimpleIrrigationTest.Rotation2.Block.Soil.NO3
          Solute NH4: same as SimpleIrrigationTest.Rotation2.Block.Soil.NH4
          Solute Urea: same as SimpleIrrigationTest.Rotation2.Block.Soil.Urea
          Nutrient
          Physical
            Thickness  ParticleSizeSand  ParticleSizeSilt  ParticleSizeClay  Rocks     BD  AirDry  LL15  DUL   SAT  KS
            300        5                 65                30                0.309221  1   0.15    0.15  0.25  0.4  100
            300        5                 65                30                0.309221  1   0.15    0.15  0.18  0.4  100
            300        5                 65                30                0.309221  1   0.15    0.15  0.17  0.4  50
            300        5                 65                30                0.309221  1   0.15    0.15  0.17  0.4  40
            300        5                 65                30                0.309221  1   0.15    0.15  0.17  0.4  40
            300        5                 65                30                0.309221  1   0.15    0.15  0.17  0.4  40
            1200       5                 65                30                0.309221  1   0.15    0.15  0.17  0.4  40
            Rocks, ParticleSizeSand, ParticleSizeSilt, ParticleSizeClay source: Calculated
            SoilCrop DEROPAPYSoil: LL=[0.15, 0.15, 0.15, 0.15, 0.15, 0.15, 0.15]; KL=[1, 1, 1, 1, 1, 1, 1]; XF=[1, 1, 1, 1, 1, 1, 1]
          SoilTemperature Temperature: InteractionsPerDay=8
        SurfaceOrganicMatter: InitialResidueName=wheat_stubble; InitialResidueType=wheat; InitialResidueMass=500; InitialStandingFraction=0; InitialCPR=0; InitialCNR=100
        Plant DEROPAPY
        Fertiliser
        Irrigation
        DEROPAPY ThisDero: CoefficientFile=CropParameters.csv; CurrentCropName=Maize
        MicroClimate: a_interception=0; b_interception=1; c_interception=0; d_interception=0; SoilHeatFluxFraction=0.4; MinimumHeightDiffForNewLayer=0; NightInterceptionFraction=0.5; ReferenceHeight=2
        BiomassRemovalEvents OnHarvestAndPrune: NameOfPlantToRemoveFrom=DEROPAPY; RemovalType=2
        BiomassRemovalEvents OnEndCrop: NameOfPlantToRemoveFrom=DEROPAPY; RemovalType=4
        Report Output: EventNames=[Clock].EndOfYear
  Experiment FrostTest (disabled)
    Factors
      Permutation
        Factor Crop
          CompositeFactor Maize
            Specifications:
              [ThisDero].CurrentCropName = Maize
              [Clock].Start = 1985-07-01
              [Clock].End = 1996-06-30
          CompositeFactor Wheat
            Specifications:
              [ThisDero].CurrentCropName = Wheat
              [Clock].Start = 1985-04-01
              [Clock].End = 1996-03-30
          CompositeFactor Hemp
            Specifications:
              [ThisDero].CurrentCropName = Hemp
              [Clock].Start = 1985-07-01
              [Clock].End = 1996-06-30
          CompositeFactor OSR
            Specifications:
              [ThisDero].CurrentCropName = OSR
              [Clock].Start = 1985-04-01
              [Clock].End = 1996-03-30
          CompositeFactor Grapevine
            Specifications:
              [ThisDero].CurrentCropName = Grapevine
              [Clock].Start = 1985-07-01
              [Clock].End = 1996-06-30
          CompositeFactor Macadamia
            Specifications:
              [ThisDero].CurrentCropName = Macadamia
              [Clock].Start = 1985-07-01
              [Clock].End = 1996-06-30
          CompositeFactor Lemon
            Specifications:
              [ThisDero].CurrentCropName = Lemon
              [Clock].Start = 1985-07-01
              [Clock].End = 1996-06-30
          CompositeFactor Avocado
            Specifications:
              [ThisDero].CurrentCropName = Avocado
              [Clock].Start = 1985-07-01
              [Clock].End = 1996-06-30
        Factor Situation
          CompositeFactor North
            Specifications:
              [Weather].FileName = 21584_North_Had_RCPpast.met
              [FrostFighting].Script.ProtectionAvaialable = false
          CompositeFactor NorthFF
            Specifications:
              [Weather].FileName = 21584_North_Had_RCPpast.met
              [FrostFighting].Script.ProtectionAvaialable = true
          CompositeFactor CentralOtago
            Specifications:
              [Weather].FileName = 14470_CentralOtago_Past.met
              [FrostFighting].Script.ProtectionAvaialable = false
          CompositeFactor CentralOtagoFF
            Specifications:
              [Weather].FileName = 14470_CentralOtago_Past.met
              [FrostFighting].Script.ProtectionAvaialable = true
    Simulation Rotation8
      Weather: FileName=20993_Lincoln_Had_RCPpast.met
      Clock: Start=1985-07-01; End=1995-06-30
      Summary
      SoilArbitrator Soil Arbitrator
      Zone Block: Area=1; Slope=0; AspectAngle=0; Altitude=50
        Manager FactorLabels: same as SimpleIrrigationTest.Rotation2.Block.ManagerFolder.FactorLabels
        Manager AutomaticIrrigation: same as SimpleWeatherTest.Rotation3.Block.AutomaticIrrigation
        Manager AutomaticFertiliser: same as SimpleIrrigationTest.Rotation2.Block.ManagerFolder.AutomaticFertiliser
        Manager FrostFighting
          ProtectionAvaialable = False
```csharp
using Newtonsoft.Json;
using Models.Core;
using System.Xml.Serialization;
using System;
using Models.Climate;
using Models.PMF.Phen;
using Models.PMF.SimplePlantModels;
using Models.PMF;

namespace Models
{
    [Serializable]
    public class Script : Model
    {
        // - Links to APSIM models
        [Link] Zone zone;
        [Link] Clock clock;
        [Link] Weather weather;
        [Link] private Phenology phenology;
        [Link] private EnergyBalance eb;
        [Link] ISummary summary = null;
        [Link] private DEROPAPY dero;
        [Link (Type = LinkType.Scoped, ByName = true)] private IParallelPhase flowering;

        // - Paramters for this manager
        [Description("Enable? untick to completely disable this manager")] public bool ProtectionAvaialable { get; set; }

		public int FrostDays {get; set;}
		public double MostSevereFrost {get; set;}
		private bool fightTheFrost {get; set;}
        
        [EventSubscribe("PreparingNewWeatherData")] 
        private void PreparingNewWeatherData(object sender, EventArgs e)
        {
            // Check if this manager is enabled
            fightTheFrost = false;
            
            if (ProtectionAvaialable)
            {
                if ((phenology.Stage >= 3) && (phenology.Stage <= 7) )
                   {
                   	if (weather.MinT < dero.GetValueFromStringVector(dero.CurrentCropParams["Frost_Temp_X"],1))
                   		{
				           	MostSevereFrost = Math.Min(MostSevereFrost,weather.MinT);
				           	weather.MinT = 0;
				          	FrostDays +=1;  
                   		}
                   }
            
             }
        }
        
        [EventSubscribe("PhaseChanged")]
        private void PhaseChanged(object sender, PhaseChangedType p)
        {
            if (p.StageName == "StartGrowth" )
                {
                	MostSevereFrost = 0;
                   	FrostDays = 0;   
                }
        }
    }
}
```
        Soil: same as SimpleWeatherTest.Rotation3.Block.Soil
        SurfaceOrganicMatter: InitialResidueName=wheat_stubble; InitialResidueType=wheat; InitialResidueMass=500; InitialStandingFraction=0; InitialCPR=0; InitialCNR=100
        Plant DEROPAPY
        Fertiliser
        Irrigation
        DEROPAPY ThisDero: CoefficientFile=CropParameters.csv; CurrentCropName=Maize
        MicroClimate: a_interception=0; b_interception=1; c_interception=0; d_interception=0; SoilHeatFluxFraction=0.4; MinimumHeightDiffForNewLayer=0; NightInterceptionFraction=0.5; ReferenceHeight=2
        BiomassRemovalEvents OnDefoliate: RemovalType=1
        BiomassRemovalEvents OnHarvestAndPrune: RemovalType=2
        BiomassRemovalEvents OnEndCrop: RemovalType=4
        Report: EventNames=[Clock].EndOfYear
        Report ReportSensitivity: EventNames=[Clock].EndOfYear
  Experiment Lincoln2014 (disabled)
    Memo
      This is a water response trial run in the rain out shelter at Plant and Food Research in Lincoln, New Zealand.  It is described in full by [#Chakwizira_wheat_2014] but briefly.  An Autumn crop of 'Wakanui' wheat was sown at 165 plants/m^2^ on the 28th of March 2013 and 6 irrigation timing treatments were applied:

      1. Full irrigation where measured ET was replaced weekly
      .
      2. Nill irrigation.
      3. Very Early Drought where irrigation was withheld from sowing until the beginning of stem extension.
      4. Early Drought where irrigation was withheld between Flag leaf and the beginning of grain fill.
      5. Middle Drought where irrigation was withheld between Flag leaf and 1 week into grain fill.
      6. Late Drought where irrigation was withheld from heading until harvest.

      Irrigation was applied at weekly intervals through and assemply of low rate drip emitters on each plot.  Soil water content was measured weekly with a neutron probe and biomass was measured on 5 occasions throughout the crop.  Samples throughtout the crop were from a 0.43m^2^ quatrant and the final harvest sample was from a 1 m^2^ quadrant.  Each treatment was replicated four times and there was considerable soil variation from plot to plot so each treatment was initianilised with unique soil parameters which best described the soil they were growing on.
    Factors
      Permutation
        Factor Irrig
          CompositeFactor Full
            Specifications:
              [IrrigationEvents]
              [Physical]
              [Water].Thickness=200,200,200,200,200,200,200,200
              [Water].InitialValues=0.32,0.2782,0.276,0.2502,0.2507,0.2398,0.1892,0.1962
            Operations IrrigationEvents
              2013-05-14  [Irrigation].Apply(25);
              2013-05-29  [Irrigation].Apply(9.2);
              2013-06-11  [Irrigation].Apply(12);
              2013-09-16  [Irrigation].Apply(34.6);
              2013-09-25  [Irrigation].Apply(46.3);
              2013-10-01  [Irrigation].Apply(19.3);
              2013-10-08  [Irrigation].Apply(24.9);
              2013-10-15  [Irrigation].Apply(21);
              2013-10-22  [Irrigation].Apply(39);
              2013-10-29  [Irrigation].Apply(44,1);
              2013-11-05  [Irrigation].Apply(40,1);
              2013-11-12  [Irrigation].Apply(35,1);
              2013-11-19  [Irrigation].Apply(33,1);
              2013-11-26  [Irrigation].Apply(32,1);
              2013-12-03  [Irrigation].Apply(35,1);
              2013-12-10  [Irrigation].Apply(49,1);
              2013-12-17  [Irrigation].Apply(47,1);
              2013-12-24  [Irrigation].Apply(0);
              2013-12-31  [Irrigation].Apply(0);
              2013-09-10  [Irrigation].Apply(5);
            Physical
              Thickness  BD     AirDry  LL15  DUL   SAT
              200        1      0.05    0.1   0.32  0.42
              200        1.324  0.12    0.15  0.3   0.41
              200        1.35   0.1     0.1   0.28  0.37
              200        1.301  0.08    0.08  0.31  0.37
              200        1.301  0.06    0.07  0.27  0.33
              200        1.301  0.06    0.08  0.25  0.32
              200        1.301  0.1     0.1   0.21  0.3
              200        1.301  0.1     0.1   0.23  0.31
              200        1.3    0.1     0.1   0.23  0.31
              200        1.3    0.1     0.1   0.23  0.31
              SoilCrop WheatSoil
                LL=[0.1, 0.15, 0.1, 0.08, 0.07, 0.08, 0.1, 0.1, 0.1, 0.1]
                KL=[0.06, 0.03, 0.03, 0.03, 0.03, 0.03, 0.03, 0.02, 0.02, 0.02]
                XF=[1, 1, 1, 1, 1, 1, 1, 1, 1, 1]
              SoilCrop DEROPAPYSoil: LL=[0.1, 0.15, 0.1, 0.08, 0.07, 0.08, 0.1, 0.1, 0.1, 0.1]; KL=[1, 1, 1, 1, 1, 1, 1, 1, 1, 1]; XF=[1, 1, 1, 1, 1, 1, 1, 1, 1, 1]
          CompositeFactor Nil
            Specifications:
              [IrrigationEvents]
              [Physical]
              [Water].Thickness=200,200,200,200,200,200,200,200,200,200
              [Water].InitialValues=0.32,0.2825,0.2638,0.2062,0.2425,0.2425,0.1882,0.1822,0.182,0.182
            Physical
              Thickness  BD     AirDry  LL15  DUL   SAT
              200        1      0.06    0.1   0.32  0.36
              200        1.324  0.11    0.11  0.29  0.36
              200        1.35   0.08    0.08  0.28  0.4
              200        1.301  0.05    0.05  0.25  0.33
              200        1.301  0.07    0.07  0.3   0.33
              200        1.301  0.1     0.1   0.3   0.32
              200        1.301  0.1     0.1   0.23  0.3
              200        1.301  0.08    0.08  0.22  0.31
              200        1.3    0.08    0.08  0.22  0.31
              200        1.3    0.08    0.08  0.22  0.31
              SoilCrop WheatSoil
                LL=[0.1, 0.11, 0.09, 0.05, 0.07, 0.1, 0.1, 0.11, 0.11, 0.11]
                KL=[0.06, 0.03, 0.03, 0.03, 0.03, 0.03, 0.03, 0.02, 0.02, 0.02]
                XF=[1, 1, 1, 1, 1, 1, 1, 1, 1, 1]
              SoilCrop DEROPAPYSoil: LL=[0.1, 0.11, 0.08, 0.05, 0.07, 0.1, 0.1, 0.08, 0.08, 0.08]; KL=[1, 1, 1, 1, 1, 1, 1, 1, 1, 1]; XF=[1, 1, 1, 1, 1, 1, 1, 1, 1, 1]
            Operations IrrigationEvents
              2013-09-16  [Irrigation].Apply(4.6);
              2013-09-25  [Irrigation].Apply(3.5);
              2013-09-10  [Irrigation].Apply(5);
              2013-09-10  [Irrigation].Apply(5);
          CompositeFactor VeryEarly
            Specifications:
              [IrrigationEvents]
              [Physical]
              [Water].Thickness=200,200,200,200,200,200,200,200
              [Water].InitialValues=0.32,0.2865,0.276,0.2745,0.2912,0.2228,0.2037,0.1818
            Physical
              Thickness  BD     AirDry  LL15  DUL   SAT
              200        1      0.06    0.06  0.32  0.419
              200        1.324  0.12    0.12  0.29  0.405
              200        1.35   0.09    0.09  0.28  0.37
              200        1.301  0.08    0.08  0.27  0.37
              200        1.301  0.06    0.07  0.3   0.33
              200        1.301  0.06    0.08  0.25  0.32
              200        1.301  0.1     0.1   0.23  0.3
              200        1.301  0.1     0.1   0.21  0.31
              200        1.3    0.1     0.1   0.21  0.31
              200        1.3    0.1     0.1   0.21  0.31
              SoilCrop WheatSoil
                LL=[0.06, 0.12, 0.09, 0.08, 0.07, 0.08, 0.1, 0.1, 0.1, 0.1]
                KL=[0.06, 0.03, 0.03, 0.03, 0.03, 0.03, 0.03, 0.02, 0.02, 0.02]
                XF=[1, 1, 1, 1, 1, 1, 1, 1, 1, 1]
              SoilCrop DEROPAPYSoil: LL=[0.06, 0.12, 0.09, 0.08, 0.07, 0.08, 0.1, 0.1, 0.1, 0.1]; KL=[1, 1, 1, 1, 1, 1, 1, 1, 1, 1]; XF=[1, 1, 1, 1, 1, 1, 1, 1, 1, 1]
            Operations IrrigationEvents
              2013-09-16  [Irrigation].Apply(4.6);
              2013-09-25  [Irrigation].Apply(3.5);
              2013-11-19  [Irrigation].Apply(33,1);
              2013-11-26  [Irrigation].Apply(32,1);
              2013-12-03  [Irrigation].Apply(35,18);
              2013-12-10  [Irrigation].Apply(49,1);
              2013-12-17  [Irrigation].Apply(47,1);
              2013-12-24  [Irrigation].Apply(49,1);
              2013-09-10  [Irrigation].Apply(5);
          CompositeFactor Early
            Specifications:
              [IrrigationEvents]
              [Physical]
              [Water].Thickness=200,200,200,200,200,200,200,200
              [Water].InitialValues=0.32,0.278,0.2695,0.2698,0.2572,0.2442,0.1508,0.1605
            Physical
              Thickness  BD     AirDry  LL15  DUL   SAT
              200        1      0.05    0.06  0.32  0.42
              200        1.324  0.1     0.1   0.3   0.405
              200        1.35   0.1     0.1   0.3   0.37
              200        1.301  0.08    0.08  0.3   0.37
              200        1.301  0.07    0.07  0.32  0.33
              200        1.301  0.08    0.08  0.3   0.32
              200        1.301  0.08    0.08  0.21  0.3
              200        1.301  0.08    0.08  0.21  0.31
              200        1.3    0.08    0.08  0.21  0.31
              200        1.3    0.08    0.08  0.21  0.31
              SoilCrop WheatSoil
                LL=[0.06, 0.1, 0.1, 0.08, 0.07, 0.08, 0.08, 0.08, 0.08, 0.08]
                KL=[0.06, 0.03, 0.03, 0.03, 0.03, 0.03, 0.03, 0.02, 0.02, 0.02]
                XF=[1, 1, 1, 1, 1, 1, 1, 1, 1, 1]
              SoilCrop DEROPAPYSoil: LL=[0.06, 0.1, 0.1, 0.08, 0.07, 0.08, 0.08, 0.08, 0.08, 0.08]; KL=[1, 1, 1, 1, 1, 1, 1, 1, 1, 1]; XF=[1, 1, 1, 1, 1, 1, 1, 1, 1, 1]
            Operations IrrigationEvents
              2013-05-14  [Irrigation].Apply(25);
              2013-05-29  [Irrigation].Apply(9.2);
              2013-06-11  [Irrigation].Apply(12);
              2013-09-16  [Irrigation].Apply(34.6);
              2013-09-25  [Irrigation].Apply(46.5);
              2013-12-10  [Irrigation].Apply(49,1);
              2013-12-17  [Irrigation].Apply(47,1);
              2013-12-24  [Irrigation].Apply(49,1);
              2013-12-31  [Irrigation].Apply(20.3,1);
              2013-12-24  [Irrigation].Apply(49,1);
              2013-12-31  [Irrigation].Apply(20.3,1);
              2013-09-10  [Irrigation].Apply(5);
          CompositeFactor Middle
            Specifications:
              [IrrigationEvents]
              [Physical]
              [Water].Thickness=200,200,200,200,200,200,200,200
              [Water].InitialValues=0.32,0.2788,0.271,0.2795,0.2275,0.1905,0.2318,0.2385
            Physical
              Thickness  BD     AirDry  LL15  DUL   SAT
              200        1      0.06    0.06  0.32  0.419
              200        1.324  0.12    0.12  0.3   0.405
              200        1.35   0.09    0.09  0.29  0.37
              200        1.301  0.05    0.05  0.3   0.37
              200        1.301  0.05    0.05  0.25  0.33
              200        1.301  0.05    0.05  0.24  0.32
              200        1.301  0.12    0.12  0.26  0.3
              200        1.301  0.1     0.1   0.26  0.31
              200        1.3    0.1     0.1   0.26  0.31
              200        1.3    0.1     0.1   0.26  0.31
              SoilCrop WheatSoil
                LL=[0.06, 0.12, 0.09, 0.05, 0.05, 0.05, 0.12, 0.1, 0.1, 0.1]
                KL=[0.06, 0.03, 0.03, 0.03, 0.03, 0.03, 0.03, 0.02, 0.02, 0.02]
                XF=[1, 1, 1, 1, 1, 1, 1, 1, 1, 1]
              SoilCrop DEROPAPYSoil: LL=[0.06, 0.12, 0.09, 0.05, 0.05, 0.05, 0.12, 0.1, 0.1, 0.1]; KL=[1, 1, 1, 1, 1, 1, 1, 1, 1, 1]; XF=[1, 1, 1, 1, 1, 1, 1, 1, 1, 1]
            Operations IrrigationEvents
              2013-05-14  [Irrigation].Apply(25);
              2013-05-29  [Irrigation].Apply(9.2);
              2013-06-11  [Irrigation].Apply(12);
              2013-09-16  [Irrigation].Apply(34.6);
              2013-09-25  [Irrigation].Apply(46.3);
              2013-10-01  [Irrigation].Apply(19.3);
              2013-12-17  [Irrigation].Apply(47,1);
              2013-12-24  [Irrigation].Apply(49,1);
              2013-12-31  [Irrigation].Apply(20.3,1);
              2013-09-10  [Irrigation].Apply(5);
          CompositeFactor Late
            Specifications:
              [IrrigationEvents]
              [Physical]
              [Water].Thickness=200,200,200,200,200,200,200,200
              [Water].InitialValues=0.32,0.2785,0.274,0.2708,0.2715,0.2312,0.199,0.228
            Physical
              Thickness  BD     AirDry  LL15  DUL   SAT
              200        1      0.05    0.05  0.32  0.419
              200        1.324  0.12    0.12  0.3   0.405
              200        1.35   0.1     0.1   0.29  0.37
              200        1.301  0.05    0.05  0.32  0.37
              200        1.301  0.06    0.06  0.3   0.33
              200        1.301  0.06    0.06  0.3   0.32
              200        1.301  0.1     0.1   0.27  0.3
              200        1.301  0.1     0.1   0.26  0.31
              200        1.3    0.1     0.1   0.26  0.31
              200        1.3    0.1     0.1   0.26  0.31
              SoilCrop WheatSoil
                LL=[0.1, 0.12, 0.1, 0.08, 0.06, 0.08, 0.1, 0.1, 0.1, 0.1]
                KL=[0.06, 0.03, 0.03, 0.03, 0.03, 0.03, 0.03, 0.02, 0.02, 0.02]
                XF=[1, 1, 1, 1, 1, 1, 1, 1, 1, 1]
              SoilCrop DEROPAPYSoil: LL=[0.05, 0.12, 0.1, 0.05, 0.06, 0.06, 0.1, 0.1, 0.1, 0.1]; KL=[1, 1, 1, 1, 1, 1, 1, 1, 1, 1]; XF=[1, 1, 1, 1, 1, 1, 1, 1, 1, 1]
            Operations IrrigationEvents
              2013-05-14  [Irrigation].Apply(25);
              2013-05-29  [Irrigation].Apply(9.2);
              2013-06-11  [Irrigation].Apply(12);
              2013-09-16  [Irrigation].Apply(34.6);
              2013-09-25  [Irrigation].Apply(46.3);
              2013-10-01  [Irrigation].Apply(19.3);
              2013-10-08  [Irrigation].Apply(24.9);
              2013-10-15  [Irrigation].Apply(21);
              2013-10-22  [Irrigation].Apply(39);
              2013-10-29  [Irrigation].Apply(0);
        Factor Model
          CompositeFactor Full
            Specifications:
              [SowingAndHarvest]
              [ThisDero].CurrentCropName = None
            Operations SowingAndHarvest
              2013-03-25  [Wheat].Sow(population:165, cultivar:"Wakanui", depth:30, rowSpacing:130);
              2014-01-26  [Wheat].Harvest();
              2014-01-26  [Wheat].EndCrop();
          CompositeFactor Dero
            Specifications:
              [SowingAndHarvest]
              [ThisDero].CurrentCropName = Wheat
            Operations SowingAndHarvest
    Simulation Rainshelter2013
      Clock: Start=2013-03-22; End=2014-04-01
      Summary summaryfile
      Weather: FileName=C:/GitHubRepos/ApsimX/Tests/Validation/Wheat/lincoln.met
      SoilArbitrator Soil Arbitrator
      Zone paddock: Area=1; Slope=0; AspectAngle=0; Altitude=50
        Plant DEROPAPY
        Soil TempletonSiltLoam: SoilType=NZ_sedementary; Region=Plains; State=Canterbury; Country=New Zealand; Latitude=0; Longitude=0
          DataSource=Generic profile descriptions provided by Trevor Webb and data for functional horizions based on SWAMP project results
          Comments=Bulk density values were measured on the fine earth fraction so values entered into apsim soil are adjusted down to account for stone content (assuming stones are inert from all soil process so their mass and volume is removed from model paramaters).  SAT, DUL, LL15 and Air dry have been adjusted down to account for stone content.  OC has not been adjusted so the model will get the correct carbon and N amounts using the adjusted BD.
          Chemical: Thickness=[180, 150, 400, 270, 500]; PH=[6, 6, 6, 6, 6]; PHUnits=Water
          Physical
            Thickness  BD     AirDry  LL15  DUL   SAT
            200        1      0.05    0.1   0.32  0.42
            200        1.324  0.12    0.15  0.35  0.41
            200        1.35   0.1     0.1   0.3   0.37
            200        1.301  0.08    0.08  0.3   0.37
            200        1.301  0.06    0.07  0.28  0.33
            200        1.301  0.06    0.08  0.25  0.32
            200        1.301  0.1     0.1   0.23  0.3
            200        1.301  0.1     0.1   0.24  0.31
            SoilCrop WheatSoil: LL=[0.1, 0.12, 0.1, 0.08, 0.06, 0.08, 0.1, 0.1]; KL=[0.06, 0.06, 0.1, 0.1, 0.05, 0.03, 0.02, 0.01]; XF=[1, 1, 1, 1, 1, 1, 1, 1]
            SoilCrop DEROPAPYSoil: LL=[0.1, 0.15, 0.1, 0.08, 0.07, 0.08, 0.1, 0.1]; KL=[1, 1, 1, 1, 1, 1, 1, 1]; XF=[1, 1, 1, 1, 1, 1, 1, 1]
          WaterBalance SoilWater: SummerDate=1-oct; SummerU=6; SummerCona=3; WinterDate=1-Apr; WinterU=2; WinterCona=1; DiffusConst=0; DiffusSlope=0; Salb=0.13; CN2Bare=0; CNRed=0; CNCov=0.8; PSIDul=-100; Thickness=[200, 200, 200, 200, 200, 200, 200, 200]; SWCON=[1, 1, 1, 1, 1, 1, 1, 1]
          Organic: FOMCNRatio=40; CarbonUnits=Total
            Thickness  Carbon  SoilCNRatio  FBiom   FInert  FOM
            180        2.6251  11           0.0333  0.4371  427.528
            150        1.2469  11           0.0187  0.6569  316.72
            400        0.316   11           0.0117  0.8496  142.312
            270        0.208   11           0.0102  0.945   82.9318
            500        0.2004  11           0.01    0.9827  30.5089
          Water: Thickness=[200, 200, 200, 200, 200, 200, 200, 200]; InitialValues=[0.35, 0.35, 0.25, 0.25, 0.25, 0.2, 0.18, 0.2]; FilledFromTop=false
          Nutrient
          Solute NO3: Thickness=[180, 150, 400, 270, 500]; InitialValues=[265, 40.2427, 5.01813, 2.41979, 1.9216]; InitialValuesUnits=ppm; WaterTableConcentration=0; D0=0; DepthConstant=0; MaxDepthSoluteAccessible=0; RunoffEffectivenessAtMovingSolute=0; MaxEffectiveRunoff=0
          Solute NH4: Thickness=[180, 150, 400, 270, 500]; InitialValues=[1.5, 0.854582, 0.442264, 0.38432, 0.38432]; InitialValuesUnits=ppm; WaterTableConcentration=0; D0=0; DepthConstant=0; MaxDepthSoluteAccessible=0; RunoffEffectivenessAtMovingSolute=0; MaxEffectiveRunoff=0
          Solute Urea: Thickness=[180, 150, 400, 270, 500]; InitialValues=[0, 0, 0, 0, 0]; InitialValuesUnits=kg/ha; WaterTableConcentration=0; D0=0; DepthConstant=0; MaxDepthSoluteAccessible=0; RunoffEffectivenessAtMovingSolute=0; MaxEffectiveRunoff=0
          SoilTemperature Temperature: InteractionsPerDay=8
        Plant Wheat
        Folder Manager folder
          Operations SowingAndHarvest: same as Lincoln2014.Factors.Permutation.Model.Full.SowingAndHarvest
          Operations IrrigationEvents
            2013-05-14  [Irrigation].Apply(25);
            2013-05-29  [Irrigation].Apply(9.2);
            2013-06-11  [Irrigation].Apply(12);
            2013-09-16  [Irrigation].Apply(34.6);
            2013-09-25  [Irrigation].Apply(43);
            2013-10-01  [Irrigation].Apply(19.3);
            2013-10-08  [Irrigation].Apply(24.9);
            2013-10-15  [Irrigation].Apply(21);
            2013-10-22  [Irrigation].Apply(39);
            2013-10-29  [Irrigation].Apply(44);
            2013-11-05  [Irrigation].Apply(40);
            2013-11-12  [Irrigation].Apply(35);
            2013-11-19  [Irrigation].Apply(33);
            2013-11-26  [Irrigation].Apply(32);
            2013-12-03  [Irrigation].Apply(35);
            2013-12-10  [Irrigation].Apply(49);
            2013-12-17  [Irrigation].Apply(47);
            2013-12-24  [Irrigation].Apply(0);
            2013-12-31  [Irrigation].Apply(0);
          Operations FertiliserEvents
            2013-09-26  [Fertiliser].Apply(100, "UreaN", 10);
            2013-11-13  [Fertiliser].Apply(100, "UreaN", 10);
          Operations Flood
            2013-06-18  [Irrigation].Apply(120);
            2013-04-12  [Irrigation].Apply(5);
        Irrigation
        Manager ClimateControl
          StartDate = 2013-04-15
          EndDate = 2014-05-01
```csharp
using Models.Soils;
using System.Xml.Serialization;
using Models;
using Models.PMF;
using System.Text;
using System.Collections.Generic;
using APSIM.Shared.Utilities;
using Models.Core;
using System;
using Models.Climate;

namespace Models
{
    [Serializable] 
    [System.Xml.Serialization.XmlInclude(typeof(Model))]
    public class Script : Model
    {
        [Link] Weather Met;
        [Link] Clock Clock;
    
        [Description("Start Date")]
        public DateTime StartDate { get; set; }
        
        [Description("End Date")]
        public DateTime EndDate { get; set; }
 
    
        [EventSubscribe("PreparingNewWeatherData")]
        private void OnPreparingNewWeatherData(object sender, EventArgs e)
        {
            if ((Clock.Today.Date >= StartDate) && (Clock.Today.Date <= EndDate))
                Met.Rain = 0;        
        }
    }
}
```
        SurfaceOrganicMatter Surface Organic Matter: InitialResidueName=wheat_stubble; InitialResidueType=wheat; InitialResidueMass=500; InitialStandingFraction=0; InitialCPR=0; InitialCNR=80
        Fertiliser
        MicroClimate: a_interception=0; b_interception=1; c_interception=0; d_interception=0; SoilHeatFluxFraction=0.4; MinimumHeightDiffForNewLayer=0; NightInterceptionFraction=0.5; ReferenceHeight=2
        Manager MaxLeafSize
```csharp
using Models.Soils;
using System;
using System.Collections.Generic;
using System.Xml.Serialization;
using Models.Core;
using Models.Interfaces;
using APSIM.Shared.Utilities;



namespace Models
{
    [Serializable] 
    public class Script : Model
    {
    
        
    }
}
```
        DEROPAPY ThisDero: CoefficientFile=CropParameters.csv; CurrentCropName=Maize
        Report DailyReport: EventNames=[Clock].DoReport
          VariableNames:
            [Simulation].Name
            [Clock].Today
            [Soil].Water.Volumetric
            sum([Soil].Water.MM) as ProfileWater
            sum([Soil].NO3.kgha) as TotalNO3
            [IWeather].Radn
            [IWeather].MeanT
            [Wheat].AboveGround.N
            [Wheat].AboveGround.Wt
            [Wheat].AboveGroundLive.N
            [Wheat].AboveGroundLive.Wt
            [Wheat].AboveGroundDead.N
            [Wheat].AboveGroundDead.Wt
            [Wheat].Ear.N
            [Wheat].Ear.NConc
            [Wheat].Ear.Wt
            [Wheat].Grain.N
            [Wheat].Grain.NConc
            [Wheat].Grain.Number
            [Wheat].Grain.Size
            [Wheat].Grain.Wt
            [Wheat].Leaf.Tips
            [Wheat].Leaf.CoverGreen
            [Wheat].Leaf.CoverTotal
            [Wheat].Leaf.Dead.N
            [Wheat].Leaf.Dead.NConc
            [Wheat].Leaf.Dead.Wt
            [Wheat].Leaf.Ligules
            [Wheat].Leaf.Fn
            [Wheat].Leaf.Fw
            [Wheat].Leaf.Height
            [Wheat].Leaf.LAI
            [Wheat].Leaf.Live.N
            [Wheat].Leaf.Live.NConc
            [Wheat].Leaf.Live.Wt
            [Wheat].Leaf.PotentialEP
            [Wheat].Leaf.SpecificArea
            [Wheat].Leaf.SpecificNitrogen
            [Wheat].Leaf.Transpiration
            [Wheat].Phenology.CurrentPhase.Name
            [Wheat].Phenology.CurrentStageName
            [Wheat].Phenology.EmergenceDAS
            [Wheat].Phenology.Stage
            [Wheat].Phenology.ThermalTime
            [Wheat].Phenology.Zadok.Stage
            [Wheat].Root.Depth
            [Wheat].Root.N
            [Wheat].Root.Wt
            [Wheat].Root.NConc
            [Wheat].Spike.N
            [Wheat].Spike.NConc
            [Wheat].Spike.Wt
            [Wheat].Stem.N
            [Wheat].Stem.NConc
            [Wheat].Stem.Wt
            [Wheat].StemPlusSpike.Wt
            [Wheat].StemPlusSpike.N
            [Wheat].SowingData.Cultivar
            [Wheat].Phenology.HaunStage
            [Wheat].Phenology.HaunStage
            [Wheat].Leaf.Height
            [Wheat].Leaf.Tips
            [Wheat].Leaf.FinalLeafNumber
            [Wheat].Leaf.MainStemPopulation
            [Wheat].Leaf.StemPopulation
            [Wheat].Phenology.PTQ
            [Wheat].Phenology.Phyllochron
            [Wheat].Total.N
            [Wheat].Total.Wt
            ([Wheat].Leaf.Transpiration + [Soil].SoilWater.Es + [MicroClimate].PrecipitationInterception) as ET
            [IWeather].MeanT
            [Wheat].Phenology.Photoperiod
            [Wheat].Phenology.AccumulatedTT
        Report: EventNames=[Clock].DoReport
          VariableNames:
            [Clock].Today
            [Deropapy].AboveGround.Wt
            [Deropapy].Arbitrator.Carbon.TotalFixationSupply
            [Deropapy].Arbitrator.Carbon.TotalPlantDemand
            [Deropapy].Arbitrator.Nitrogen.TotalPlantDemand
            [Deropapy].Arbitrator.Nitrogen.TotalUptakeSupply
            [Deropapy].CoverGreen
            [Deropapy].Height
            [Deropapy].Leaf.Canopy.CoverDead
            [Deropapy].Leaf.Canopy.CoverGreen
            [Deropapy].Leaf.Canopy.CoverTotal
            [Deropapy].Leaf.Canopy.DeadAreaIndex
            [Deropapy].Leaf.Canopy.DeadAreaIndex.FrostedLAI
            [Deropapy].Leaf.Canopy.DeadAreaIndex.AgeSenescence
            [Deropapy].Leaf.Canopy.GreenAreaIndex
            [Deropapy].Leaf.Canopy.GreenAreaIndex.SeasonalDeath
            [Deropapy].Leaf.Canopy.GreenAreaIndex.SeasonalGrowth
            [Deropapy].Leaf.Canopy.GreenAreaIndex.WinterBase
            [Deropapy].Leaf.Canopy.LAI
            [Deropapy].Leaf.Canopy.LAIDead
            [Deropapy].Leaf.Canopy.LAITotal
            [Deropapy].Leaf.Canopy.RadiationIntercepted
            [Deropapy].Leaf.Carbon.Demands.Total
            [Deropapy].Leaf.Carbon.Supplies.Total
            [DEROPAPY].Leaf.FrostFraction
            [Deropapy].Leaf.Live.Carbon.Storage
            [Deropapy].Leaf.Live.Carbon.Structural
            [Deropapy].Leaf.N
            [Deropapy].Leaf.Nitrogen.Demands.Total
            [Deropapy].Leaf.Photosynthesis
            [Deropapy].Leaf.Photosynthesis.FCO2
            [Deropapy].Leaf.Photosynthesis.FN
            [Deropapy].Leaf.Photosynthesis.FT
            [Deropapy].Leaf.Photosynthesis.FVPD
            [Deropapy].Leaf.Photosynthesis.FW
            [Deropapy].Leaf.TotalCarbonDemand
            [Deropapy].Leaf.Wt
            [Deropapy].Phenology.AccumulatedEmergedTT
            [Deropapy].Phenology.CurrentPhaseName
            [Deropapy].Phenology.CurrentStageName
            [DeroPapy].Phenology.Emerged
            [DeroPapy].Phenology.Flowering.IsInPhase
            [DEROPAPY].Phenology.Photoperiod
            [DEROPAPY].Phenology.Reproductive.FractionComplete
            [DeroPapy].Phenology.Reproductive.IsInPhase
            [DEROPAPY].Phenology.Reproductive.ProgressThroughPhase
            [Deropapy].Phenology.Stage
            [Deropapy].Phenology.ThermalTime
            [DeroPapy].Phenology.Vegetative.IsInPhase
            [Deropapy].Product.Carbon.Demands.Total
            [Deropapy].Product.FlowerNumber
            [DEROPAPY].Product.FreshWeight
            [Deropapy].Product.N
            [Deropapy].Product.Nitrogen.Demands.Total
            [Deropapy].Product.TotalCarbonDemand.TotalDMDemand
            [Deropapy].Product.TotalCarbonDemand.TotalDMDemand.AllometricDemand
            [Deropapy].Product.TotalCarbonDemand.TotalDMDemand.PotentialFruitGrowth
            [DEROPAPY].Product.TotalCarbonDemand.TotalDMDemand.PotentialFruitGrowth
            [DEROPAPY].Product.TotalCarbonDemand.TotalDMDemand.PotentialFruitGrowth.RelativeFruitMass
            [Deropapy].Product.Wt
            [Deropapy].Product.FreshWeightPerFruit
            [Deropapy].Product.DryWeightPerFruit
            [Deropapy].Product.Carbon.Demands.Total
            [Deropapy].Product.Carbon.DemandsAllocated.Total
            [DEROPAPY].Product.FlowerNumber.StressDuringFlowering.MaxTempStress
            [DEROPAPY].Product.FlowerNumber.StressDuringFlowering.MinTempStress
            [DEROPAPY].Product.FlowerNumber.StressDuringFlowering.WaterStress
            [Deropapy].RelativeAnnualDimension
            [Deropapy].RelativeSeasonalDimension
            [Deropapy].Root.Carbon.Demands.Total
            [Deropapy].Root.N
            [Deropapy].Root.Network.Depth
            [Deropapy].Root.Network.NUptake
            [Deropapy].Root.Network.WaterUptake
            [Deropapy].Root.Nitrogen.Demands.Total
            [Deropapy].Root.Senesced.Weight.Total
            [Deropapy].Root.TotalCarbonDemand
            [Deropapy].Root.Wt
            [Deropapy].Total.N
            [Deropapy].Total.Wt
            [Deropapy].Trunk.Carbon.Demands.Total
            [Deropapy].Trunk.N
            [Deropapy].Trunk.Nitrogen.Demands.Total
            [Deropapy].Trunk.TotalCarbonDemand
            [Deropapy].Trunk.Wt
            [Deropapy].Width
            [Irrigation].IrrigationApplied
            [Weather].MeanT
            [Weather].MaxT
            [Weather].MinT
            [Weather].Rain
            sum([NO3].kgha + [NH4].kgha + [Urea].kgha)
            sum([Water].PAW)
            sum([Water].PAWmm)
            [Deropapy].Leaf.Canopy.PotentialEP
            [Deropapy].Leaf.Canopy.Transpiration
        BiomassRemovalEvents OnDefoliate: RemovalType=1
        BiomassRemovalEvents OnHarvestAndPrune: RemovalType=2
        BiomassRemovalEvents OnEndCrop: RemovalType=4
      Manager LocationInfo
        Country = New Zealand
        State = Canterbury Region
        Region =
```csharp
using Models.Soils;
using System;
using Models.Core;
using Models.PMF;
using APSIM.Shared.Utilities;

namespace Models
{
    [Serializable]
    public class Script : Model
    {
        [Link] Clock Clock;
        [Link] Fertiliser Fertiliser;
        [Link] Summary Summary;
        
        [Description("Country")]
        public string Country { get; set; }

        [Description("State")]
        public string State { get; set; }

        [Description("Region")]
        public string Region { get; set; }

    }
}
```
  Experiment GrapeTesting (disabled)
    Factors
      Permutation
        Factor Crop: Specification=[ThisDero].CurrentCropName =  GrapeVine
        Factor Location
          CompositeFactor CentralOtago: Specifications=[Weather].FileName = 14470_CentralOtago_Past.met
          CompositeFactor Marlbrough: Specifications=[Weather].FileName = 27539_Marlbrough_past.met
          CompositeFactor North: Specifications=[Weather].FileName = 21584_North_Had_RCPpast.met
          CompositeFactor South: Specifications=[Weather].FileName = 10731_South_Had_RCPpast.met
          CompositeFactor Gisborne: Specifications=[Weather].FileName = 28041_Gisborne_past.met
          CompositeFactor Canterb: Specifications=[Weather].FileName = 20993_Lincoln_Had_RCPpast.met
        Factor MGMT
          CompositeFactor Basic
            Specifications:
              [FrostFighting].Script.ProtectionAvaialable = false
              [AutomaticIrrigation].Script.allowIrrigation = false
          CompositeFactor FF
            Specifications:
              [FrostFighting].Script.ProtectionAvaialable = true
              [AutomaticIrrigation].Script.allowIrrigation = false
          CompositeFactor Irrig
            Specifications:
              [FrostFighting].Script.ProtectionAvaialable = false
              [AutomaticIrrigation].Script.allowIrrigation = true
          CompositeFactor FFandIrrig
            Specifications:
              [FrostFighting].Script.ProtectionAvaialable = true
              [AutomaticIrrigation].Script.allowIrrigation = true
    Simulation Rotation323
      Weather: FileName=10731_South_Had_RCPpast.met
      Clock: Start=1985-07-01; End=1995-06-30
      Summary
      SoilArbitrator Soil Arbitrator
      Zone Block: Area=1; Slope=0; AspectAngle=0; Altitude=50
        Manager FactorLabels: same as SimpleIrrigationTest.Rotation2.Block.ManagerFolder.FactorLabels
        Manager Reset on date: same as SimpleIrrigationTest.Rotation2.Block.Reset on date
        Manager AutomaticFertiliser: same as SimpleIrrigationTest.Rotation2.Block.ManagerFolder.AutomaticFertiliser
        Manager AutomaticIrrigation: same as SimpleIrrigationTest.Rotation2.Block.AutomaticIrrigation
        Manager FrostFighting
          ProtectionAvaialable = False
```csharp
using Newtonsoft.Json;
using Models.Core;
using System.Xml.Serialization;
using System;
using Models.Climate;
using Models.PMF.Phen;
using Models.PMF.SimplePlantModels;
using Models.PMF;

namespace Models
{
    [Serializable]
    public class Script : Model
    {
        // - Links to APSIM models
        [Link] Zone zone;
        [Link] Clock clock;
        [Link] Weather weather;
        [Link] private Phenology phenology;
        [Link] private EnergyBalance eb;
        [Link] ISummary summary = null;
        [Link] private DEROPAPY dero;
        [Link (Type = LinkType.Scoped, ByName = true)] private IParallelPhase flowering;

        // - Paramters for this manager
        [Description("Enable? untick to completely disable this manager")] 
        public bool ProtectionAvaialable { get; set; }

		public int FrostDays {get; set;}
		public double MostSevereFrost {get; set;}
		private bool fightTheFrost {get; set;}
        
        [EventSubscribe("PreparingNewWeatherData")] 
        private void PreparingNewWeatherData(object sender, EventArgs e)
        {
            // Check if this manager is enabled
            fightTheFrost = false;
            
            if (ProtectionAvaialable)
            {
                if ((phenology.Stage >= 3) && (phenology.Stage <= 7) )
                   {
                   	if (weather.MinT < dero.GetValueFromStringVector(dero.CurrentCropParams["Frost_Temp_X"],1))
                   		{
				           	MostSevereFrost = Math.Min(MostSevereFrost,weather.MinT);
				           	weather.MinT = 4;
				          	FrostDays +=1;  
                   		}
                   }
            
             }
        }
        
        [EventSubscribe("PhaseChanged")]
        private void PhaseChanged(object sender, PhaseChangedType p)
        {
            if (p.StageName == "StartGrowth" )
                {
                	MostSevereFrost = 0;
                   	FrostDays = 0;   
                }
        }
    }
}
```
        Manager WaterStatus: same as SimpleWeatherTest.Rotation3.Block.WaterStatus
        Soil: Latitude=0; Longitude=0
          LayerStructure: Thickness=[200, 200, 200, 200, 200, 200, 300, 300, 400, 800]
          Chemical: Thickness=[100, 200, 300, 300, 300, 300]; PH=[6.6, 6.2, 5.7, 5.5, 5.5, 5.5]; PHUnits=Water
          Water: Thickness=[300, 300, 300, 300, 300, 300, 1200]; InitialValues=[0.3, 0.25, 0.2, 0.2, 0.18, 0.18, 0.18]; FilledFromTop=false
          WaterBalance SoilWater: same as SimpleIrrigationTest.Rotation2.Block.Soil.SoilWater
          Organic: same as SimpleIrrigationTest.Rotation2.Block.Soil.Organic
          OutputLayers: Thickness=[300, 300, 300, 300, 300, 300]
          Solute NO3: same as SimpleIrrigationTest.Rotation2.Block.Soil.NO3
          Solute NH4: same as SimpleIrrigationTest.Rotation2.Block.Soil.NH4
          Solute Urea: same as SimpleIrrigationTest.Rotation2.Block.Soil.Urea
          Physical
            Thickness  ParticleSizeSand  ParticleSizeSilt  ParticleSizeClay  Rocks  BD  AirDry  LL15  DUL   SAT  KS
            300        5                 65                30                0.137  1   0.1     0.15  0.3   0.4  100
            300        5                 65                30                0.137  1   0.15    0.15  0.25  0.4  100
            300        5                 65                30                0.137  1   0.15    0.15  0.2   0.4  50
            300        5                 65                30                0.137  1   0.15    0.15  0.2   0.4  40
            300        5                 65                30                0.137  1   0.15    0.15  0.18  0.4  40
            300        5                 65                30                0      1   0.15    0.15  0.18  0.4  40
            1200       5                 65                30                0      1   0.15    0.15  0.18  0.4  40
            Rocks, ParticleSizeSand, ParticleSizeSilt, ParticleSizeClay source: Calculated
            SoilCrop DEROPAPYSoil: LL=[0.15, 0.15, 0.15, 0.15, 0.15, 0.15, 0.15]; KL=[1, 1, 1, 1, 1, 1, 1]; XF=[1, 1, 1, 1, 1, 1, 1]
          Nutrient
          SoilTemperature Temperature: InteractionsPerDay=8
        Plant DEROPAPY
        SurfaceOrganicMatter: InitialResidueName=wheat_stubble; InitialResidueType=wheat; InitialResidueMass=500; InitialStandingFraction=0; InitialCPR=0; InitialCNR=100
        Fertiliser
        Irrigation
        DEROPAPY ThisDero: CoefficientFile=CropParameters.csv; CurrentCropName=Maize
        MicroClimate: a_interception=0; b_interception=1; c_interception=0; d_interception=0; SoilHeatFluxFraction=0.4; MinimumHeightDiffForNewLayer=0; NightInterceptionFraction=0.5; ReferenceHeight=2
        BiomassRemovalEvents OnDefoliate: RemovalType=1
        BiomassRemovalEvents OnHarvestAndPrune: RemovalType=2
        BiomassRemovalEvents OnEndCrop: RemovalType=4
        Report Stages
        Manager ReportOnEvents
          script: same as in SimpleIrrigationTest.Rotation2.Block.ReportOnEvents
        Report: EventNames=[Clock].DoReport
        Report Output
          EventNames:
            [OnHarvestAndPrune].Harvesting
            [OnEndCrop].EndCrop
  Experiment DormancyTest (disabled)
    Factors
      Permutation
        Factor Crop: Specification=[ThisDero].CurrentCropName =  GrapeVine
        Factor RunningT
          CompositeFactor 9: Specifications=[ChillSet].Script.RunningMeanT  = 9
          CompositeFactor 10: Specifications=[ChillSet].Script.RunningMeanT  = 10
          CompositeFactor 11: Specifications=[ChillSet].Script.RunningMeanT  = 11
        Factor TargetAtZ
          CompositeFactor 1800: Specifications=[ChillSet].Script.ZeroChillTarget  = 1800
          CompositeFactor 1000: Specifications=[ChillSet].Script.ZeroChillTarget  = 1000
          CompositeFactor 200: Specifications=[ChillSet].Script.ZeroChillTarget  = 200
        Factor DaysMaxC
          CompositeFactor 50: Specifications=[ChillSet].Script.MaxChillDays  = 50
          CompositeFactor 100: Specifications=[ChillSet].Script.MaxChillDays  = 100
          CompositeFactor 300: Specifications=[ChillSet].Script.MaxChillDays  = 300
          CompositeFactor 200: Specifications=[ChillSet].Script.MaxChillDays  = 200
        Factor Location
          CompositeFactor Gisborne: Specifications=[Weather].FileName = 28041_Gisborne_past.met
          CompositeFactor Marlbrough: Specifications=[Weather].FileName = 27539_Marlbrough_past.met
          CompositeFactor CentralOtago: Specifications=[Weather].FileName = 14470_CentralOtago_Past.met
    Simulation Grapebase
      Weather: FileName=20993_Lincoln_Had_RCPpast.met
      Clock: Start=1985-07-01; End=1995-06-30
      Summary
      SoilArbitrator Soil Arbitrator
      Zone Block: Area=1; Slope=0; AspectAngle=0; Altitude=50
        Folder ManagerFolder: same as SowDateTest.WheatBase.Block.ManagerFolder
        Report: EventNames=[Clock].DoReport
        Report Output: same as SowDateTest.WheatBase.Block.Output
        Soil: same as SimpleWeatherTest.Rotation3.Block.Soil
        SurfaceOrganicMatter: InitialResidueName=wheat_stubble; InitialResidueType=wheat; InitialResidueMass=500; InitialStandingFraction=0; InitialCPR=0; InitialCNR=100
        Plant DEROPAPY
        Fertiliser
        Irrigation
        DEROPAPY ThisDero: CurrentCropName=Wheat
          CoefficientFile=C:\GitHubRepos\ApsimX\Prototypes\DEROPAPY\CropParameters.csv
        MicroClimate: a_interception=0; b_interception=1; c_interception=0; d_interception=0; SoilHeatFluxFraction=0.4; MinimumHeightDiffForNewLayer=0; NightInterceptionFraction=0.5; ReferenceHeight=2
        Manager ChillSet
          ZeroChillTarget = 1200
          FullChillTarget = 0
          MaxChillDays = 100
          RunningMeanT = 2
```csharp
using APSIM.Core;
using APSIM.Shared.Utilities;
using Models.PMF;
using Models.Interfaces;
using Models.Core;
using System;

namespace Models
{
    [Serializable]
    public class Script : Model, IStructureDependency
    {
        [Link] private Zone zone;
        public IStructure Structure { private get; set; }
        
        [Description("Target with no Chill")]
        public int ZeroChillTarget { get; set; }
        [Description("Target with full Chill")]
        public int FullChillTarget { get; set; }
        [Description("Chill days to reach full chill")]
        public int MaxChillDays { get; set; }
        [Description("Running mean temp when budburst occurs")]
        public int RunningMeanT { get; set; }


        

        [EventSubscribe("PlantSowing")]
        private void onDoDailyInitialisation(object sender, SowingParameters sp)
        {
            object SetValue = ZeroChillTarget;
            Structure.Set("[DEROPAPY].Phenology.Dormant.Target.XYPairs.Y[1]", SetValue, relativeTo: zone);
            SetValue = FullChillTarget;
            Structure.Set("[DEROPAPY].Phenology.Dormant.Target.XYPairs.Y[2]", SetValue, relativeTo: zone);
            SetValue = MaxChillDays;
            Structure.Set("[DEROPAPY].Phenology.Dormant.Target.XYPairs.X[2]", SetValue, relativeTo: zone);
            SetValue = RunningMeanT;
            Structure.Set("[DEROPAPY].Phenology.Waiting.TemptoProgress", SetValue, relativeTo: zone);
        }
    }
}
```
        BiomassRemovalEvents OnDefoliate: RemovalType=1
        BiomassRemovalEvents OnHarvestAndPrune: RemovalType=2
        BiomassRemovalEvents OnEndCrop: RemovalType=4
        Report Stages
        Manager ReportOnEvents: same as GrapeTesting.Rotation323.Block.ReportOnEvents
  Experiment AvocadoTesting (disabled)
    Factors
      Permutation
        Factor Crop: Specification=[ThisDero].CurrentCropName =  Avocado
        Factor Location: same as GrapeTesting.Factors.Permutation.Location
        Factor MGMT: same as GrapeTesting.Factors.Permutation.MGMT
    Simulation Rotation324
      Weather: FileName=10731_South_Had_RCPpast.met
      Clock: Start=1985-07-01; End=1995-06-30
      Summary
      SoilArbitrator Soil Arbitrator
      Zone Block: Area=1; Slope=0; AspectAngle=0; Altitude=50
        Manager FactorLabels: same as SimpleIrrigationTest.Rotation2.Block.ManagerFolder.FactorLabels
        Manager Reset on date: same as SimpleIrrigationTest.Rotation2.Block.Reset on date
        Manager AutomaticFertiliser: same as SimpleIrrigationTest.Rotation2.Block.ManagerFolder.AutomaticFertiliser
        Manager AutomaticIrrigation: same as SimpleIrrigationTest.Rotation2.Block.AutomaticIrrigation
        Manager FrostFighting
          ProtectionAvaialable = False
          script: same as in SimpleIrrigationTest.Rotation2.Block.FrostFighting
        Manager WaterStatus: same as SimpleWeatherTest.Rotation3.Block.WaterStatus
        Soil: Latitude=0; Longitude=0
          LayerStructure: Thickness=[200, 200, 200, 200, 200, 200, 300, 300, 400, 800]
          Chemical: Thickness=[100, 200, 300, 300, 300, 300]; PH=[6.6, 6.2, 5.7, 5.5, 5.5, 5.5]; PHUnits=Water
          Water: Thickness=[300, 300, 300, 300, 300, 300, 1200]; InitialValues=[0.3, 0.25, 0.2, 0.2, 0.18, 0.18, 0.18]; FilledFromTop=false
          WaterBalance SoilWater: same as SimpleIrrigationTest.Rotation2.Block.Soil.SoilWater
          Organic: same as SimpleIrrigationTest.Rotation2.Block.Soil.Organic
          OutputLayers: Thickness=[300, 300, 300, 300, 300, 300]
          Solute NO3: same as SimpleIrrigationTest.Rotation2.Block.Soil.NO3
          Solute NH4: same as SimpleIrrigationTest.Rotation2.Block.Soil.NH4
          Solute Urea: same as SimpleIrrigationTest.Rotation2.Block.Soil.Urea
          Physical: same as GrapeTesting.Rotation323.Block.Soil.Physical
          Nutrient
          SoilTemperature Temperature: InteractionsPerDay=8
        Plant DEROPAPY
        SurfaceOrganicMatter: InitialResidueName=wheat_stubble; InitialResidueType=wheat; InitialResidueMass=500; InitialStandingFraction=0; InitialCPR=0; InitialCNR=100
        Fertiliser
        Irrigation
        DEROPAPY ThisDero: CoefficientFile=CropParameters.csv; CurrentCropName=Maize
        MicroClimate: a_interception=0; b_interception=1; c_interception=0; d_interception=0; SoilHeatFluxFraction=0.4; MinimumHeightDiffForNewLayer=0; NightInterceptionFraction=0.5; ReferenceHeight=2
        BiomassRemovalEvents OnDefoliate: RemovalType=1
        BiomassRemovalEvents OnHarvestAndPrune: RemovalType=2
        BiomassRemovalEvents OnEndCrop: RemovalType=4
        Report Stages
        Manager ReportOnEvents: same as GrapeTesting.Rotation323.Block.ReportOnEvents
        Report: EventNames=[Clock].DoReport
        Report Output
          EventNames:
            [OnHarvestAndPrune].Harvesting
            [OnEndCrop].EndCrop
  Experiment LemonTesting (disabled)
    Factors
      Permutation
        Factor Crop: Specification=[ThisDero].CurrentCropName =  Lemon
        Factor Location: same as GrapeTesting.Factors.Permutation.Location
        Factor MGMT: same as GrapeTesting.Factors.Permutation.MGMT
    Simulation Rotation325
      Weather: FileName=10731_South_Had_RCPpast.met
      Clock: Start=1985-07-01; End=1995-06-30
      Summary
      SoilArbitrator Soil Arbitrator
      Zone Block: Area=1; Slope=0; AspectAngle=0; Altitude=50
        Manager FactorLabels: same as SimpleIrrigationTest.Rotation2.Block.ManagerFolder.FactorLabels
        Manager Reset on date: same as SimpleIrrigationTest.Rotation2.Block.Reset on date
        Manager AutomaticIrrigation: same as SimpleIrrigationTest.Rotation2.Block.AutomaticIrrigation
        Manager FrostFighting: same as AvocadoTesting.Rotation324.Block.FrostFighting
        Soil: same as GrapeTesting.Rotation323.Block.Soil
        Plant DEROPAPY
        SurfaceOrganicMatter: InitialResidueName=wheat_stubble; InitialResidueType=wheat; InitialResidueMass=500; InitialStandingFraction=0; InitialCPR=0; InitialCNR=100
        Fertiliser
        Irrigation
        DEROPAPY ThisDero: CoefficientFile=CropParameters.csv; CurrentCropName=Maize
        MicroClimate: a_interception=0; b_interception=1; c_interception=0; d_interception=0; SoilHeatFluxFraction=0.4; MinimumHeightDiffForNewLayer=0; NightInterceptionFraction=0.5; ReferenceHeight=2
        BiomassRemovalEvents OnDefoliate: NameOfPlantToRemoveFrom=DEROPAPY; RemovalType=1
        BiomassRemovalEvents OnHarvestAndPrune: RemovalType=2
        BiomassRemovalEvents OnEndCrop: RemovalType=4
        Report Stages
        Manager ReportOnEvents: same as GrapeTesting.Rotation323.Block.ReportOnEvents
        Report: EventNames=[Clock].DoReport
        Report Output
          EventNames:
            [OnHarvestAndPrune].Harvesting
            [OnEndCrop].EndCrop
  Experiment MacadamiaTesting (disabled)
    Factors
      Permutation
        Factor Crop: Specification=[ThisDero].CurrentCropName =  Macadamia
        Factor Location: same as GrapeTesting.Factors.Permutation.Location
        Factor MGMT: same as GrapeTesting.Factors.Permutation.MGMT
    Simulation Rotation315
      Weather: FileName=10731_South_Had_RCPpast.met
      Clock: Start=1985-07-01; End=1995-06-30
      Summary
      SoilArbitrator Soil Arbitrator
      Zone Block: Area=1; Slope=0; AspectAngle=0; Altitude=50
        Manager FactorLabels: same as SimpleIrrigationTest.Rotation2.Block.ManagerFolder.FactorLabels
        Manager Reset on date: same as SimpleIrrigationTest.Rotation2.Block.Reset on date
        Manager AutomaticFertiliser: same as SimpleIrrigationTest.Rotation2.Block.ManagerFolder.AutomaticFertiliser
        Manager AutomaticIrrigation: same as SimpleIrrigationTest.Rotation2.Block.AutomaticIrrigation
        Manager FrostFighting: same as AvocadoTesting.Rotation324.Block.FrostFighting
        Manager WaterStatus: same as SimpleWeatherTest.Rotation3.Block.WaterStatus
        Soil: same as GrapeTesting.Rotation323.Block.Soil
        Plant DEROPAPY
        SurfaceOrganicMatter: InitialResidueName=wheat_stubble; InitialResidueType=wheat; InitialResidueMass=500; InitialStandingFraction=0; InitialCPR=0; InitialCNR=100
        Fertiliser
        Irrigation
        DEROPAPY ThisDero: CoefficientFile=CropParameters.csv; CurrentCropName=Maize
        MicroClimate: a_interception=0; b_interception=1; c_interception=0; d_interception=0; SoilHeatFluxFraction=0.4; MinimumHeightDiffForNewLayer=0; NightInterceptionFraction=0.5; ReferenceHeight=2
        BiomassRemovalEvents OnDefoliate: RemovalType=1
        BiomassRemovalEvents OnHarvestAndPrune: RemovalType=2
        BiomassRemovalEvents OnEndCrop: RemovalType=4
        Report Stages
        Manager ReportOnEvents: same as GrapeTesting.Rotation323.Block.ReportOnEvents
        Report: EventNames=[Clock].DoReport
        Report Output
          EventNames:
            [OnHarvestAndPrune].Harvesting
            [OnEndCrop].EndCrop
  Experiment Blueberry_PhenoTest
    DisabledSimNames=[Blueberry_PhenoTestCropNorthernHighbushLocationNelsonIrrigationIrrig, Blueberry_PhenoTestCropNorthernHighbushLocationGisborneIrrigationRain, Blueberry_PhenoTestCropNorthernHighbushLocationGisborneIrrigationIrrig, Blueberry_PhenoTestCropNorthernHighbushLocationTe PukeIrrigationRain, Blueberry_PhenoTestCropNorthernHighbushLocationKerikeriIrrigationRain, Blueberry_PhenoTestCropNorthernHighbushLocationLincolnIrrigationIrrig, Blueberry_PhenoTestCropNorthernHighbushLocationTe PukeIrrigationIrrig, Blueberry_PhenoTestCropNorthernHighbushLocationKerikeriIrrigationIrrig]
    Factors
      Permutation
        Factor Crop
          CompositeFactor NorthernHighbush
            Specifications=[ThisDero].CurrentCropName =  Blueberry_Northern_Highbush_NZ
        Factor Location
          CompositeFactor Lincoln
            Specifications:
              [Weather].FileName  = Lincoln_WS_1950_2022.met
              [FactorLabels].Script.GCM = Had
              [FactorLabels].Script.RCP = RCPpast
              [FactorLabels].Script.TS = Past
          CompositeFactor Te Puke
            Specifications:
              [Weather].FileName  = Te Puke_1994_2024.met
              [FactorLabels].Script.GCM = Had
              [FactorLabels].Script.RCP = RCPpast
              [FactorLabels].Script.TS = Past
          CompositeFactor Kerikeri
            Specifications:
              [Weather].FileName  = Kerikeri.met
              [FactorLabels].Script.GCM = Had
              [FactorLabels].Script.RCP = RCPpast
              [FactorLabels].Script.TS = Past
          CompositeFactor Gisborne
            Specifications:
              [Weather].FileName  = Gisborne.met
              [FactorLabels].Script.GCM = Had
              [FactorLabels].Script.RCP = RCPpast
              [FactorLabels].Script.TS = Past
          CompositeFactor Nelson
            Specifications:
              [Weather].FileName  = Nelson.met
              [FactorLabels].Script.GCM = Had
              [FactorLabels].Script.RCP = RCPpast
              [FactorLabels].Script.TS = Past
        Factor Irrigation
          CompositeFactor Rain: Specifications=[AutomaticIrrigation].Script.allowIrrigation = FALSE
          CompositeFactor Irrig: Specifications=[AutomaticIrrigation].Script.allowIrrigation = TRUE
    Simulation BlueBerrySimple
      Weather: FileName=Lincoln_WS_1950_2022.met
      Clock: Start=2010-05-01; End=2019-06-30
      Summary
      SoilArbitrator Soil Arbitrator
      Zone Block: Area=1; Slope=0; AspectAngle=0; Altitude=50
        Folder ManagerFolder
          Manager FactorLabels
            AGENT_NO = 999
            Lat = 999
            Lon = 999
            SoilStamp = SiltLoam
            GCM = ERA
            RCP = ERA
            TS = BaseLine
            script: same as in SimpleIrrigationTest.Rotation2.Block.ManagerFolder.FactorLabels
          Manager AutomaticFertiliser
            EachYear = True
            Dates = 30-nov, 15-apr
            UseCritNThreshold = False
            CritNThreshold = 50
            CritNDepth = 75
            Depth = 50
            Amount = 25
            FertiliserType = UreaN
            script: same as in SimpleIrrigationTest.Rotation2.Block.ManagerFolder.AutomaticFertiliser
          Manager WaterStatus
            DepthToMonitorFollowRoots = False
            MinimumDepth = 0
            DepthToMonitor = 600
            script: same as in SimpleIrrigationTest.Rotation2.Block.ManagerFolder.WaterStatus
        Report: EventNames=[Clock].DoReport
        Plant DEROPAPY
        Fertiliser
        SurfaceOrganicMatter: InitialResidueName=wheat_stubble; InitialResidueType=wheat; InitialResidueMass=500; InitialStandingFraction=0; InitialCPR=0; InitialCNR=100
        Irrigation
        DEROPAPY ThisDero: CoefficientFile=CropParametersBlueberryTest.csv; CurrentCropName=Maize
        MicroClimate: a_interception=0; b_interception=1; c_interception=0; d_interception=0; SoilHeatFluxFraction=0.4; MinimumHeightDiffForNewLayer=0; NightInterceptionFraction=0.5; ReferenceHeight=2
        BiomassRemovalEvents OnHarvestAndPrune: NameOfPlantToRemoveFrom=DEROPAPY; RemovalType=0
          BiomassRemovalFractions:
            PlantName  OrganName  TypeString  LiveToRemove  DeadToRemove  LiveToResidue  DeadToResidue
            DEROPAPY   Leaf       Cutting     0             0             0              0
            DEROPAPY   Root       Cutting     0             0             0              0
            DEROPAPY   Trunk      Cutting     0             0             0              0
            DEROPAPY   Product    Cutting     1             1             0              0
        BiomassRemovalEvents OnEndCrop: NameOfPlantToRemoveFrom=DEROPAPY; RemovalType=4
          BiomassRemovalFractions:
            PlantName  OrganName  TypeString  LiveToRemove  DeadToRemove  LiveToResidue  DeadToResidue
            DEROPAPY   Leaf       EndCrop     0             0             0              0
            DEROPAPY   Root       EndCrop     0             0             0              0
            DEROPAPY   Trunk      EndCrop     0             0             0              0
            DEROPAPY   Product    EndCrop     1             1             0              0
        Manager ReportOnEvents
```csharp
using Models.Core;
using System;
using Models.PMF.Phen;

namespace Models
{
    [Serializable]
    public class Script : Model
    {
        //> Links to other Apsim models
        [Link(ByName = true)] Report stages; 
        
        public string StageName {get; set;}
        
        private void setAndOutput(PhaseChangedType change)
        {
           StageName = change.StageName;
    	   stages.DoOutput();
        }
        
        [EventSubscribe("PhaseChanged")]
        private void OnPhaseChanged(object sender, PhaseChangedType change)
        {
        	if (change.StageName == "Waiting") {setAndOutput(change);}
        	if (change.StageName == "StartGrowth") {setAndOutput(change);}
        	if (change.StageName == "FullCanopy") {setAndOutput(change);}
        	if (change.StageName == "StartSenescence") {setAndOutput(change);}
        	if (change.StageName == "Maturity") {setAndOutput(change);}
        	if (change.StageName == "ReStart") {setAndOutput(change);}
        	if (change.StageName == "StartEndo") {setAndOutput(change);}
        	if (change.StageName == "StartEco") {setAndOutput(change);}
        }
        
        [EventSubscribe("ParallelPhaseChanged")]
        private void OnParallelPhaseChanged(object sender, PhaseChangedType change)
        {
        	if (change.StageName == "StartFlowering"){setAndOutput(change);}
        	if (change.StageName == "StartReproductive"){setAndOutput(change);}
        	if (change.StageName == "EndReproductive"){setAndOutput(change);}
        }
	}
}
```
        Manager Reset on date
          ResetWater = True
          ResetNutrients = True
          ResetSOM = True
          script: same as in SimpleIrrigationTest.Rotation2.Block.Reset on date
        Report Stages
        Soil: Latitude=0; Longitude=0
          LayerStructure: Thickness=[200, 200, 200, 200, 200, 200, 300, 300, 400, 800]
          Chemical: Thickness=[100, 200, 300, 300, 300, 300]; PH=[6.6, 6.2, 5.7, 5.5, 5.5, 5.5]; PHUnits=Water
          Water: Thickness=[300, 300, 300, 300, 300, 300, 1200]; InitialValues=[0.3, 0.21, 0.18, 0.17, 0.17, 0.17, 0.17]; FilledFromTop=false
          WaterBalance SoilWater: SummerDate=1-Nov; SummerU=9; SummerCona=4.4; WinterDate=1-Apr; WinterU=9; WinterCona=4.4; DiffusConst=88; DiffusSlope=35.4; Salb=0.3; CN2Bare=68; CNRed=20; CNCov=0.8; DischargeWidth=0; CatchmentArea=0; PSIDul=-100
            Thickness  SWCON  KLAT
            300        0.55   0
            300        0.55   0
            300        0.55   0
            300        0.55   0
            300        0.1    0
            300        0.02   0
            400        0.02   0
            800        0      0
          Organic: FOMCNRatio=30; CarbonUnits=Total
            Thickness  Carbon  SoilCNRatio  FBiom  FInert  FOM
            100        1.82    11.5         0.025  0.3     1243.931
            200        1.47    11.5         0.025  0.4     833.832
            300        1.2     11.5         0.015  0.75    457.617
            300        1.03    11.5         0.01   0.9     251.145
            300        0.47    11.5         0.01   0.96    137.831
            300        0.47    11.5         0.01   0.96    75.644
          OutputLayers: Thickness=[300, 300, 300, 300, 300, 300]
          Solute NO3: Thickness=[100, 200, 300, 300, 300, 300]; InitialValues=[217, 15, 1.66667, 1.66667, 0, 0]; InitialValuesUnits=ppm; WaterTableConcentration=0; D0=0; DepthConstant=0; MaxDepthSoluteAccessible=0; RunoffEffectivenessAtMovingSolute=0; MaxEffectiveRunoff=0
          Solute NH4: Thickness=[100, 200, 300, 300, 300, 300]; InitialValues=[0, 0, 0, 0, 0, 0]; InitialValuesUnits=ppm; WaterTableConcentration=0; D0=0; DepthConstant=0; MaxDepthSoluteAccessible=0; RunoffEffectivenessAtMovingSolute=0; MaxEffectiveRunoff=0
          Solute Urea: Thickness=[100, 200, 300, 300, 300, 300]; InitialValues=[0, 0, 0, 0, 0, 0]; InitialValuesUnits=kg/ha; WaterTableConcentration=0; D0=0; DepthConstant=0; MaxDepthSoluteAccessible=0; RunoffEffectivenessAtMovingSolute=0; MaxEffectiveRunoff=0
          Physical
            Thickness  BD  AirDry  LL15  DUL  SAT  KS
            300        1   0.15    0.15  0.3  0.4  100
            300        1   0.15    0.15  0.3  0.4  100
            300        1   0.15    0.15  0.3  0.4  50
            300        1   0.15    0.15  0.3  0.4  40
            300        1   0.15    0.15  0.3  0.4  40
            300        1   0.15    0.15  0.3  0.4  40
            1200       1   0.15    0.15  0.3  0.4  40
            SoilCrop DEROPAPYSoil: LL=[0.15, 0.15, 0.15, 0.15, 0.15, 0.15, 0.15]; KL=[1, 1, 1, 1, 1, 1, 1]; XF=[1, 1, 1, 1, 1, 1, 1]
          Nutrient
          SoilTemperature Temperature: InteractionsPerDay=8
        Manager FrostFighting
          ProtectionAvaialable = False
          script: same as in SimpleIrrigationTest.Rotation2.Block.FrostFighting
        Manager AutomaticIrrigation
          allowIrrigation = True
          seasonStart = 1-Aug
          seasonEnd = 30-May
          seasonsAllocation = 1000
          triggerDeficit = 70
          targetDeficit = 95
          returndays = 3
          maximumAmount = 30
          depthPAWC = 650
          script: same as in SimpleIrrigationTest.Rotation2.Block.AutomaticIrrigation
  Experiment Blueberry_MultiYearTest
    Factors
      Permutation
        Factor Crop
          CompositeFactor NorthernHighbush
            Specifications=[ThisDero].CurrentCropName =  Blueberry_Northern_Highbush_NZ
        Factor Location
          CompositeFactor Lincoln
            Specifications:
              [Weather].FileName  = Lincoln_WS_1950_2022.met
              [FactorLabels].Script.GCM = Had
              [FactorLabels].Script.RCP = RCPpast
              [FactorLabels].Script.TS = Past
          CompositeFactor Te Puke
            Specifications:
              [Weather].FileName  = Te Puke_1994_2024.met
              [FactorLabels].Script.GCM = Had
              [FactorLabels].Script.RCP = RCPpast
              [FactorLabels].Script.TS = Past
    Simulation BlueberryCrop
      Weather: FileName=Lincoln_WS_1950_2022.met
      Clock: Start=2000-05-01; End=2005-06-30
      Summary
      SoilArbitrator Soil Arbitrator
      Zone Block: Area=1; Slope=0; AspectAngle=0; Altitude=50
        Manager FactorLabels: same as Blueberry_PhenoTest.BlueBerrySimple.Block.ManagerFolder.FactorLabels
        Manager Reset on date: same as Blueberry_PhenoTest.BlueBerrySimple.Block.Reset on date
        Manager AutomaticFertiliser
          EachYear = True
          Dates = 30-nov, 15-apr
          UseCritNThreshold = True
          CritNThreshold = 50
          CritNDepth = 75
          Depth = 50
          Amount = 25
          FertiliserType = UreaN
          script: same as in SimpleIrrigationTest.Rotation2.Block.ManagerFolder.AutomaticFertiliser
        Manager FrostFighting
          ProtectionAvaialable = True
          script: same as in SimpleIrrigationTest.Rotation2.Block.FrostFighting
        Manager AutomaticIrrigation: same as Blueberry_PhenoTest.BlueBerrySimple.Block.AutomaticIrrigation
        Manager WaterStatus
          DepthToMonitorFollowRoots = False
          MinimumDepth = 0
          DepthToMonitor = 600
          script: same as in SimpleWeatherTest.Rotation3.Block.WaterStatus
        Soil: Latitude=0; Longitude=0
          LayerStructure: Thickness=[200, 200, 200, 200, 200, 200, 300, 300, 400, 800]
          Chemical: Thickness=[100, 200, 300, 300, 300, 300]; PH=[6.6, 6.2, 5.7, 5.5, 5.5, 5.5]; PHUnits=Water
          Water: Thickness=[300, 300, 300, 300, 300, 300, 1200]; InitialValues=[0.25, 0.18, 0.17, 0.17, 0.17, 0.17, 0.17]; FilledFromTop=true
          WaterBalance SoilWater: same as Blueberry_PhenoTest.BlueBerrySimple.Block.Soil.SoilWater
          Organic: same as Blueberry_PhenoTest.BlueBerrySimple.Block.Soil.Organic
          OutputLayers: Thickness=[300, 300, 300, 300, 300, 300]
          Solute NO3: same as Blueberry_PhenoTest.BlueBerrySimple.Block.Soil.NO3
          Solute NH4: same as Blueberry_PhenoTest.BlueBerrySimple.Block.Soil.NH4
          Solute Urea: same as Blueberry_PhenoTest.BlueBerrySimple.Block.Soil.Urea
          Nutrient
          Physical
            Thickness  ParticleSizeSand  ParticleSizeSilt  ParticleSizeClay  Rocks     BD  AirDry  LL15  DUL   SAT  KS
            300        5                 65                30                0.309221  1   0.15    0.15  0.25  0.4  100
            300        5                 65                30                0.309221  1   0.15    0.15  0.18  0.4  100
            300        5                 65                30                0.309221  1   0.15    0.15  0.17  0.4  50
            300        5                 65                30                0.309221  1   0.15    0.15  0.17  0.4  40
            300        5                 65                30                0.309221  1   0.15    0.15  0.17  0.4  40
            300        5                 65                30                0.309221  1   0.15    0.15  0.17  0.4  40
            1200       5                 65                30                0.309221  1   0.15    0.15  0.17  0.4  40
            Rocks, ParticleSizeSand, ParticleSizeSilt, ParticleSizeClay source: Calculated
            SoilCrop DEROPAPYSoil: LL=[0.15, 0.15, 0.15, 0.15, 0.15, 0.15, 0.15]; KL=[1, 1, 1, 1, 1, 1, 1]; XF=[1, 1, 1, 1, 1, 1, 1]
          SoilTemperature Temperature: InteractionsPerDay=8
        SurfaceOrganicMatter: InitialResidueName=wheat_stubble; InitialResidueType=wheat; InitialResidueMass=500; InitialStandingFraction=0; InitialCPR=0; InitialCNR=100
        Plant DEROPAPY
        Fertiliser
        Irrigation
        DEROPAPY ThisDero: CoefficientFile=CropParametersBlueberryTest.csv; CurrentCropName=Maize
        MicroClimate: a_interception=0; b_interception=1; c_interception=0; d_interception=0; SoilHeatFluxFraction=0.4; MinimumHeightDiffForNewLayer=0; NightInterceptionFraction=0.5; ReferenceHeight=2
        BiomassRemovalEvents OnHarvestAndPrune: NameOfPlantToRemoveFrom=DEROPAPY; RemovalType=2
        BiomassRemovalEvents OnEndCrop: NameOfPlantToRemoveFrom=DEROPAPY; RemovalType=4
        Report Output: EventNames=[Clock].EndOfYear
        Report: EventNames=[Clock].DoReport
          VariableNames:
            [AutomaticIrrigation].Script.SeasonAppliedAmount
            [FrostFighting].Script.FrostDays
            [FrostFighting].Script.MostSevereFrost
            [Clock].Today
            [Deropapy].AboveGround.Wt
            [Deropapy].Arbitrator.Carbon.TotalFixationSupply
            [Deropapy].Arbitrator.Carbon.TotalPlantDemand
            [Deropapy].Arbitrator.Nitrogen.TotalPlantDemand
            [Deropapy].Arbitrator.Nitrogen.TotalUptakeSupply
            [Deropapy].CoverGreen
            [Deropapy].Height
            [Deropapy].Leaf.Canopy.CoverDead
            [Deropapy].Leaf.Canopy.CoverGreen
            [Deropapy].Leaf.Canopy.CoverTotal
            [Deropapy].Leaf.Canopy.DeadAreaIndex
            [Deropapy].Leaf.Canopy.DeadAreaIndex.FrostedLAI
            [Deropapy].Leaf.Canopy.DeadAreaIndex.AgeSenescence
            [Deropapy].Leaf.Canopy.GreenAreaIndex
            [Deropapy].Leaf.Canopy.GreenAreaIndex.SeasonalDeath
            [Deropapy].Leaf.Canopy.GreenAreaIndex.SeasonalGrowth
            [Deropapy].Leaf.Canopy.GreenAreaIndex.WinterBase
            [Deropapy].Leaf.Canopy.LAI
            [Deropapy].Leaf.Canopy.LAIDead
            [Deropapy].Leaf.Canopy.LAITotal
            [Deropapy].Leaf.Canopy.RadiationIntercepted
            [Deropapy].Leaf.Carbon.Demands.Total
            [Deropapy].Leaf.Carbon.Supplies.Total
            [DEROPAPY].Leaf.FrostFraction
            [Deropapy].Leaf.Live.Carbon.Storage
            [Deropapy].Leaf.Live.Carbon.Structural
            [Deropapy].Leaf.N
            [Deropapy].Leaf.Nitrogen.Demands.Total
            [Deropapy].Leaf.Photosynthesis
            [Deropapy].Leaf.Photosynthesis.FCO2
            [Deropapy].Leaf.Photosynthesis.FN
            [Deropapy].Leaf.Photosynthesis.FT
            [Deropapy].Leaf.Photosynthesis.FVPD
            [Deropapy].Leaf.Photosynthesis.FW
            [Deropapy].Leaf.TotalCarbonDemand
            [Deropapy].Leaf.Wt
            [Deropapy].Phenology.AccumulatedEmergedTT
            [Deropapy].Phenology.CurrentPhaseName
            [Deropapy].Phenology.CurrentStageName
            [DeroPapy].Phenology.Emerged
            [DeroPapy].Phenology.Flowering.IsInPhase
            [DEROPAPY].Phenology.Photoperiod
            [DEROPAPY].Phenology.Reproductive.FractionComplete
            [DeroPapy].Phenology.Reproductive.IsInPhase
            [DEROPAPY].Phenology.Reproductive.ProgressThroughPhase
            [DEROPAPY].Phenology.Dormant.ProgressThroughPhase
            [Deropapy].Phenology.Stage
            [Deropapy].Phenology.ThermalTime
            [DeroPapy].Phenology.Vegetative.IsInPhase
            [Deropapy].Product.Carbon.Demands.Total
            [Deropapy].Product.FlowerNumber
            [DEROPAPY].Product.FreshWeight
            [DEROPAPY].Product.Live.Wt
            [Deropapy].Product.N
            [Deropapy].Product.Nitrogen.Demands.Total
            [Deropapy].Product.TotalCarbonDemand.TotalDMDemand
            [Deropapy].Product.TotalCarbonDemand.TotalDMDemand.AllometricDemand
            [Deropapy].Product.TotalCarbonDemand.TotalDMDemand.PotentialFruitGrowth
            [DEROPAPY].Product.TotalCarbonDemand.TotalDMDemand.PotentialFruitGrowth
            [DEROPAPY].Product.TotalCarbonDemand.TotalDMDemand.PotentialFruitGrowth.RelativeFruitMass
            [Deropapy].Product.Wt
            [Deropapy].Product.FreshWeightPerFruit
            [Deropapy].Product.DryWeightPerFruit
            [Deropapy].Product.Carbon.Demands.Total
            [Deropapy].Product.Carbon.DemandsAllocated.Total
            [DEROPAPY].Product.FlowerNumber.StressDuringFlowering.MaxTempStress
            [DEROPAPY].Product.FlowerNumber.StressDuringFlowering.MinTempStress
            [DEROPAPY].Product.FlowerNumber.StressDuringFlowering.WaterStress
            [Deropapy].RelativeAnnualDimension
            [Deropapy].RelativeSeasonalDimension
            [Deropapy].Root.Carbon.Demands.Total
            [Deropapy].Root.N
            [Deropapy].Root.Network.Depth
            [Deropapy].Root.Network.klByLayer
            [Deropapy].RootUptakesArbitrator.NitrogenUptake.Gpm2
            [Deropapy].RootUptakesArbitrator.WaterUptake.MM
            [Deropapy].Root.Nitrogen.Demands.Total
            [Deropapy].Root.Senesced.Weight.Total
            [Deropapy].Root.TotalCarbonDemand
            [Deropapy].Root.Wt
            [Deropapy].Total.N
            [Deropapy].Total.Wt
            [Deropapy].Trunk.Carbon.Demands.Total
            [Deropapy].Trunk.N
            [Deropapy].Trunk.Nitrogen.Demands.Total
            [Deropapy].Trunk.TotalCarbonDemand
            [Deropapy].Trunk.Wt
            [Deropapy].Width
            [Irrigation].IrrigationApplied
            [Weather].MeanT
            [Weather].MaxT
            [Weather].MinT
            [Weather].Rain
            sum([NO3].kgha + [NH4].kgha + [Urea].kgha)
            sum([Water].PAW)
            sum([Water].PAWmm)
            [Deropapy].Leaf.Canopy.PotentialEP
            [Deropapy].Leaf.Canopy.Transpiration
            [Soil].Water.Volumetric
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