Simulations: Version=195
  Memo TitlePage
    # The STRUM model
    A simple representation of the shape and mass of rows of fruit trees which can be used in a multizone simulation with a row of mown grass to model the water N and C balance of an orchard system.
  Folder Replacements
    Plant STRUM: PlantType=STRUM
      Memo TitlePage
        # STRUM

        This model has been built using the Plant Modelling Framework (PMF) of [brown_plant_2014] to provide a simple representation of perennial tree and vine crops.  Its scope is intended for use in water and nitrogen balance studies where the focus is on soil processes and a very simple crop is adequate.  The model has simple functions for estimating the growht and nitrogen uptake of different organs and anohter simple function for predicting canopy size so water uptake can be predicted.

        The model has currently been parameterised and tested for 4 genotpes; Apple, Kiwifruit, Grape and Peach.

        STRUM has a simple phenology model that breaks the annual growth cycle into 4 phases:

           1. The <b>Dormancy</b> phase when the tree is a bare trunk, using no water, growing no biomass and taking up no Nitrogen
           2. The <b>CanopyExpansion</b> phase which occurs in the spring when the bulk of biomass assimilation is partitioned to the new leaves with smaller proportions going to trunk and root growth
           3. The <b>FruitGrowth</b> phase where the bulk of biomass assimilation is partitioned to the growing fruit with smaller proportions going to leaf, trunk and root growth
           4. The <b>LeafFall</b> phase where any further biomass assimilated is partitioned to the trunk and roots.

        As infered above the STRUM consists of 4 organs:

           1. <b>Leaf</b> which ls represented with the Simpleleaf class and provides estimates of:
            - Leaf area index that the MicroClimate model uses to estimate the radiation of the tree canopy and the grass in the underlying alley
            - Water uptake demand that the soil arbitrator uses to estimate soil water extraction
            - Photosynthesis estimates (Using radiation use efficiency) to drive tree biomass production
            - Biomass demand that is used to grow leaf biomass and determine N demand for leaf growth
           2. <b>Fruit</b> which represents the biomass and nitrogen that may be removed from the orchard each year as harvested product
           3. <b>Trunk</b> which represents the perennial biomass of the trees and will grow a small amount each year but is mostly pruned out at the end of the year and may be returned to the soil surface.
           4. <b>Root</b> which extracts water and nitrogen from the soil for plant growth, grows a small amount of biomass each year and senesesses a proportion of this to the soil.

        #Inclusion in APSIM simulations
        A STRUM crop is included in a simulation the same as any other APSIM crop

         * The STRUM object needs to be dragged or copied from the Crop folder in the tool box into the field of your simulation.
         * It is then planted with a sowing rule
        ~~~
        STRUM.Sow(cultivar: StaticCrop, population: 1, depth: 10, rowSpacing: 150);
        ~~~

          * Note that the SimpleTreeModel has no notion of population or rowSpacing but these parameters are required by the Sow method so filler values are provided
          * `depth` in the Sow arguement is the depth that the crop is sown at.  In most cases the Sow argument is used to initialise an established tree crop so sow depth arguement is used to set the root depth of the trees.  This depth should be set to the rooting depth that is expected as roots will not grow during the simulation.

        #Representing and Orchard System
         * While the STRUM model will run as a stand alone model, in most cases fruit trees and vines are grown in rows with a grass or herb ley growing in the alleys.  As such it is important to set up a simulation with two rectangular zones, one with the fruit tree established within and another with the pasture or herb ley established.  In most cases a SPRUM is adequate to represent the energy, water and nitrogen balance of the alleys.
         * As part of the development of this crop model the Microclimate radiation arbitration was improved to be suitable for fruit crop set ups.  This involved modifying the strip crop radiation interception code to allow:
           1. The entire depth of the tallest (tree) canopy to be taller than the grass growing in the alleys
           2. The width of the canopy of the trees to exceed the width of the zone that the trees are planted in so they may intercept more radiation that would be possible if they were kept within the spatial confines of the row zone
        ![Schematic of radiation interception scheme as modeled for tree row crops](RadInt.jpg)

        #Further development requirements
        The greatest effort has been spent on getting the models water balance predictions working to an adequate standard.  This included running an optimisation procedure against the validation data set to obtain the most suitalbe parameters for water extraction parameters (kl pattern through the soil) and water demand parameters (max canopy conductance and conductance response to light) as well as weather the roots of the alley should be allowed to grow sideways into the row.
        The model has been set up to predict biomass accumulation and N uptake but the parameters for this functionality have not be determined from observed or published data so further work is required here.  The rates of senescence of the FruitTree root system and the contribution of the mown grass in the alley to the N and C balance have not yet been established correctly.
        Kl patterns are currently parameterised in a manager script (so they could be optimised) this needs to be moved into model set up.
        Optimisation was not able to give good fits for both row and alley zones for grape suggesting the kl patterns differ between alley and row.  Further investigation is required to better determine spatial water extraction parameters.
      BiomassArbitrator Arbitrator
        Memo
          The partitioning of biomass to fodder beet organs follows a "Relative Allocation" routine (see Arbitrator module documentation) guided by coefficients derived from the October sowing date data of the test dataset
        PlantNutrientsDelta Carbon
        PlantNutrientsDelta Nitrogen
      RootUptakesArbitrator
      Phenology
        Constant ThermalTime: FixedValue=1; Units=days
        GenericPhase ZeroPhase: Start=ModelInitialisation; End=Dormant; IsEmerged=false
          Memo
            It is necessary to have a phase before Dormancy otherwise the rewind doesn't work
          VariableReference Progression: VariableName=[Phenology].ThermalTime
          Constant Target: FixedValue=0; Units=oCd
        DAWSPhase SpringDormancy: Start=Dormant; End=BudBreak; IsEmerged=true; DAWStoProgress=0
        DAWSPhase CanopyExpansion: Start=BudBreak; End=StartFullCanopy; IsEmerged=true; DAWStoProgress=0
        DAWSPhase FullCanopy: Start=StartFullCanopy; End=StartLeafFall; IsEmerged=true; DAWStoProgress=0
        DAWSPhase LeafFall: Start=StartLeafFall; End=BareTree; IsEmerged=true; DAWStoProgress=0
        DAWSPhase WinterDormancy: Start=BareTree; End=SpringDormant; IsEmerged=true; DAWStoProgress=365
        GotoPhase: Start=BareTree; IsEmerged=false; PhaseNameToGoto=SpringDormancy; RemovalType=3
        GenericPhase PlaceHolderPhase: Start=AlreadyGoneDormant; End=Eternity; IsEmerged=true
          Memo
            phase after dormancy so we can accumulate things after that
          VariableReference Progression: VariableName=[Phenology].ThermalTime
          Constant Target: FixedValue=1000; Units=oCd
        Age
        AddFunction AgeDecimal
          VariableReference AgeInt: VariableName=[Phenology].Age
          DivideFunction Decimal
            VariableReference DOY: VariableName=[Weather].DaysSinceWinterSolstice
            Constant DaysInAYear: FixedValue=365
        AccumulateFunctionGeneral DaysSinceFlowering: AccumulateEventName=[Clock].StartOfDay; EndEventName=[Pick].Cutting; StartDate=15-Oct; FractionRemovedOnStage=0; FractionRemovedOnEvent=0; FractionRemovedOnDate=0; FractionRemovedOnPrune=1
          Constant Day: FixedValue=1; Units=d
      Organ Root: Cconc=0.4; IsAboveGround=false
        Constant InitialWt: FixedValue=0.5; Units=g/m2
        Respiration
          Constant MaintenanceRespirationFunction: FixedValue=0; Units=0-1
          NutrientFunctions AssimilationCostFunctions
            Constant C: FixedValue=0; Units=0-1
            Constant N: FixedValue=0; Units=0-1
            Constant P: FixedValue=0; Units=0-1
            Constant K: FixedValue=0; Units=0-1
          NutrientFunctions MobilisationCostFunctions: same as Replacements.STRUM.Root.Respiration.AssimilationCostFunctions
        MultiplyFunction senescenceRate
          ExponentialFunction: A=0; B=1; C=1
            DivideFunction
              SubtractFunction
                SoilTemperatureDepthFunction: Depth=100
                Constant: FixedValue=20
              Constant: FixedValue=10
          Constant Coefficient: FixedValue=0.015
        Constant detachmentRate: FixedValue=0.1; Units=/d
        OrganNutrientDelta Carbon: MaxCDelta=0
          OrganNutrientSupplies Supplies: Fixation=0; Uptake=0
            NutrientPoolsState ReAllocation
            NutrientPoolsState ReTranslocation
          NutrientDemandFunctions DemandFunctions
            PhaseLookupValue Structural: Start=BudBreak; End=StartLeafFall
              VariableReference Structural: VariableName=[STRUM].Root.TotalCarbonDemand
            Constant Metabolic: FixedValue=0
            Constant Storage: FixedValue=0
            Constant QStructuralPriority: FixedValue=1
            Constant QMetabolicPriority: FixedValue=0
            Constant QStoragePriority: FixedValue=0
          NutrientSupplyFunctions SupplyFunctions
            Constant Fixation: FixedValue=0
            Constant Uptake: FixedValue=0
            NutrientPoolFunctions ReAllocation
              Constant Structural: FixedValue=0
              Constant Metabolic: FixedValue=0
              Constant Storage: FixedValue=0
            NutrientPoolFunctions ReTranslocation: same as Replacements.STRUM.Root.Carbon.SupplyFunctions.ReAllocation
          NutrientProportionFunctions PoolFractions
            Constant Structural: FixedValue=1
            Constant Metabolic: FixedValue=0
            Constant Storage: FixedValue=0
        OrganNutrientDelta Nitrogen: MaxCDelta=0
          OrganNutrientSupplies Supplies: Fixation=0; Uptake=0
            NutrientPoolsState ReAllocation
            NutrientPoolsState ReTranslocation
          NutrientDemandFunctions DemandFunctions
            DeficitDemandFunction Structural
            DeficitDemandFunction Storage
            DeficitDemandFunction Metabolic
            Constant QStructuralPriority: FixedValue=1
            Constant QMetabolicPriority: FixedValue=1
            Constant QStoragePriority: FixedValue=0
          NutrientSupplyFunctions SupplyFunctions: same as Replacements.STRUM.Root.Carbon.SupplyFunctions
          NutrientConcentrationFunctions ConcFunctions
            Constant Maximum: FixedValue=0
              Memo Param value set at establishment
                STRUM calculates this parameter value during run-time when the crop is established from parameter values set in the relevent STRUMtree object
            VariableReference Critical: VariableName=[Root].Nitrogen.ConcFunctions.Maximum
            VariableReference Minimum: VariableName=[Root].Nitrogen.ConcFunctions.Maximum
        RootNetwork Network
          RootShapeCylinder RootShape
          MultiplyFunction klModifier
            KLModiferVsDepthFunction DepthReduction
              VariableReference LayerDepth: VariableName=[Physical].DepthMidPoints
              VariableReference MaximumRootDepth: VariableName=[Root].Network.MaximumRootDepth
            Constant SurfaceKL: FixedValue=0.06
          Constant SoilWaterEffect: FixedValue=1; Units=0-1
          Constant MaximumRootDepth: FixedValue=3000; Units=mm
          DivideFunction rootFrontVelocity
            VariableReference MaxRootDepth: VariableName=[Root].Network.MaximumRootDepth
            MultiplyFunction RootGrowthDuration
              Constant YearsToMaxDepth: FixedValue=0; Units=years
                Memo Param value set at establishment
                  STRUM calculates this parameter value during run-time when the crop is established from parameter values set in the relevent STRUMtree object
              Constant DaysInAYear: FixedValue=365
          Constant KNO3: FixedValue=0.02
          Constant KNH4: FixedValue=0
          LinearInterpolationFunction NUptakeSWFactor
            XYPairs: X=[0, 1]; Y=[0, 1]
            VariableReference XValue: VariableName=[Root].Network.RWC
          Constant SpecificRootLength: FixedValue=105; Units=m/g
          Constant RootDepthStressFactor: FixedValue=1
          Constant MaxDailyNUptake: FixedValue=10; Units=kg/ha
        MultiplyFunction TotalCarbonDemand
          MultiplyFunction TotalDMDemand
            VariableReference PotentialPhotosynthesis: VariableName=[Leaf].Photosynthesis
            Constant PartitionFraction: FixedValue=0
          VariableReference CarbonConc: VariableName=[Root].Cconc
        BiomassRemoval BiomassRemovalDefaults: HarvestFractionLiveToRemove=0; HarvestFractionDeadToRemove=0; HarvestFractionLiveToResidue=0; HarvestFractionDeadToResidue=0
      Organ Leaf: Cconc=0.4; IsAboveGround=true
        Constant InitialWt: FixedValue=0; Units=g/m2
        Respiration: same as Replacements.STRUM.Root.Respiration
        AddFunction senescenceRate
          PhaseLookup DecidiousSensecence
            PhaseLookupValue LeafFall: Start=StartLeafFall; End=BareTree
              MultiplyFunction
                Constant Switch: FixedValue=1
                ProtectedDivideFunction: NumeratorErrVal=0; DenominatorErrVal=0
                  BoundFunction LAIReduction
                    Constant Upper: FixedValue=10000; Units=0-1
                    Constant Lower: FixedValue=0; Units=0-1
                    MultiplyFunction LeafAreaLoss
                      DeltaFunction DeltaLeafArea
                        VariableReference Integral: VariableName=[STRUM].Leaf.Canopy.GreenAreaIndex
                      Constant Inverter: FixedValue=-1; Units=0-1
                  HoldFunction LAIatStartLeafFall: WhenToHold=StartLeafFall
                    VariableReference LAI: VariableName=[Leaf].Canopy.GreenAreaIndex
          MultiplyFunction EvergreenSenescence
            Constant Coefficient: FixedValue=0.015
            ExponentialFunction: same as Replacements.STRUM.Root.senescenceRate.ExponentialFunction
        Constant detachmentRate: FixedValue=0.05; Units=/d
        OrganNutrientDelta Carbon: MaxCDelta=0
          OrganNutrientSupplies Supplies: Fixation=0; Uptake=0
            NutrientPoolsState ReAllocation
            NutrientPoolsState ReTranslocation
          NutrientDemandFunctions DemandFunctions
            PhaseLookupValue Structural: Start=BudBreak; End=BareTree
              VariableReference Structural: VariableName=[STRUM].Leaf.TotalCarbonDemand
            Constant Metabolic: FixedValue=0
            PhaseLookupValue Storage: Start=BudBreak; End=StartLeafFall
              VariableReference Everything: VariableName=[STRUM].Leaf.Photosynthesis
            Constant QStructuralPriority: FixedValue=1
            Constant QMetabolicPriority: FixedValue=0
            Constant QStoragePriority: FixedValue=0
          NutrientSupplyFunctions SupplyFunctions
            MultiplyFunction Fixation
              VariableReference Fixation: VariableName=[Leaf].Photosynthesis
              VariableReference Cconc: VariableName=[Leaf].Cconc
            Constant Uptake: FixedValue=0
            NutrientPoolFunctions ReAllocation: same as Replacements.STRUM.Root.Carbon.SupplyFunctions.ReAllocation
            NutrientPoolFunctions ReTranslocation
              Constant Structural: FixedValue=0
              Constant Metabolic: FixedValue=0
              MultiplyFunction Storage
                VariableReference Storage: VariableName=[Leaf].Live.Carbon.Storage
                Constant Fraction: FixedValue=0
          NutrientProportionFunctions PoolFractions: same as Replacements.STRUM.Root.Carbon.PoolFractions
        OrganNutrientDelta Nitrogen: MaxCDelta=0
          OrganNutrientSupplies Supplies: Fixation=0; Uptake=0
            NutrientPoolsState ReAllocation
            NutrientPoolsState ReTranslocation
          NutrientDemandFunctions DemandFunctions
            DeficitDemandFunction Structural
            DeficitDemandFunction Metabolic
            DeficitDemandFunction Storage
            Constant QStructuralPriority: FixedValue=56.642
            Constant QMetabolicPriority: FixedValue=56.642
            Constant QStoragePriority: FixedValue=20.4379
          NutrientSupplyFunctions SupplyFunctions: same as Replacements.STRUM.Root.Carbon.SupplyFunctions
          NutrientConcentrationFunctions ConcFunctions
            AddFunction Maximum
              VariableReference MaxNConcAtStartLeafFall: VariableName=[Leaf].MaxNConcAtStartLeafFall
              MultiplyFunction EarlyNConcElevation
                SubtractFunction
                  Constant YoungLeafNconc: FixedValue=0.04
                  VariableReference MaxNConcAtStartLeafFall: VariableName=[Leaf].MaxNConcAtStartLeafFall
                LinearInterpolationFunction DilutionCurve
                  XYPairs: X=[1, 3, 4, 5, 6, 7, 8]; Y=[1, 1, 0.1, 0.02, 0, 0, 0]
                  VariableReference XValue: VariableName=[Phenology].Stage
            MultiplyFunction Critical
              Constant StructuralNFactor: FixedValue=0.6
              VariableReference MaxNConcAtStartLeafFall: VariableName=[Leaf].MaxNConcAtStartLeafFall
            MultiplyFunction Minimum
              Constant StructuralNFactor: FixedValue=0.6
              VariableReference MaxNConcAtStartLeafFall: VariableName=[Leaf].MaxNConcAtStartLeafFall
        EnergyBalance Canopy: Albedo=0.18; Gsmax350=0; R50=0; KDead=0; LAIDead=0
          LinearInterpolationFunction FRGRer
            XYPairs: X=[0, 0.8, 0.9, 1]; Y=[1, 1, 0.5, 0.5]
            VariableReference XValue: VariableName=[Leaf].Fn
          StomatalConductanceCO2Modifier
            VariableReference PhotosynthesisCO2Modifier: VariableName=[Leaf].Photosynthesis.FCO2
          VariableReference Tallness: VariableName=[STRUM].Height
          SubtractFunction Deepness
            VariableReference Tallness: VariableName=[STRUM].Height
            VariableReference CanopyBase: VariableName=[STRUM].Height.CanopyBaseHeight
          Constant DeadAreaIndex: FixedValue=0; Units=m^2/m^2
          AddFunction GreenAreaIndex
            MultiplyFunction Winter
              Constant BaseArea: FixedValue=0; Units=m2/m2
              VariableReference RelativeAnnualDimension: VariableName=[STRUM].RelativeAnnualDimension
            MultiplyFunction SeasonalGrowth
              Constant AnnualDelta: FixedValue=0; Units=m2/m2
              VariableReference RelativeAnnualDimension: VariableName=[STRUM].RelativeAnnualDimension
              LinearInterpolationFunction RelativeSeasonalDimension
                XYPairs: X=[3, 3.2, 3.5, 4, 5, 6]; Y=[0, 0.1, 0.5, 0.99, 1, 0]
                VariableReference XValue: VariableName=[Phenology].Stage
              Constant FrostFactor: FixedValue=1
          MultiplyFunction GreenExtinctionCoefficient
            Constant UnstressedCoeff: FixedValue=0
              Memo Param value set at establishment
                SCRUM calculates this parameter value during run-time when the crop is established from parameter values set in the relevent SCRUMcrop and SCRUMmanagement objects
            LinearInterpolationFunction WaterStressFactor
              XYPairs: X=[0.4, 1]; Y=[0.2, 1]
              VariableReference XValue: VariableName=[Leaf].Canopy.Fw
          Constant DeadExtinctionCoefficient: FixedValue=0
          VariableReference Wideness: VariableName=[STRUM].Width
        RUEModel Photosynthesis
          Constant RUE: FixedValue=1.2
          Constant FVPD: FixedValue=1
          LinearInterpolationFunction Fw
            XYPairs: X=[0, 0.8]; Y=[0, 1]
            VariableReference XValue: VariableName=[Leaf].Canopy.Fw
          WeightedTemperatureFunction FT: MaximumTemperatureWeighting=0.75
            XYPairs: X=[5, 20, 25, 40]; Y=[0, 1, 1, 0]
          RUECO2Function FCO2: PhotosyntheticPathway=C3
          VariableReference RadnInt: VariableName=[Leaf].Canopy.RadiationIntercepted
          Constant FN: FixedValue=1
        MultiplyFunction TotalCarbonDemand
          MultiplyFunction TotalDMDemand
            VariableReference PotentialPhotosynthesis: VariableName=[Leaf].Photosynthesis
            Constant PartitionFraction: FixedValue=0
          VariableReference CarbonConc: VariableName=[Leaf].Cconc
        Constant SpecificArea: FixedValue=0.015; Units=m<sup>2</sup>/g
        BiomassRemoval BiomassRemovalDefaults: HarvestFractionLiveToRemove=0; HarvestFractionDeadToRemove=0; HarvestFractionLiveToResidue=0; HarvestFractionDeadToResidue=0
        Constant MaxNConcAtStartLeafFall: FixedValue=0
          Memo Param value set at establishment
            SCRUM calculates this parameter value during run-time when the crop is established from parameter values set in the relevent SCRUMcrop and SCRUMmanagement objects
      Organ Trunk: Cconc=0.4; IsAboveGround=true
        Constant InitialWt: FixedValue=1; Units=g/m2
        Constant MatureWt: FixedValue=0.1; Units=/d
        Respiration: same as Replacements.STRUM.Root.Respiration
        Constant senescenceRate: FixedValue=0; Units=/d
        Constant detachmentRate: FixedValue=0; Units=/d
        OrganNutrientDelta Carbon: MaxCDelta=0
          OrganNutrientSupplies Supplies: Fixation=0; Uptake=0
            NutrientPoolsState ReAllocation
            NutrientPoolsState ReTranslocation
          NutrientDemandFunctions DemandFunctions
            VariableReference Structural: VariableName=[STRUM].Trunk.TotalCarbonDemand
            Constant Metabolic: FixedValue=0
            Constant Storage: FixedValue=0
            Constant QStructuralPriority: FixedValue=1
            Constant QMetabolicPriority: FixedValue=0
            Constant QStoragePriority: FixedValue=0
          NutrientSupplyFunctions SupplyFunctions: same as Replacements.STRUM.Root.Carbon.SupplyFunctions
          NutrientProportionFunctions PoolFractions: same as Replacements.STRUM.Root.Carbon.PoolFractions
        OrganNutrientDelta Nitrogen: MaxCDelta=0
          OrganNutrientSupplies Supplies: Fixation=0; Uptake=0
            NutrientPoolsState ReAllocation
            NutrientPoolsState ReTranslocation
          NutrientDemandFunctions DemandFunctions
            DeficitDemandFunction Structural
            DeficitDemandFunction Metabolic
            DeficitDemandFunction Storage
            Constant QStructuralPriority: FixedValue=0
            Constant QMetabolicPriority: FixedValue=0
            Constant QStoragePriority: FixedValue=100
          NutrientSupplyFunctions SupplyFunctions: same as Replacements.STRUM.Root.Carbon.SupplyFunctions
          NutrientConcentrationFunctions ConcFunctions
            Constant Maximum: FixedValue=0.01
              Memo Param value set at establishment
                SCRUM calculates this parameter value during run-time when the crop is established from parameter values set in the relevent SCRUMcrop and SCRUMmanagement objects
            MultiplyFunction Critical
              Constant StructuralNFactor: FixedValue=0.6
              VariableReference MaxNConc: VariableName=[Trunk].MaxNConc
            MultiplyFunction Minimum
              Constant StructuralNFactor: FixedValue=0.6
              VariableReference MaxNConc: VariableName=[Trunk].MaxNConc
        BiomassRemoval BiomassRemovalDefaults: HarvestFractionLiveToRemove=0; HarvestFractionDeadToRemove=0; HarvestFractionLiveToResidue=1; HarvestFractionDeadToResidue=1
        MultiplyFunction TotalCarbonDemand
          MinimumFunction TotalDMDemand
            MultiplyFunction Available
              VariableReference PotentialPhotosynthesis: VariableName=[Leaf].Photosynthesis
              Constant PartitionFraction: FixedValue=0
            MultiplyFunction SizeDemand
              Constant Rate: FixedValue=0.02
              SubtractFunction TotalDemand
                MultiplyFunction TargetWt
                  VariableReference AgePattern: VariableName=[STRUM].RelativeAnnualDimension
                  VariableReference MatureWt: VariableName=[Trunk].MatureWt
                VariableReference CurrentWt: VariableName=[Trunk].Wt
          VariableReference CarbonConc: VariableName=[Leaf].Cconc
        EnergyBalance: Albedo=0.1; Gsmax350=0; R50=0; KDead=0; LAIDead=0
          Constant FRGRer: FixedValue=0
          Constant StomatalConductanceCO2Modifier: FixedValue=1
          VariableReference Tallness: VariableName=[STRUM].Height
          VariableReference Deepness: VariableName=[STRUM].Height
          Constant GreenAreaIndex: FixedValue=0
          MultiplyFunction DeadAreaIndex
            Constant VolumeToArea: FixedValue=0.3; Units=m2/l
            DivideFunction Volume
              VariableReference Wt: VariableName=[Trunk].Wt
              Constant Density: FixedValue=750; Units=g/l
          Constant GreenExtinctionCoefficient: FixedValue=0
          Constant DeadExtinctionCoefficient: FixedValue=0.3
          VariableReference Wideness: VariableName=[STRUM].Width
      Organ Fruit: Cconc=0.4; IsAboveGround=true
        Respiration: same as Replacements.STRUM.Root.Respiration
        OrganNutrientDelta Carbon: MaxCDelta=0
          OrganNutrientSupplies Supplies: Fixation=0; Uptake=0
            NutrientPoolsState ReAllocation
            NutrientPoolsState ReTranslocation
          NutrientDemandFunctions DemandFunctions
            VariableReference Structural: VariableName=[STRUM]Fruit.TotalCarbonDemand
            Constant Metabolic: FixedValue=0
            Constant Storage: FixedValue=0
            Constant QStructuralPriority: FixedValue=1
            Constant QMetabolicPriority: FixedValue=0
            Constant QStoragePriority: FixedValue=0
          NutrientSupplyFunctions SupplyFunctions: same as Replacements.STRUM.Root.Carbon.SupplyFunctions
          NutrientProportionFunctions PoolFractions: same as Replacements.STRUM.Root.Carbon.PoolFractions
        OrganNutrientDelta Nitrogen: MaxCDelta=0
          OrganNutrientSupplies Supplies: Fixation=0; Uptake=0
            NutrientPoolsState ReAllocation
            NutrientPoolsState ReTranslocation
          NutrientDemandFunctions DemandFunctions: same as Replacements.STRUM.Trunk.Nitrogen.DemandFunctions
          NutrientSupplyFunctions SupplyFunctions: same as Replacements.STRUM.Root.Carbon.SupplyFunctions
          NutrientConcentrationFunctions ConcFunctions
            AddFunction Maximum
              VariableReference MaxNConcAtHarvest: VariableName=[Fruit].MaxNConcAtHarvest
              MultiplyFunction EarlyNConcElevation
                SubtractFunction
                  Constant MaxNConcAtSet: FixedValue=4
                  VariableReference MaxNConcAtHarvest: VariableName=[Fruit].MaxNConcAtHarvest
                LinearInterpolationFunction DilutionCurve
                  XYPairs: X=[1, 3, 4, 5, 6, 7, 8]; Y=[1, 1, 0.1, 0.02, 0, 0, 0]
                  VariableReference XValue: VariableName=[Phenology].Stage
            MultiplyFunction Critical
              Constant StructuralNFactor: FixedValue=0.6
              VariableReference MaxNConcAtHarvest: VariableName=[Fruit].MaxNConcAtHarvest
            MultiplyFunction Minimum
              Constant StructuralNFactor: FixedValue=0.6
              VariableReference MaxNConcAtHarvest: VariableName=[Fruit].MaxNConcAtHarvest
        BiomassRemoval BiomassRemovalDefaults: HarvestFractionLiveToRemove=0.8; HarvestFractionDeadToRemove=0; HarvestFractionLiveToResidue=0.2; HarvestFractionDeadToResidue=1
        MultiplyFunction TotalCarbonDemand
          MaximumFunction RelativeFruitMass
            DeltaFunction Delta
              LinearInterpolationFunction Integral
                XYPairs: X=[0, 130, 300, 365]; Y=[0, 0.1, 0.9, 1]
                VariableReference XValue: VariableName=[STRUM].Phenology.DaysSinceFlowering
            Constant Zero: FixedValue=0
          VariableReference Number: VariableName=[Fruit].Number
          VariableReference PotentialDW: VariableName=[Fruit].PotentialDWPerFruit
          VariableReference CarbonConc: VariableName=[Fruit].Cconc
        Constant senescenceRate: FixedValue=0; Units=/d
        Constant detachmentRate: FixedValue=0; Units=/d
        Constant MaxNConcAtHarvest: FixedValue=0
          Memo Param value set at establishment
            SCRUM calculates this parameter value during run-time when the crop is established from parameter values set in the relevent SCRUMcrop and SCRUMmanagement objects
        Constant MaximumSize: FixedValue=0; Units=mm
        Constant Density: FixedValue=0; Units=g/cm3
        Constant MinimumDMC: FixedValue=0; Units=g/g
        MultiplyFunction DryMatterPc
          VariableReference UnStressedDM: VariableName=[Fruit].MinimumDMC
          LinearInterpolationFunction FruitAge
            XYPairs: X=[0, 3, 4, 5]; Y=[1, 1, 1, 1]
            VariableReference XValue: VariableName=[Weather].DaysSinceWinterSolstice
          LinearInterpolationFunction WaterStress
            XYPairs: X=[0, 85]; Y=[1, 1]
            VariableReference XValue: VariableName=[AccumulatedWaterStress]
        MultiplyFunction FreshWt
          DivideFunction FreshWtConversion
            Constant: FixedValue=1
            VariableReference DMconc: VariableName=[Fruit].DryMatterPc
          VariableReference DryWt: VariableName=[Fruit].Wt
        MultiplyFunction Number
          Constant RetainedPostThinning: Units=fruit/m row length
          VariableReference RelativeAnnualDimension: VariableName=[STRUM].RelativeAnnualDimension
          VariableReference BudsSurvivalFromLastYear: VariableName=[STRUM].Fruit.NextYearsFruitingBudSurvival
        DivideFunction FreshWtPerFruit
          VariableReference FreshWt: VariableName=[Fruit].FreshWt
          VariableReference Number: VariableName=[Fruit].Number
        DivideFunction VolumePerFruit
          VariableReference FreshWtPerFruit: VariableName=[Fruit].FreshWtPerFruit
          VariableReference Density: VariableName=[Fruit].Density
        SetOnEvent NextYearsFruitingBudSurvival: SetStageName=SpringDormant
          Memo
            This value is set on the day the tree goes dormant using the water stress accumulated over the preceeding growth cycle.  This value is then held until next year so it can represent the effects of last seasons stress on the survival of fruting buds into the current produciton season.
          Constant PreSetValue: FixedValue=1
          LinearInterpolationFunction PostSetValue
            XYPairs: X=[0, 70, 90, 150, 200]; Y=[1, 1, 0.9, 0.6, 0]
            VariableReference XValue: VariableName=[AccumulatedWaterStress]
        ExpressionFunction Size: Expression=(6*[Fruit].VolumePerFruit/3.1415926)^(1/3)
        Constant PotentialFWPerFruit: FixedValue=250
        MultiplyFunction PotentialDWPerFruit
          VariableReference PotentialFWPerFruit: VariableName=[Fruit].PotentialFWPerFruit
          VariableReference DMC: VariableName=[Fruit].MinimumDMC
        Constant InitialWt: FixedValue=0; Units=g/m2
      AccumulateFunctionGeneral AccumulatedWaterStress: StartStageName=StartFullCanopy; EndStageName=StartLeafFall; ReduceStageName=StartFullCanopy; FractionRemovedOnStage=1; FractionRemovedOnEvent=0; FractionRemovedOnDate=0
        Memo
          Water Stress is accumulated while the tree has a canopy and reset each year at the start of canopy expansion.  This value is referenced by NextYearsFruitingBudSurvival when the tree goes dormand to determine to set the proportion of buds that will have survived this year.  That value is held over into the following season so stress effects on fruiting bud number from this season are carried over to affect fruit load for next season.
        Constant Day: FixedValue=1; Units=d
        SubtractFunction StressIndex
          Constant One: FixedValue=1
          LinearInterpolationFunction FW
            XYPairs: X=[0.1, 0.9, 1.5]; Y=[0, 1, 1]
            VariableReference XValue: VariableName=[Leaf].Canopy.Fw
      CompositeStates AboveGround
        Propertys=[[Leaf].Live, [Leaf].Dead, [Fruit].Live, [Fruit].Dead, [Trunk].Live, [Trunk].Dead]
      CompositeStates AboveGroundDead: Propertys=[[Leaf].Dead, [Fruit].Dead, [Trunk].Dead]
      CompositeStates BelowGround: Propertys=[[Root].Live, [Root].Dead]
      CompositeStates Total
        Propertys=[[Leaf].Live, [Leaf].Dead, [Fruit].Live, [Fruit].Dead, [Trunk].Live, [Trunk].Dead, [Root].Live, [Root].Dead]
      CompositeStates TotalLive: Propertys=[[Leaf].Live, [Fruit].Live, [Trunk].Live, [Root].Live]
      CompositeStates TotalDead: Propertys=[[Leaf].Dead, [Fruit].Dead, [Trunk].Dead, [Root].Dead]
      Constant SeedMortalityRate: FixedValue=0
      Constant MaxPrunedHeight: FixedValue=0
      Constant MortalityRate: FixedValue=0
      AddFunction Height
        MultiplyFunction CanopyBaseHeight
          Constant Maximum: FixedValue=0
          VariableReference Age pattern: VariableName=[STRUM].RelativeAnnualDimension
        MultiplyFunction PrunedCanopyDepth
          SubtractFunction Maximum
            VariableReference MaxPrunedHeight: VariableName=[STRUM].MaxPrunedHeight
            VariableReference MaxBaseHeight: VariableName=[STRUM].Height.CanopyBaseHeight.Maximum
          VariableReference Age pattern: VariableName=[STRUM].RelativeAnnualDimension
        MultiplyFunction SeasonalGrowth
          VariableReference Seasonal pattern: VariableName=[STRUM].RelativeSeasonalDimension
          Constant Maximum: FixedValue=100; Units=mm
          VariableReference Age pattern: VariableName=[STRUM].RelativeAnnualDimension
      AddFunction Width
        MultiplyFunction PrunedWidth
          VariableReference Age pattern: VariableName=[STRUM].RelativeAnnualDimension
          Constant Maximum: FixedValue=500; Units=mm
        MultiplyFunction SeasonalGrowth
          VariableReference Seasonal pattern: VariableName=[STRUM].RelativeSeasonalDimension
          Constant Maximum: FixedValue=500; Units=mm
      LinearInterpolationFunction RelativeAnnualDimension
        XYPairs: X=[0, 6]; Y=[0.3, 1]
        VariableReference XValue: VariableName=[Phenology].Age.YearDecimal
      LinearInterpolationFunction RelativeSeasonalDimension
        XYPairs: X=[3, 4, 5]; Y=[0, 0.6, 1]
        VariableReference XValue: VariableName=[Phenology].Stage
      AddFunction RadiationIntercepted
        VariableReference LeafInterception: VariableName=[STRUM].Leaf.RadiationIntercepted
        VariableReference TrunkInterception: VariableName=[STRUM].Trunk.EnergyBalance.RadiationInterceptedByDead
      Constant RowWidth: FixedValue=0
      MultiplyFunction TranspirationPerTree
        VariableReference: VariableName=[Leaf].Canopy.Transpiration
        VariableReference RowWidth: VariableName=[STRUM].RowWidth
        VariableReference InterRowSpacing: VariableName=[STRUM].InterRowSpacing
      Constant InterRowSpacing
    Report RowZoneReport: EventNames=[Clock].DoReport
      VariableNames:
        [Clock].Today
        [Row].STRUM.AccumulatedWaterStress
        //[Row].STRUM.Arbitrator.DemandRatio
        [Row].STRUM.Arbitrator.Carbon.TotalPlantDemand
        [Row].STRUM.Arbitrator.Carbon.TotalPlantSupply
        [Row].STRUM.Arbitrator.Carbon.TotalPlantDemandsAllocated
        [Row].STRUM.Arbitrator.Fn
        [Row].STRUM.Arbitrator.Nitrogen.TotalPlantDemand
        [Row].STRUM.Arbitrator.Nitrogen.TotalPlantSupply
        [Row].STRUM.Arbitrator.Nitrogen.TotalPlantDemandsAllocated
        [Row].STRUM.Fruit.TotalCarbonDemand.RelativeFruitMass.Delta.Integral
        [Row].STRUM.Fruit.Allocated.Carbon.Total
        [Row].STRUM.Fruit.Allocated.Nitrogen.Total
        [Row].STRUM.Fruit.Carbon.Demands.Structural
        [Row].STRUM.Fruit.Carbon.Demands.Total
        [Row].STRUM.Fruit.DryMatterPc
        [Row].STRUM.Fruit.FreshWtPerFruit
        [Row].STRUM.Fruit.NextYearsFruitingBudSurvival
        [Row].STRUM.Fruit.Number.BudsSurvivalFromLastYear
        [Row].STRUM.Fruit.N
        [Row].STRUM.Fruit.Nitrogen.Demands.Total
        [Row].STRUM.Fruit.Number
        [Row].STRUM.Fruit.Size
        [Row].STRUM.Fruit.VolumePerFruit
        [Row].STRUM.Fruit.Wt
        [Row].STRUM.Fruit.PotentialDWPerFruit
        [Row].STRUM.Fruit.TotalCarbonDemand.RelativeFruitMass
        [Row].STRUM.Fruit.TotalCarbonDemand.CarbonConc
        [Row].STRUM.Height
        [Row].STRUM.Height.CanopyBaseHeight
        [Row].STRUM.Height.CanopyBaseHeight  + [Row].STRUM.Height.PrunedCanopyDepth
        [Row].STRUM.Height.CanopyBaseHeight  + [Row].STRUM.Height.PrunedCanopyDepth + [Row].STRUM.Height.SeasonalGrowth
        [Row].STRUM.Leaf.Allocated.Carbon.Total
        [Row].STRUM.Leaf.Allocated.Nitrogen.Total
        [Row].STRUM.Leaf.Canopy.CoverGreen
        [Row].STRUM.Leaf.Dead.Wt
        [Row].STRUM.Leaf.Carbon.Demands.Structural
        [Row].STRUM.Leaf.Carbon.Demands.Total
        [Row].STRUM.Leaf.Fn
        [Row].STRUM.Leaf.Canopy.Fw
        [Row].STRUM.Leaf.Canopy.LAI
        [Row].STRUM.Leaf.Live.Wt
        [Row].STRUM.Leaf.N
        [Row].STRUM.Leaf.Nitrogen.Demands.Total
        [Row].STRUM.Leaf.Canopy.PotentialEP
        [Row].STRUM.Leaf.Canopy.RadiationIntercepted
        [Row].STRUM.Leaf.Senesced.Weight.Structural
        [Row].STRUM.Leaf.senescenceRate
        [Row].STRUM.Leaf.Canopy.Transpiration
        [Row].STRUM.Leaf.Canopy.WaterDemand
        [Row].STRUM.Leaf.Canopy.WaterAllocation
        [Row].STRUM.Leaf.Canopy.Width
        [Row].STRUM.Leaf.Wt
        [Row].STRUM.Phenology.Age.YearDecimal
        [Row].STRUM.Phenology.Age.Years
        [Row].STRUM.Phenology.CurrentStageName
        [Row].STRUM.Phenology.DaysSinceFlowering
        [Row].STRUM.Phenology.Stage
        [Row].STRUM.RelativeSeasonalDimension
        [Row].STRUM.RelativeAnnualDimension
        [Row].STRUM.Root.Allocated.Carbon.Total
        [Row].STRUM.Root.Allocated.Nitrogen.Total
        [Row].STRUM.Root.Network.Depth
        [Row].STRUM.Root.Carbon.Demands.Structural
        [Row].STRUM.Root.Carbon.Demands.Total
        [Row].STRUM.Root.N
        [Row].STRUM.Root.Nitrogen.Demands.Total
        [Row].STRUM.Root.Network.WaterTakenUp.ByZoneKg
        [Row].STRUM.Root.Network.WaterTakenUp.Mm
        [Row].STRUM.Root.Network.WaterTakenUp.Kg
        [Row].STRUM.Root.Network.NitrogenTakenUp.ByZoneKg
        [Row].STRUM.Root.Network.NitrogenTakenUp.Gpm2
        [Row].STRUM.Root.Network.NitrogenTakenUp.Kg
        [Row].STRUM.Root.Network.WaterUptakeSupply.ByZoneKg
        [Row].STRUM.Root.Network.WaterUptakeSupply.Mm
        [Row].STRUM.Root.Network.WaterUptakeSupply.Kg
        [Row].STRUM.Root.Network.NitrogenUptakeSupply.ByZoneKg
        [Row].STRUM.Root.Network.NitrogenUptakeSupply.Gpm2
        [Row].STRUM.Root.Network.NitrogenUptakeSupply.Kg
        [Row].STRUM.Root.Wt
        [Row].STRUM.TranspirationPerTree
        [Row].STRUM.Trunk.Allocated.Carbon.Total
        [Row].STRUM.Trunk.Allocated.Nitrogen.Total
        [Row].STRUM.Trunk.Carbon.Demands.Structural
        [Row].STRUM.Trunk.Carbon.Demands.Total
        [Row].STRUM.Trunk.EnergyBalance.CoverTotal
        [Row].STRUM.Trunk.EnergyBalance.DeadAreaIndex
        [Row].STRUM.Trunk.EnergyBalance.LAIDead
        [Row].STRUM.Trunk.EnergyBalance.RadiationInterceptedByDead
        [Row].STRUM.Trunk.N
        [Row].STRUM.Trunk.Nitrogen.Demands.Total
        [Row].STRUM.Trunk.Wt
        [Row].STRUM.Width
        [Row].STRUM.Width.PrunedWidth
        [Row].STRUM.Width.PrunedWidth + [Row].STRUM.Width.SeasonalGrowth
        [Row].SurfaceOrganicMatter.N
        [Row].SurfaceOrganicMatter.Wt
        [Row].Irrigation.IrrigationApplied
        [Row].Fertiliser.NitrogenApplied
        sum([Row].Soil.OutputLayers.SWmm)
        ([Row].Soil.OutputLayers.SWmm[1] + [Row].Soil.OutputLayers.SWmm[1] + [Row].Soil.OutputLayers.SWmm[1]) as SWmm90
        [Row].Soil.OutputLayers.SW
        [Row].Soil.OutputLayers.SAT
        [Row].Soil.OutputLayers.DUL
        [Row].Soil.OutputLayers.LL15
        [Row].Soil.SoilWater.Drainage
        [Row].Soil.SoilWater.Evaporation
        [Row].Soil.SoilWater.Eo
        [Weather].PanEvap
        [Weather].Radn
        [Weather].Rain
    Report AlleyZoneReport: EventNames=[Clock].DoReport
      VariableNames:
        [Clock].Today
        [Alley].SPRUM.Leaf.CoverGreen
        [Alley].SPRUM.Leaf.LAI
        [Alley].SPRUM.Height
        [Alley].SPRUM.Root.Depth
        [Alley].SPRUM.Leaf.PotentialEP
        [Alley].SPRUM.Leaf.Transpiration
        [Alley].SPRUM.Leaf.RadiationIntercepted
        [Alley].SPRUM.Root.WaterUptakeByZone
        sum([Alley].SPRUM.Root.WaterUptakeByZone)
        [Alley].SPRUM.AboveGround.Wt
        [Alley].SPRUM.AboveGround.N
        [Alley].SPRUM.Leaf.Wt
        [Alley].SPRUM.Residue.Wt
        [Alley].SPRUM.Root.Wt
        [Alley].SPRUM.Nodule.Wt
        [Alley].SPRUM.Leaf.N
        [Alley].SPRUM.Residue.N
        [Alley].SPRUM.Root.N
        [Alley].SPRUM.Nodule.N
        [Alley].SPRUM.RelativeAnnualDimension
        sum([Alley].Soil.OutputLayers.SWmm)
        [Alley].Soil.OutputLayers.SW
        [Alley].Irrigation.IrrigationApplied
        [Alley].Fertiliser.NitrogenApplied
        [Alley].Soil.SoilWater.Drainage
        [Alley].Soil.SoilWater.Evaporation
    Report ZoneAgregateReport: EventNames=[Clock].DoReport
      VariableNames:
        [Clock].Today
        [ZoneAgregate].SimulationArea
        //[ZoneAgregate].Eop.Total
        //[ZoneAgregate].Eop.PerM2
        //[ZoneAgregate].Eop.RowTotal
        //[ZoneAgregate].Eop.AlleyTotal
        [ZoneAgregate].Ro.Total
        [ZoneAgregate].Ro.PerM2
        [ZoneAgregate].Ro.RowTotal
        [ZoneAgregate].Ro.AlleyTotal
        //[ZoneAgregate].Eo.Total
        //[ZoneAgregate].Eo.PerM2
        //[ZoneAgregate].Eo.RowTotal
        //[ZoneAgregate].Eo.AlleyTotal
        //[ZoneAgregate].Et.Total
        [//ZoneAgregate].Et.PerM2
        //[ZoneAgregate].Et.RowTotal
        //[ZoneAgregate].Et.AlleyTotal
        //[ZoneAgregate].Es.Total
        //[ZoneAgregate].Es.PerM2
        //[ZoneAgregate].Es.RowTotal
        //[ZoneAgregate].Es.AlleyTotal
        [ZoneAgregate].AccumulatedIrrigation.Total
        [ZoneAgregate].AccumulatedIrrigation.PerM2
        [ZoneAgregate].AccumulatedIrrigation.RowTotal
        [ZoneAgregate].AccumulatedIrrigation.AlleyTotal
        [ZoneAgregate].AccumulatedNitrogen.Total
        [ZoneAgregate].AccumulatedNitrogen.PerM2
        [ZoneAgregate].AccumulatedNitrogen.RowTotal
        [ZoneAgregate].AccumulatedNitrogen.AlleyTotal
        [ZoneAgregate].RiTreeGreen
        [ZoneAgregate].RiTreeDead
        [ZoneAgregate].RiUnderstoryGreen
        [ZoneAgregate].RiUnderstoryDead
        [ZoneAgregate].FintTreeGreen
        [ZoneAgregate].FintTreeDead
        [ZoneAgregate].FintUnderstoryGreen
        [ZoneAgregate].FintUnderstoryDead
    Report RowZoneReportold: EventNames=[Clock].DoReport
      VariableNames:
        [Clock].Today
        [Row].STRUM.AccumulatedWaterStress
        [Row].STRUM.Arbitrator.DemandRatio
        [Row].STRUM.Arbitrator.DM.TotalPlantDemand
        [Row].STRUM.Arbitrator.DM.TotalPlantSupply
        [Row].STRUM.Arbitrator.Fn
        [Row].STRUM.Arbitrator.N.TotalPlantDemand
        [Row].STRUM.Arbitrator.N.TotalPlantSupply
        [Row].STRUM.Fruit.Allocated.StructuralWt
        [Row].STRUM.Fruit.DMDemand.Structural
        [Row].STRUM.Fruit.DryMatterPc
        [Row].STRUM.Fruit.FreshWtPerFruit
        [Row].STRUM.Fruit.NextYearsFruitingBudSurvival
        [Row].STRUM.Fruit.Number.BudsSurvivalFromLastYear
        [Row].STRUM.Fruit.N
        [Row].STRUM.Fruit.NDemand.Structural
        [Row].STRUM.Fruit.Number
        [Row].STRUM.Fruit.Size
        [Row].STRUM.Fruit.VolumePerFruit
        [Row].STRUM.Fruit.Wt
        [Row].STRUM.Height
        [Row].STRUM.Height.CanopyBaseHeight
        [Row].STRUM.Height.CanopyBaseHeight  + [Row].STRUM.Height.PrunedCanopyDepth
        [Row].STRUM.Height.CanopyBaseHeight  + [Row].STRUM.Height.PrunedCanopyDepth + [Row].STRUM.Height.SeasonalGrowth
        [Row].STRUM.Leaf.CoverGreen
        [Row].STRUM.Leaf.Dead.Wt
        [Row].STRUM.Leaf.DMDemand.Structural
        [Row].STRUM.Leaf.Fn
        [Row].STRUM.Leaf.Fw
        [Row].STRUM.Leaf.LAI
        [Row].STRUM.Leaf.Live.Wt
        [Row].STRUM.Leaf.N
        [Row].STRUM.Leaf.NDemand.Structural
        [Row].STRUM.Leaf.PotentialEP
        [Row].STRUM.Leaf.RadiationIntercepted
        [Row].STRUM.Leaf.Senesced.StructuralWt
        [Row].STRUM.Leaf.SenescenceRate
        [Row].STRUM.Leaf.Transpiration
        [Row].STRUM.Leaf.WaterDemand
        [Row].STRUM.Leaf.WaterAllocation
        [Row].STRUM.Leaf.Width
        [Row].STRUM.Leaf.Wt
        [Row].STRUM.Phenology.Age.YearDecimal
        [Row].STRUM.Phenology.Age.Years
        [Row].STRUM.Phenology.DaysSinceFlowering
        [Row].STRUM.Phenology.Stage
        [Row].STRUM.RadiationIntercepted
        [Row].STRUM.RelativeSeasonalDimension
        [Row].STRUM.RelativeAnnualDimension
        [Row].STRUM.Root.Depth
        [Row].STRUM.Root.DMDemand.Structural
        [Row].STRUM.Root.N
        [Row].STRUM.Root.NDemand.Structural
        [Row].STRUM.Root.WaterUptakeByZone
        [Row].STRUM.Root.WaterUptake
        sum([Row].STRUM.Root.WaterUptakeByZone)
        [Row].STRUM.Root.Wt
        [Row].STRUM.TranspirationPerTree
        [Row].STRUM.Trunk.DMDemand.Structural
        [Row].STRUM.Trunk.EnergyBalance.CoverTotal
        [Row].STRUM.Trunk.EnergyBalance.DeadAreaIndex
        [Row].STRUM.Trunk.EnergyBalance.LAIDead
        [Row].STRUM.Trunk.EnergyBalance.RadiationInterceptedByDead
        [Row].STRUM.Trunk.N
        [Row].STRUM.Trunk.NDemand.Structural
        [Row].STRUM.Trunk.Wt
        [Row].STRUM.Width
        [Row].STRUM.Width.PrunedWidth
        [Row].STRUM.Width.PrunedWidth + [Row].STRUM.Width.SeasonalGrowth
        [Row].SurfaceOrganicMatter.N
        [Row].SurfaceOrganicMatter.Wt
        [Row].Irrigation.IrrigationApplied
        [Row].Fertiliser.NitrogenApplied
        sum([Row].Soil.OutputLayers.SWmm)
        ([Row].Soil.OutputLayers.SWmm[1] + [Row].Soil.OutputLayers.SWmm[1] + [Row].Soil.OutputLayers.SWmm[1]) as SWmm90
        [Row].Soil.OutputLayers.SW
        [Row].Soil.OutputLayers.SAT
        [Row].Soil.OutputLayers.DUL
        [Row].Soil.OutputLayers.LL15
        [Row].Soil.SoilWater.Drainage
        [Row].Soil.SoilWater.Evaporation
        [Row].Soil.SoilWater.Eo
        [Weather].PanEvap
        [Weather].Radn
        [Weather].Rain
    Manager AgrgateZoneVariables
```csharp
using APSIM.Numerics;
using System.Diagnostics;
using Models.PMF.Organs;
using Models.Zones;
using APSIM.Shared.Utilities;
using Models.Soils;
using System.Collections.Generic;
using Models.PMF;
using Models.Core;
using System;
using Models.Climate;

namespace Models
{
    [Serializable]
    public class Script : Model
    {
        [Link] private Weather weather;
        [Link(Type = LinkType.Scoped, ByName = true)] private OutputLayers outputLayers;
        private RectangularZone AlleyZone {get; set; }
        private RectangularZone RowZone {get; set;}
        private RectangularZone ThisZone {get; set;}
        private double AreaWidth {get; set;}
        private double TreeWidth {get; set;}
        public double TotRadn {get; set;}
        public double RadInt {get; set;}
        public double FRadInt {get; set;}
        public double ET {get; set;}
        public double ES {get; set;}
        public double PET {get; set;}
        public double InterceptedRadiation {get; set;}
        public double TreeRadInt {get; set;}
        public double TWU {get;set;}
        public double PSW {get;set;}
        public double TotalIrrig_mm {get;set;}
        public double TotalN_kgPerha {get;set;}
        public double RowIrrig {get;set;}
        public double AlleyIrrig {get;set;}
        public double RowN {get;set;}
        public double AlleyN {get;set;}
        public double AlleyWidth {get;set;}
        public double RowWidth {get;set;}
        public double DemandRatio {get;set;}
        public double TranspirationPerTree {get;set;}
               
        
        [EventSubscribe("StartOfFirstDay")]
        private void DoStartOfSimulation(object sender, EventArgs e)
        {
               
               ThisZone = this.Parent.Parent as RectangularZone;
               RowZone = this.Parent.Parent.Parent.FindInScope("Row") as RectangularZone;
               AlleyZone = this.Parent.Parent.Parent.FindInScope("Alley") as RectangularZone;
               if (AlleyZone != null)
                       AlleyWidth = AlleyZone.Width;
               else
               		   AlleyWidth=0;
               if (RowZone != null)
               		RowWidth = RowZone.Width;
               else
               		RowWidth = 0;
               AreaWidth = AlleyWidth + RowWidth;
               TreeWidth = 0;
        }
        
        [EventSubscribe("DoReportCalculations")]
        private void OnDoReportCalculations(object sender, EventArgs e)
        {
            //Debugger.Break();
            if (ThisZone.Name == "Row")
                {
		            TreeRadInt = (double)RowZone.Get("STRUM.Leaf.RadiationIntercepted") + (double)RowZone.Get("STRUM.Trunk.EnergyBalance.RadiationInterceptedByDead");
		            FRadInt = (TreeRadInt * RowWidth)/(weather.Radn * AreaWidth);
		            InterceptedRadiation = RowWidth * (double)RowZone.Get("STRUM.Leaf.RadiationIntercepted");
		            ET = (double)RowZone.Get("STRUM.Leaf.Transpiration") * RowZone.Width/AreaWidth;
		            TreeWidth = (double)RowZone.Get("STRUM.Leaf.Width")/1000;
		            TWU = (double)RowZone.Get("STRUM.Leaf.Transpiration")/(double)RowZone.Get("STRUM.Leaf.LAI") * 2.5; 
		            DemandRatio = MathUtilities.Divide((double)RowZone.Get("STRUM.Arbitrator.DM.TotalPlantSupply"),(double)RowZone.Get("STRUM.Arbitrator.DM.TotalPlantDemand"),0);
		            TranspirationPerTree = (double)RowZone.Get("STRUM.Leaf.Transpiration") * TreeWidth * TreeWidth;
                }
            else if (ThisZone.Name == "Alley")
                {
		            FRadInt = ((double)AlleyZone.Get("SPRUM.Leaf.RadiationIntercepted") * AlleyZone.Width)/(weather.Radn * AreaWidth);
		            InterceptedRadiation = AlleyWidth * (double)AlleyZone.Get("SPRUM.Leaf.RadiationIntercepted");
		            ET = (double)AlleyZone.Get("SPRUM.Leaf.Transpiration") * ThisZone.Width/AreaWidth;
                }
            TotRadn = weather.Radn * AreaWidth; 
            ES = (double)ThisZone.Get("Soil.SoilWater.Es") * ThisZone.Width/AreaWidth;
            double PETWidth = Math.Min(Math.Max(TreeWidth,ThisZone.Width),AreaWidth);
            PET = (double)ThisZone.Get("Soil.SoilWater.Eo") * PETWidth/AreaWidth;
            PSW = 0;
            for (int layer = 0; layer < outputLayers.Thickness.Length; layer++)
            {
                PSW += outputLayers.SWmm[layer];
            }
            

            if (RowZone != null)
            {
            		RowIrrig = (double)RowZone.Get("Irrigation.IrrigationApplied");
		            RowN = (double)RowZone.Get("Fertiliser.NitrogenApplied");
		    }
		    else
		    {
		    	RowIrrig = 0;
		    	RowN = 0;
		    }
		    if (AlleyZone != null)
		    {
		        AlleyIrrig = (double)AlleyZone.Get("Irrigation.IrrigationApplied");
		        AlleyN = (double)AlleyZone.Get("Fertiliser.NitrogenApplied");
		    }
		    else
		    {
		        AlleyIrrig = 0;
                AlleyN = 0;
		    }
            TotalIrrig_mm = (RowIrrig*RowWidth + AlleyIrrig*AlleyWidth)/AreaWidth;
            TotalN_kgPerha = (RowN*RowWidth + AlleyN*AlleyWidth)/AreaWidth;         
        }
    }
}
```
    StrumTreeInstance WashStateApple: TreeType=Deciduous; RowSpacing=4.5; InterRowSpacing=1; AlleyZoneWidthFrac=0.666; AgeAtSimulationStart=5; YearsToMaxDimension=6; TrunkMassAtMaxDimension=12; WoodDensity=500; BudBreakDAWS=100; StartFullCanopyDAWS=150; StartLeafFallDAWS=305; EndLeafFallDAWS=330; GRINZ=true; MaxRD=3000; Proot=0.1; Pleaf=0.2; Ptrunk=0.2; CanopyBaseHeight=1000; MaxPrunedHeight=2800; MaxHeight=3500; MaxPrunedWidth=1300; MaxWidth=1600; RootNConc=0.01; LeafNConc=0.02; TrunkNConc=0.01; FruitNConc=0.02; ExtinctCoeff=0.6; BaseCover=0; MaxCover=0.96; RUE=1.2; GSMax=0.004; R50=100; WaterStress=true; Number=40; PotentialFWPerFruit=70; DMC=0.16; FruitDensity=0.75; DateMaxBloom=19-feb; DAFStartLinearGrowth=90; DAFEndLinearGrowth=280; DAFMaxSize=300; TotalSolarRadiation=0
    Plant STRUMold: PlantType=STRUM
      Memo TitlePage: same as Replacements.STRUM.TitlePage
      OrganArbitrator Arbitrator
        BiomassTypeArbitrator DMArbitration
          Folder PotentialPartitioningMethods
            ReallocationMethod
            AllocateFixationMethod
            RetranslocationMethod
            SendPotentialDMAllocationsMethod
          Folder AllocationMethods
            NutrientConstrainedAllocationMethod
            DryMatterAllocationsMethod
          QPrioritythenRelativeAllocation ArbitrationMethod
        BiomassTypeArbitrator NArbitration
          Folder PotentialPartitioningMethods
            ReallocationMethod
          Folder ActualPartitioningMethods
            AllocateFixationMethod
            RetranslocationMethod
          Folder AllocationMethods
            NitrogenAllocationsMethod
          RelativeAllocation ArbitrationMethod
          AllocateUptakesMethod
        WaterUptakeMethod
        NitrogenUptakeMethod
        ExpressionFunction DemandRatio
          Expression=Divide([STRUM].Arbitrator.DM.TotalPlantSupply,[STRUM].Arbitrator.DM.TotalPlantDemand,0)
      Phenology
        Constant ThermalTime: FixedValue=1; Units=days
        GenericPhase ZeroPhase: same as Replacements.STRUM.Phenology.ZeroPhase
        DAWSPhase SpringDormancy: Start=Dormant; End=BudBreak; IsEmerged=true; DAWStoProgress=0
        DAWSPhase CanopyExpansion: Start=BudBreak; End=StartFullCanopy; IsEmerged=true; DAWStoProgress=0
        DAWSPhase FullCanopy: Start=StartFullCanopy; End=StartLeafFall; IsEmerged=true; DAWStoProgress=0
        DAWSPhase LeafFall: Start=StartLeafFall; End=BareTree; IsEmerged=true; DAWStoProgress=0
        DAWSPhase WinterDormancy: Start=BareTree; End=SpringDormant; IsEmerged=true; DAWStoProgress=365
        GotoPhase: Start=BareTree; IsEmerged=false; PhaseNameToGoto=SpringDormancy; RemovalType=3
        GenericPhase PlaceHolderPhase: same as Replacements.STRUM.Phenology.PlaceHolderPhase
        Age
        AddFunction AgeDecimal: same as Replacements.STRUM.Phenology.AgeDecimal
        AccumulateFunctionGeneral DaysSinceFlowering: AccumulateEventName=[Plant].Phenology.PostPhenology; StartDate=15-Oct; FractionRemovedOnStage=0; FractionRemovedOnEvent=0; FractionRemovedOnDate=0; FractionRemovedOnPrune=1
          Constant Day: FixedValue=1; Units=d
      Root: GrowthRespiration=0; MaintenanceRespiration=0
        RootShapeCylinder RootShape
        DivideFunction RootFrontVelocity
          VariableReference MaxRootDepth: VariableName=[Root].MaximumRootDepth
          MultiplyFunction RootGrowthDuration: same as Replacements.STRUM.Root.Network.rootFrontVelocity.RootGrowthDuration
        Constant MaxDailyNUptake: FixedValue=10; Units=g/m2
        Constant DMConversionEfficiency: FixedValue=1; Units=g/m2
        Constant RemobilisationCost: FixedValue=0
        Constant MaximumRootDepth: FixedValue=3000; Units=mm
        Constant NitrogenDemandSwitch: FixedValue=1; Units=0-1
        KLModiferVsDepthFunction klModifier
          VariableReference LayerDepth: VariableName=[Physical].DepthMidPoints
          VariableReference MaximumRootDepth: VariableName=[Root].MaximumRootDepth
        MultiplyFunction SenescenceRate: same as Replacements.STRUM.Root.senescenceRate
        Constant SpecificRootLength: FixedValue=105; Units=m/g
        LinearInterpolationFunction KNO3
          XYPairs: X=[0, 0.003]; Y=[0.02, 0.02]
          VariableReference XValue: VariableName=[Root].LengthDensity
        LinearInterpolationFunction KNH4
          XYPairs: X=[0, 0.003]; Y=[0, 0]
          VariableReference XValue: VariableName=[Root].LengthDensity
        BiomassRemoval BiomassRemovalDefaults: HarvestFractionLiveToRemove=0; HarvestFractionDeadToRemove=0; HarvestFractionLiveToResidue=0; HarvestFractionDeadToResidue=0
        LinearInterpolationFunction NUptakeSWFactor
          XYPairs: X=[0, 1]; Y=[0, 1]
          VariableReference XValue: VariableName=[Root].RWC
        Constant CarbonConcentration: FixedValue=0.4
        Constant MaintenanceRespirationFunction: FixedValue=0
        NutrientDemandFunctions DMDemands
          PartitionFractionDemandFunction Structural
            Constant PartitionFraction: FixedValue=0
          Constant Metabolic: FixedValue=0
          Constant Storage: FixedValue=0
          Constant QStructuralPriority: FixedValue=1
          Constant QMetabolicPriority: FixedValue=1
          Constant QStoragePriority: FixedValue=1
        NutrientDemandFunctions NDemands
          MultiplyFunction Structural
            VariableReference MinNconc: VariableName=[Root].minimumNconc
            VariableReference PotentialDMAllocation: VariableName=[Root].potentialDMAllocation.Structural
          Constant Metabolic: FixedValue=0
          Constant Storage: FixedValue=0
          Constant QStructuralPriority: FixedValue=1
          Constant QMetabolicPriority: FixedValue=1
          Constant QStoragePriority: FixedValue=1
        NutrientPoolFunctions InitialWt
          Constant Structural: FixedValue=0; Units=g/plant
            Memo Param value set at establishment
              STRUM calculates this parameter value during run-time when the crop is established from parameter values set in the relevent STRUMtree object
          Constant Metabolic: FixedValue=0
          Constant Storage: FixedValue=0
        Constant RootDepthStressFactor: FixedValue=1
        Constant MaximumNConc: FixedValue=0
          Memo Param value set at establishment
            STRUM calculates this parameter value during run-time when the crop is established from parameter values set in the relevent STRUMtree object
        VariableReference CriticalNConc: VariableName=[Root].MaximumNConc
        VariableReference MinimumNConc: VariableName=[Root].MaximumNConc
      SimpleLeaf Leaf: Albedo=0.18; LeafInitialisationStage=Dormant
        zero: Gsmax350, R50, Height, BaseHeight, Width, FRGR, PotentialEP, WaterDemand, KDead, LAIDead
        Constant StomatalConductanceCO2Modifier: FixedValue=1
        Constant DetachmentRate: FixedValue=0.05; Units=/d
        Constant RemobilisationCost: FixedValue=0
        Constant InitialWt: FixedValue=0; Units=g/plant
        Constant LaiDead: FixedValue=0; Units=m^2/m^2
        RUEModel Photosynthesis
          Constant RUE: FixedValue=1.2
          WeightedTemperatureFunction FT: MaximumTemperatureWeighting=0.5
            XYPairs: X=[5, 20, 25, 40]; Y=[0, 1, 1, 0]
          RUECO2Function FCO2: PhotosyntheticPathway=C3
          DivideFunction RadnInt
            VariableReference IntOverRowWidth: VariableName=[Leaf].RadiationIntercepted
            VariableReference RowWidth: VariableName=[STRUM].RowWidth
          Constant FVPD: FixedValue=1
          Constant FN: FixedValue=1
          LinearInterpolationFunction Fw
            XYPairs: X=[0, 0.8]; Y=[0, 1]
            VariableReference XValue: VariableName=[Leaf].Fw
          Constant LaiDead: FixedValue=0; Units=m^2/m^2
        LinearInterpolationFunction FRGR
          XYPairs: X=[0, 0.8, 0.9, 1]; Y=[1, 1, 0.5, 0.5]
          VariableReference XValue: VariableName=[Arbitrator].DemandRatio
        SubDailyInterpolation xFRGR: agregationMethod=0
          XYPairs Response: X=[0, 14, 16, 24, 26, 40]; Y=[1, 1, 1, 1, 1, 1]
          ThreeHourAirTemperature InterpolationMethod
        MultiplyFunction ExtinctionCoefficient
          Constant UnstressedCoeff: FixedValue=0
            Memo Param value set at establishment
              SCRUM calculates this parameter value during run-time when the crop is established from parameter values set in the relevent SCRUMcrop and SCRUMmanagement objects
          LinearInterpolationFunction WaterStressFactor
            XYPairs: X=[0.4, 1]; Y=[0.2, 1]
            VariableReference XValue: VariableName=[Leaf].Fw
        Constant NReallocationFactor: FixedValue=0
        AddFunction SenescenceRate
          PhaseLookup DecidiousSensecence
            PhaseLookupValue LeafFall: Start=StartLeafFall; End=BareTree
              MultiplyFunction
                ProtectedDivideFunction: NumeratorErrVal=0; DenominatorErrVal=0
                  BoundFunction LAIReduction
                    Constant Upper: FixedValue=10000; Units=0-1
                    Constant Lower: FixedValue=0; Units=0-1
                    MultiplyFunction LeafAreaLoss
                      DeltaFunction DeltaLeafArea
                        VariableReference Integral: VariableName=[STRUM].Leaf.Area
                      Constant Inverter: FixedValue=-1; Units=0-1
                  HoldFunction LAIatStartLeafFall: WhenToHold=StartLeafFall
                    VariableReference LAI: VariableName=[Leaf].Area
                Constant Switch: FixedValue=1
          MultiplyFunction EvergreenSenescence: same as Replacements.STRUM.Leaf.senescenceRate.EvergreenSenescence
        BiomassRemoval BiomassRemovalDefaults: HarvestFractionLiveToRemove=0; HarvestFractionDeadToRemove=0; HarvestFractionLiveToResidue=0; HarvestFractionDeadToResidue=0
        Constant MaintenanceRespiration: FixedValue=0; Units=0-1
        Constant DMConversionEfficiency: FixedValue=1; Units=0-1
        Constant NRetranslocationFactor: FixedValue=0
        Constant NitrogenDemandSwitch: FixedValue=1
        Constant DMReallocationFactor: FixedValue=0
        Constant DMRetranslocationFactor: FixedValue=0
        Constant CarbonConcentration: FixedValue=0.4
        NutrientDemandFunctions DMDemands: same as Replacements.STRUMold.Root.DMDemands
        NutrientDemandFunctions NDemands
          MultiplyFunction Structural
            VariableReference MinNconc: VariableName=[Leaf].minimumNconc
            VariableReference PotentialDMAllocation: VariableName=[Leaf].potentialDMAllocation.Structural
          Constant Metabolic: FixedValue=0
          Constant Storage: FixedValue=0
          Constant QStructuralPriority: FixedValue=1
          Constant QMetabolicPriority: FixedValue=1
          Constant QStoragePriority: FixedValue=1
        VariableReference BaseHeight: VariableName=[STRUM].Height.CanopyBaseHeight
        VariableReference HeightFunction: VariableName=[STRUM].Height
        VariableReference Wideness: VariableName=[STRUM].Width
        AddFunction Area: same as Replacements.STRUM.Leaf.Canopy.GreenAreaIndex
        Constant MaxNConcAtStartLeafFall: FixedValue=0
          Memo Param value set at establishment
            SCRUM calculates this parameter value during run-time when the crop is established from parameter values set in the relevent SCRUMcrop and SCRUMmanagement objects
        AddFunction MaximumNConc: same as Replacements.STRUM.Leaf.Nitrogen.ConcFunctions.Maximum
        MultiplyFunction CriticalNConc
          Constant StructuralNFactor: FixedValue=0.6
          VariableReference MaxNConcAtStartLeafFall: VariableName=[Leaf].MaxNConcAtStartLeafFall
        MultiplyFunction MinimumNConc
          Constant StructuralNFactor: FixedValue=0.6
          VariableReference MaxNConcAtStartLeafFall: VariableName=[Leaf].MaxNConcAtStartLeafFall
      GenericOrgan Trunk: IsAboveGround=true
        Constant NReallocationFactor: FixedValue=0
        Constant NRetranslocationFactor: FixedValue=0
        Constant DMRetranslocationFactor: FixedValue=0.05
        PhaseLookupValue NitrogenDemandSwitch: Start=BudBreak; End=BareTree
          Constant: FixedValue=1
        BiomassRemoval BiomassRemovalDefaults: HarvestFractionLiveToRemove=0; HarvestFractionDeadToRemove=0; HarvestFractionLiveToResidue=0; HarvestFractionDeadToResidue=0
        Constant SenescenceRate: FixedValue=0; Units=/d
        Constant DetachmentRateFunction: FixedValue=0; Units=/d
        Constant MaintenanceRespirationFunction: FixedValue=0; Units=0-1
        Constant DMConversionEfficiency: FixedValue=1; Units=0-1
        Constant DMReallocationFactor: FixedValue=0
        Constant RemobilisationCost: FixedValue=0
        Constant CarbonConcentration: FixedValue=0.4
        NutrientDemandFunctions DMDemands
          MinimumFunction Structural
            PartitionFractionDemandFunction Available
              Constant PartitionFraction: FixedValue=0
            MultiplyFunction SizeDemand: same as Replacements.STRUM.Trunk.TotalCarbonDemand.TotalDMDemand.SizeDemand
          Constant Metabolic: FixedValue=0
          Constant Storage: FixedValue=0
          Constant QStructuralPriority: FixedValue=1
          Constant QMetabolicPriority: FixedValue=1
          Constant QStoragePriority: FixedValue=1
        NutrientDemandFunctions NDemands
          Constant Storage: FixedValue=0
          Constant Metabolic: FixedValue=0
          MultiplyFunction Structural
            VariableReference MinNconc: VariableName=[Trunk].minimumNconc
            VariableReference PotentialDMAllocation: VariableName=[Trunk].potentialDMAllocation.Structural
          Constant QStructuralPriority: FixedValue=1
          Constant QMetabolicPriority: FixedValue=1
          Constant QStoragePriority: FixedValue=1
        RetranslocateNonStructural RetranslocateNitrogen
        EnergyBalance: same as Replacements.STRUM.Trunk.EnergyBalance
        NutrientPoolFunctions InitialWt
          Constant Structural: Units=g/m^2
            Memo Param value set at establishment
              STRUM calculates this parameter value during run-time when the crop is established from parameter values set in the relevent STRUMtree object
          Constant Metabolic: FixedValue=0
          Constant Storage: FixedValue=0
        Constant Photosynthesis: FixedValue=0
        VariableReference initialNConcFunction: VariableName=[Trunk].MinimumNConc
        Constant MaximumNConc: FixedValue=0.01
          Memo Param value set at establishment
            SCRUM calculates this parameter value during run-time when the crop is established from parameter values set in the relevent SCRUMcrop and SCRUMmanagement objects
        MultiplyFunction CriticalNConc
          Constant StructuralNFactor: FixedValue=0.6
          VariableReference MaxNConc: VariableName=[Trunk].MaxNConc
        MultiplyFunction MinimumNConc
          Constant StructuralNFactor: FixedValue=0.6
          VariableReference MaxNConc: VariableName=[Trunk].MaxNConc
        Constant MatureWt: FixedValue=1000
      GenericOrgan Fruit: IsAboveGround=true
        Constant NReallocationFactor: FixedValue=0
        Constant NRetranslocationFactor: FixedValue=0
        Constant DMRetranslocationFactor: FixedValue=0
        PhaseLookupValue NitrogenDemandSwitch: Start=StartFullCanopy; End=StartLeafFall
          Constant: FixedValue=1
        BiomassRemoval BiomassRemovalDefaults: HarvestFractionLiveToRemove=0.8; HarvestFractionDeadToRemove=0; HarvestFractionLiveToResidue=0.2; HarvestFractionDeadToResidue=1
        Constant SenescenceRate: FixedValue=0; Units=/d
        Constant DetachmentRateFunction: FixedValue=0; Units=/d
        Constant MaintenanceRespirationFunction: FixedValue=0; Units=0-1
        Constant DMConversionEfficiency: FixedValue=1; Units=0-1
        Constant DMReallocationFactor: FixedValue=0
        Constant RemobilisationCost: FixedValue=0
        Constant CarbonConcentration: FixedValue=0.4
        NutrientDemandFunctions DMDemands
          MultiplyFunction Structural
            MaximumFunction RelativeFruitMass: same as Replacements.STRUM.Fruit.TotalCarbonDemand.RelativeFruitMass
            VariableReference Number: VariableName=[Fruit].Number
            VariableReference PotentialDW: VariableName=[Fruit].PotentialDWPerFruit
          Constant Metabolic: FixedValue=0
          Constant Storage: FixedValue=0
          Constant QStructuralPriority: FixedValue=10000
          Constant QMetabolicPriority: FixedValue=100
          Constant QStoragePriority: FixedValue=100
        NutrientDemandFunctions NDemands
          Constant Storage: FixedValue=0
          Constant Metabolic: FixedValue=0
          MultiplyFunction Structural
            VariableReference MinNconc: VariableName=[Trunk].minimumNconc
            VariableReference PotentialDMAllocation: VariableName=[Fruit].potentialDMAllocation.Structural
          Constant QStructuralPriority: FixedValue=1
          Constant QMetabolicPriority: FixedValue=1
          Constant QStoragePriority: FixedValue=1
        RetranslocateNonStructural RetranslocateNitrogen
        NutrientPoolFunctions InitialWt
          Constant Structural: FixedValue=0; Units=g/m^2
          Constant Metabolic: FixedValue=0
          Constant Storage: FixedValue=0
        Constant Photosynthesis: FixedValue=0
        VariableReference initialNConcFunction: VariableName=[Fruit].MaximumNConc
        Constant MaxNConcAtHarvest: FixedValue=0
          Memo Param value set at establishment
            SCRUM calculates this parameter value during run-time when the crop is established from parameter values set in the relevent SCRUMcrop and SCRUMmanagement objects
        AddFunction MaximumNConc: same as Replacements.STRUM.Fruit.Nitrogen.ConcFunctions.Maximum
        MultiplyFunction CriticalNConc
          Constant StructuralNFactor: FixedValue=0.6
          VariableReference MaxNConcAtHarvest: VariableName=[Fruit].MaxNConcAtHarvest
        MultiplyFunction MinimumNConc
          Constant StructuralNFactor: FixedValue=0.6
          VariableReference MaxNConcAtHarvest: VariableName=[Fruit].MaxNConcAtHarvest
        Constant MaximumSize: FixedValue=0; Units=mm
        Constant Density: FixedValue=0; Units=g/cm3
        Constant MinimumDMC: FixedValue=0; Units=g/g
        MultiplyFunction DryMatterPc: same as Replacements.STRUM.Fruit.DryMatterPc
        MultiplyFunction FreshWt: same as Replacements.STRUM.Fruit.FreshWt
        MultiplyFunction Number: same as Replacements.STRUM.Fruit.Number
        DivideFunction FreshWtPerFruit
          VariableReference FreshWt: VariableName=[Fruit].FreshWt
          VariableReference Number: VariableName=[Fruit].Number
        DivideFunction VolumePerFruit
          VariableReference FreshWtPerFruit: VariableName=[Fruit].FreshWtPerFruit
          VariableReference Density: VariableName=[Fruit].Density
        SetOnEvent NextYearsFruitingBudSurvival: same as Replacements.STRUM.Fruit.NextYearsFruitingBudSurvival
        ExpressionFunction Size: Expression=(6*[Fruit].VolumePerFruit/3.1415926)^(1/3)
        Constant PotentialFWPerFruit: FixedValue=250
        MultiplyFunction PotentialDWPerFruit
          VariableReference PotentialFWPerFruit: VariableName=[Fruit].PotentialFWPerFruit
          VariableReference DMC: VariableName=[Fruit].MinimumDMC
      AccumulateFunctionGeneral AccumulatedWaterStress: StartStageName=StartFullCanopy; EndStageName=StartLeafFall; ReduceStageName=StartFullCanopy; FractionRemovedOnStage=1; FractionRemovedOnEvent=0; FractionRemovedOnDate=0
        Memo: same as Replacements.STRUM.AccumulatedWaterStress.Memo
        Constant Day: FixedValue=1; Units=d
        SubtractFunction StressIndex
          Constant One: FixedValue=1
          LinearInterpolationFunction FW
            XYPairs: X=[0.1, 0.9, 1.5]; Y=[0, 1, 1]
            VariableReference XValue: VariableName=[Leaf].Fw
      CompositeBiomass AboveGround: OrganNames=[Leaf, Trunk, Fruit]; IncludeLive=true; IncludeDead=true
      CompositeBiomass Total: OrganNames=[Leaf, Trunk, Fruit, Root]; IncludeLive=true; IncludeDead=true
      CompositeBiomass TotalLive: OrganNames=[Leaf, Trunk, Fruit, Root]; IncludeLive=true; IncludeDead=false
      CompositeBiomass TotalDead: OrganNames=[Leaf, Trunk, Fruit, Root]; IncludeLive=false; IncludeDead=true
      Constant MortalityRate: FixedValue=0
      Constant SeedMortalityRate: FixedValue=0
      Constant MaxPrunedHeight: FixedValue=0
      AddFunction Height: same as Replacements.STRUM.Height
      AddFunction Width: same as Replacements.STRUM.Width
      LinearInterpolationFunction RelativeAnnualDimension
        XYPairs: X=[0, 6]; Y=[0.3, 1]
        VariableReference XValue: VariableName=[Phenology].Age.YearDecimal
      LinearInterpolationFunction RelativeSeasonalDimension
        XYPairs: X=[3, 4, 5]; Y=[0, 0.6, 1]
        VariableReference XValue: VariableName=[Phenology].Stage
      AddFunction RadiationIntercepted
        VariableReference LeafInterception: VariableName=[STRUM].Leaf.RadiationIntercepted
        VariableReference TrunkInterception: VariableName=[STRUM].Trunk.EnergyBalance.RadiationInterceptedByDead
      Constant RowWidth: FixedValue=0
      MultiplyFunction TranspirationPerTree
        VariableReference: VariableName=[Leaf].Transpiration
        VariableReference RowWidth: VariableName=[STRUM].RowWidth
        VariableReference InterRowSpacing: VariableName=[STRUM].InterRowSpacing
      Constant InterRowSpacing
  DataStore
    ExcelInput: FileNames=[AllObs.xlsx]; SheetNames=[Observed]
    PredictedObserved: PredictedTableName=RowZoneReport; ObservedTableName=Observed; FieldNameUsedForMatch=SimulationName; FieldName2UsedForMatch=Zone; FieldName3UsedForMatch=Clock.Today; AllColumns=false
    PredictedObserved DrainagePO (disabled): PredictedTableName=Drainage; ObservedTableName=Observed; FieldNameUsedForMatch=SimulationName; FieldName2UsedForMatch=Zone; FieldName3UsedForMatch=Clock.Today; AllColumns=false
  Folder PatternTest
    Simulation Decidious
      Clock: Start=2000-07-21; End=2011-07-01
      Summary SummaryFile
      Weather: FileName=WeatherFiles\Whakatu.met
      MicroClimate: a_interception=0; b_interception=1; c_interception=0; d_interception=0; SoilHeatFluxFraction=0.4; MinimumHeightDiffForNewLayer=0; NightInterceptionFraction=0.5; ReferenceHeight=2
      SoilArbitrator Soil Arbitrator
      Manager AutoIrrigationDeficitBased
        AllowIrrigation = True
        depthPAWC = 1000
        triggerDeficit = 80
        irrigateAmount = 15
        returndays = 3
        IrrigateAlley = True
```csharp
using Newtonsoft.Json;
using APSIM.Shared.Utilities;
using System.Xml.Serialization;
using Models.Soils;
using Models.PMF;
using Models.Core;
using System;
using Models.Interfaces;

        
namespace Models
{
    [Serializable] 
    [System.Xml.Serialization.XmlInclude(typeof(Model))]
    public class Script : Model
    {
        [Link] private Clock Clock;
        [Link] private Zone patch;
        [Link] private ISummary summary;
        //[Link] private Irrigation Irrigation;
        [Link] private Soil Soil;
        [Link(IsOptional = true)] private IPlant existingCrop;
        [Link] private IPhysical soilPhysical;
        [Link] private ISoilWater waterBalance;
        [Link(Type = LinkType.Scoped, ByName = true)] private Zone Row;
        [Link(Type = LinkType.Scoped, ByName = true)] private Zone Alley;
       
        // Parameters from user interface
        [Separator("Manager for controlling automatic irrigation")]
        [Description(" Allow this manager to control irrigation?")]
        public bool AllowIrrigation { get; set; }
      
        [Separator(" Parameters for the irrigation system")]
        [Description(" Depth to calculate PAWC and deficit (mm)")]
        public double depthPAWC { get; set; }
        [Description(" Deficit to trigger irrigations (% PAWC)")]
        public double triggerDeficit { get; set; }
        [Description(" Irrigation amount to apply each event (mm)")]
        public double irrigateAmount { get; set; }
        [Description(" Minimum days for irrigation to return")]
        public double returndays { get; set; }
        
        [Description("Is the Alley zone irrigated?")]
        public bool IrrigateAlley {get; set;}

        //Class members
        [JsonIgnore] public double IrrigLayerSWDeficit { get; set; }
        [JsonIgnore] public double TopSWC { get; set; }
        [JsonIgnore] public double DaysSinceIrrigation { get; set; }
        [JsonIgnore] public double AmountToApply { get; set; }
        [JsonIgnore] public double SeasonAppliedAmount { get; set; }
        
        private bool IrrigationIsAllowed { get; set; }
        private bool CropIsActive { get; set; }
        private bool IrrigatorIsAvailable { get; set; }
        private bool SoilIsDry { get; set; }
        private double TopDUL;
        private double TopLL;
        private int nLayers;

    
        //Calculate static soil variables
        [EventSubscribe("StartOfSimulation")]
        private void OnStartOfSimulation(object sender, EventArgs e)
        {
            
            //Can we irrigate at all?
            IrrigationIsAllowed = false; 
            if (AllowIrrigation)
                IrrigationIsAllowed = true; 

            //Calculate soil water variables
            double depthFromSurface = 0.0;
            double fracLayer = 0.0;
            nLayers = soilPhysical.Thickness.Length;
            for (int layer = 0; layer < nLayers; layer++)
            {
                fracLayer = Math.Min(1.0, (depthPAWC - depthFromSurface) / soilPhysical.Thickness[layer]);
                TopLL += soilPhysical.LL15mm[layer] * fracLayer;
                TopDUL += soilPhysical.DULmm[layer] * fracLayer;
                depthFromSurface += soilPhysical.Thickness[layer];
                if (depthFromSurface >= depthPAWC)
                    layer = nLayers;
            }
        }
             
        //Determine daily requirement for irrigation
        [EventSubscribe("StartOfDay")]
        private void OnStartOfDay(object sender, EventArgs e)
        {
            AmountToApply = 0.0;
            DaysSinceIrrigation += 1;

            //Is the row crop actively growing?
            CropIsActive = false;
            double StageCode = (double)Row.Get("STRUM.Phenology.Stage");
            if ((StageCode > 3.0) && (StageCode<5.0))
            {
                CropIsActive = true;
            }
          
            //Is the irrigator available?
            IrrigatorIsAvailable = false;
            if (DaysSinceIrrigation >= returndays)
                IrrigatorIsAvailable = true;
          
            //Is the soil dry enough to require irrigation?
            SoilIsDry = false;
            double depthFromSurface = 0.0;
            double fracLayer = 0.0;
            TopSWC = 0.0;
            for (int layer = 0; layer < nLayers; layer++)
            //for (int layer = 0; depthFromSurface < depthPAWC + soilPhysical.Thickness[layer]; layer++)
            {
                fracLayer = Math.Min(1.0, (depthPAWC - depthFromSurface) / soilPhysical.Thickness[layer]);
                TopSWC += waterBalance.SWmm[layer] * fracLayer;
                depthFromSurface += soilPhysical.Thickness[layer];
                if (depthFromSurface >= depthPAWC)
                    layer = nLayers;
            }
            
            IrrigLayerSWDeficit = TopSWC - TopDUL;
            if (Math.Max(0.0, -IrrigLayerSWDeficit) >= (TopDUL - TopLL) * (100 - triggerDeficit) / 100)
                SoilIsDry = true;

            //Are all the conditions ratifying irrigation
            if (IrrigationIsAllowed && CropIsActive && IrrigatorIsAvailable && SoilIsDry)
            {
                //Lets irrigate well !!!!
                Irrigation irrigRow = (Irrigation)Row.Get("Irrigation");
                irrigRow.Apply(irrigateAmount, depth: 0);
                DaysSinceIrrigation = 0;
                if (IrrigateAlley)
                {
                   Irrigation irrigAlley = (Irrigation)Alley.Get("Irrigation");
                   irrigAlley.Apply(irrigateAmount , depth: 0);           
                }
            }
        }
    }
}
```
      Manager AutomaticFertiliser
        AllowFertiliser = yes
        Depth2SoilN = 1500
        CriticalSoilN = 30
        FertNAmount = 50
        FertType = UreaN
        FertApplicationDepth = 10
        FertMinimumDays = 15
```csharp
using Newtonsoft.Json;
using Models.Soils.Nutrients;
using Models.Interfaces;
using System.Xml.Serialization;
using APSIM.Shared.Utilities;
using Models.Soils;
using Models.PMF;
using Models.Core;
using System;

namespace Models
{
    [Serializable]
    public class Script : Model
    {
        [Link] private Clock Clock;
        [Link] private Fertiliser fertiliser;
        [Link] private ISummary summary;
        [Link] private Soil Soil;
        [Link(Type = LinkType.Scoped, ByName = true)] private Zone Row;
        private DateTime lastApplicationDate;
        private bool fertiliserIsAllowed;
        private int nLayers;
        [Link(ByName = true)]
        private ISolute NO3;
        [Link(ByName = true)]
        private ISolute NH4;
        [Link(ByName = true)]
        private ISolute Urea;
        [Link]
        private IPhysical soilPhysical;

        //User inputs from properties tab
        [Description("Turn fertiliser applications on? ")]
        public yesnoType AllowFertiliser { get; set; }
        
        [Description("Depth to calculate available soil N (mm): ")]
        public double Depth2SoilN { get; set; }

        [Description("Minimum available N, triggers an application (kgN/ha): ")]
        public double CriticalSoilN { get; set; }

        [Description("Amount of N fertiliser for each application (kgN/ha): ")]
        public double FertNAmount { get; set; }

        [Description("Type of N fertiliser to apply: ")]
        [Display(Type = DisplayType.FertiliserType)]public string FertType { get; set; }

        [Description("Depth at which to apply the fertiliser (mm): ")]
        public double FertApplicationDepth { get; set; }
       
        [Description("Minimum period between applications (days): ")]
        public double FertMinimumDays { get; set; }
       
        public enum yesnoType
        {
            /// <summary>a positive answer</summary>
            yes,
            /// <summary>a negative answer</summary>
            no
        }

        [JsonIgnore] public double TopMineralN { get; set; }
        private bool CropIsActive { get; set; }
        

        [EventSubscribe("StartOfSimulation")]
        private void OnStartOfSimulation(object sender, EventArgs e)
        {
            fertiliserIsAllowed = (AllowFertiliser == yesnoType.yes);
            nLayers = soilPhysical.Thickness.Length;
        }

        [EventSubscribe("DoManagement")]
        private void OnDoManagement(object sender, EventArgs e)
        {
            double daysSinceLastApplication = (Clock.Today - lastApplicationDate).TotalDays;
            
            //Is the row crop actively growing?
            CropIsActive = false;
            double StageCode = (double)Row.Get("STRUM.Phenology.Stage");
            if ((StageCode > 3.0) && (StageCode<5.0))
            {
                CropIsActive = true;
            }
            
            // get the N stored in the soil
            double depthFromSurface = 0.0;
            double fracLayer = 0.0;
            TopMineralN = 0.0;
            for (int layer = 0; layer < nLayers; layer++)
            {
                fracLayer = Math.Min(1.0, (Depth2SoilN - depthFromSurface) / soilPhysical.Thickness[layer]);
                TopMineralN += (NO3.kgha[layer]
                + NH4.kgha[layer]
                + Urea.kgha[layer])
                * fracLayer;
                depthFromSurface += soilPhysical.Thickness[layer];
                if (depthFromSurface >= Depth2SoilN)
                    layer = nLayers;
            }

            if (fertiliserIsAllowed && CropIsActive && (daysSinceLastApplication >= FertMinimumDays) && (TopMineralN <= CriticalSoilN))
            {
                fertiliser.Apply(FertNAmount, FertType, FertApplicationDepth);
                lastApplicationDate = Clock.Today;
            }
        }
    }
}
```
      ZoneAgregate (disabled)
      Report ZoneAgregateReport (disabled): EventNames=[Clock].DoReport
        VariableNames:
          [Clock].Today
          [ZoneAgregate].SimulationArea
          [ZoneAgregate].EO
          [ZoneAgregate].ES
          [ZoneAgregate].ET
          [ZoneAgregate].IncommingRadiation
          [ZoneAgregate].GreenAreaRadiationInterception
          [ZoneAgregate].DeadMaterialRadiationInterception
          [ZoneAgregate].FRadIntGreen
          [ZoneAgregate].FRadIntDead
          [ZoneAgregate].Irrigation
          [ZoneAgregate].Nitrogen
      RectangularZone Row: Length=100; Width=1.3; Slope=0; AspectAngle=0; Altitude=50
        Report RowZoneReport: EventNames=[Clock].DoReport
        Soil: Latitude=0; Longitude=0
          LayerStructure: Thickness=[200, 200, 200, 200, 200, 200, 300, 300, 400, 800]
          Chemical: PHUnits=Water
            Thickness  PH   CEC
            100        6.6  12.44
            200        6.2  11.6525
            300        5.7  11.045
            300        5.5  10.6625
            300        5.5  9.4025
            300        5.5  9.4025
            CEC source: Calculated
          Water: Thickness=[300, 300, 300, 300, 300, 300, 1200]; InitialValues=[0.42, 0.41, 0.5, 0.46, 0.45, 0.43, 0.43]; InitialPAWmm=702; RelativeTo=LL15; FilledFromTop=false
          WaterBalance SoilWater: SummerDate=1-Nov; SummerU=9; SummerCona=4.4; WinterDate=1-Apr; WinterU=9; WinterCona=4.4; DiffusConst=88; DiffusSlope=35.4; Salb=0.3; CN2Bare=68; CNRed=20; CNCov=0.8; DischargeWidth=0; CatchmentArea=0; PSIDul=-100
            Thickness  SWCON  KLAT
            300        0.55   0
            300        0.55   0
            300        0.55   0
            300        0.55   0
            300        0.1    0
            300        0.02   0
            400        0.02   0
            800        0      0
          Organic: FOMCNRatio=30; CarbonUnits=Total
            Thickness  Carbon  SoilCNRatio  FBiom  FInert  FOM
            100        1.82    11.5         0.025  0.3     1243.931
            200        1.47    11.5         0.025  0.4     833.832
            300        1.2     11.5         0.015  0.75    457.617
            300        1.03    11.5         0.01   0.9     251.145
            300        0.47    11.5         0.01   0.96    137.831
            300        0.47    11.5         0.01   0.96    75.644
          OutputLayers: Thickness=[300, 300, 300, 300, 300, 300]
          Solute NO3: Thickness=[100, 200, 300, 300, 300, 300]; InitialValues=[217, 15, 1.66667, 1.66667, 0, 0]; InitialValuesUnits=ppm; WaterTableConcentration=0; D0=0; DepthConstant=0; MaxDepthSoluteAccessible=0; RunoffEffectivenessAtMovingSolute=0; MaxEffectiveRunoff=0
          Solute NH4: Thickness=[100, 200, 300, 300, 300, 300]; InitialValues=[0, 0, 0, 0, 0, 0]; InitialValuesUnits=ppm; WaterTableConcentration=0; D0=0; DepthConstant=0; MaxDepthSoluteAccessible=0; RunoffEffectivenessAtMovingSolute=0; MaxEffectiveRunoff=0
          Solute Urea: Thickness=[100, 200, 300, 300, 300, 300]; InitialValues=[0, 0, 0, 0, 0, 0]; InitialValuesUnits=kg/ha; WaterTableConcentration=0; D0=0; DepthConstant=0; MaxDepthSoluteAccessible=0; RunoffEffectivenessAtMovingSolute=0; MaxEffectiveRunoff=0
          Physical
            Thickness  ParticleSizeSand  ParticleSizeSilt  ParticleSizeClay  Rocks     BD  AirDry  LL15  DUL   SAT   KS
            300        5                 65                30                0.136527  1   0.2     0.2   0.4   0.5   100
            300        5                 65                30                0.136527  1   0.2     0.2   0.4   0.5   100
            300        5                 65                30                0.136527  1   0.25    0.25  0.3   0.5   50
            300        5                 65                30                0.136527  1   0.2     0.2   0.3   0.5   40
            300        5                 65                30                0.136527  1   0.2     0.2   0.25  0.5   40
            300        5                 65                30                0         1   0.2     0.2   0.25  0.53  40
            1200       5                 65                30                0         1   0.2     0.2   0.25  0.53  40
            Rocks, ParticleSizeSand, ParticleSizeSilt, ParticleSizeClay source: Calculated
            SoilCrop STRUMSoil: LL=[0.2, 0.2, 0.2, 0.2, 0.2, 0.2, 0.2]; KL=[1, 1, 1, 1, 1, 1, 1]; XF=[1, 1, 1, 1, 1, 1, 1]
            SoilCrop SPRUMSoil: LL=[0.2, 0.2, 0.2, 0.2, 0.2, 0.2, 0.2]; KL=[0.11, 0.11, 0.11, 0.11, 0.11, 0.11, 0.11]; XF=[1, 1, 1, 1, 1, 1, 1]
          Nutrient
          SoilTemperature Temperature
        SurfaceOrganicMatter: InitialResidueName=wheat_stubble; InitialResidueType=wheat; InitialResidueMass=500; InitialStandingFraction=0; InitialCPR=0; InitialCNR=100
        Plant STRUM
        StrumTreeInstance Apple: TreeType=Deciduous; RowSpacing=5; InterRowSpacing=1; AlleyZoneWidthFrac=0.6; AgeAtSimulationStart=1; YearsToMaxDimension=6; TrunkMassAtMaxDimension=12; WoodDensity=500; BudBreakDAWS=70; StartFullCanopyDAWS=125; StartLeafFallDAWS=305; EndLeafFallDAWS=330; GRINZ=true; MaxRD=3000; Proot=0.1; Pleaf=0.2; Ptrunk=0.15; CanopyBaseHeight=1000; MaxPrunedHeight=2500; MaxHeight=3500; MaxPrunedWidth=5000; MaxWidth=5000; RootNConc=0.01; LeafNConc=0.02; TrunkNConc=0.01; FruitNConc=0.02; ExtinctCoeff=0.6; BaseCover=0; MaxCover=0.95; RUE=1.2; GSMax=0.006; R50=100; WaterStress=false; Number=50; PotentialFWPerFruit=70; DMC=0.14; FruitDensity=0.75; DateMaxBloom=1-oct; DAFStartLinearGrowth=30; DAFEndLinearGrowth=90; DAFMaxSize=150; TotalSolarRadiation=0
        Fertiliser
        Irrigation
        BiomassRemovalEvents Pick: NameOfPlantToRemoveFrom=STRUM; RemovalType=0; RemovalDates=[1-may]
          BiomassRemovalFractions:
            PlantName  OrganName  TypeString  LiveToRemove  DeadToRemove  LiveToResidue  DeadToResidue
            STRUM      Root       Cutting     0             0             0              0
            STRUM      Leaf       Cutting     0             0             0.1            0
            STRUM      Trunk      Cutting     0             0             0.05           0
            STRUM      Fruit      Cutting     0.75          0             0.1            0
        BiomassRemovalEvents Prune: NameOfPlantToRemoveFrom=STRUM; RemovalType=3
          BiomassRemovalFractions:
            PlantName  OrganName  TypeString  LiveToRemove  DeadToRemove  LiveToResidue  DeadToResidue
            STRUM      Root       Pruning     0             0             0              0
            STRUM      Leaf       Pruning     0             0             1              1
            STRUM      Trunk      Pruning     0             0             0.15           0.15
            STRUM      Fruit      Pruning     0             0             1              1
      RectangularZone Alley: Length=100; Width=2.2; Slope=0; AspectAngle=0; Altitude=50
        Report AlleyZoneReport: EventNames=[Clock].DoReport
        Soil: Latitude=0; Longitude=0
          LayerStructure: Thickness=[200, 200, 200, 200, 200, 200, 300, 300, 400, 800]
          Chemical: same as PatternTest.Decidious.Row.Soil.Chemical
          Water: Thickness=[300, 300, 300, 300, 300, 300, 1200]; InitialValues=[0.4, 0.4, 0.4, 0.46, 0.45, 0.43, 0.43]; InitialPAWmm=663; RelativeTo=LL15; FilledFromTop=false
          WaterBalance SoilWater: same as PatternTest.Decidious.Row.Soil.SoilWater
          Organic: FOMCNRatio=30; CarbonUnits=Total
            Thickness  Carbon  SoilCNRatio  FBiom  FInert  FOM
            100        1.82    11.5         0.025  0.3     1243.93
            200        1.47    11.5         0.025  0.4     833.832
            300        1.2     11.5         0.015  0.75    457.617
            300        1.03    11.5         0.01   0.9     251.145
            300        0.47    11.5         0.01   0.96    137.831
            300        0.47    11.5         0.01   0.96    75.6435
          OutputLayers: Thickness=[300, 300, 300, 300, 300, 300]
          Solute NO3: same as PatternTest.Decidious.Row.Soil.NO3
          Solute NH4: same as PatternTest.Decidious.Row.Soil.NH4
          Solute Urea: same as PatternTest.Decidious.Row.Soil.Urea
          Physical
            Thickness  ParticleSizeSand  ParticleSizeSilt  ParticleSizeClay  Rocks     BD  AirDry  LL15  DUL   SAT   KS
            300        5                 65                30                0.136527  1   0.2     0.2   0.4   0.5   100
            300        5                 65                30                0.136527  1   0.2     0.2   0.4   0.5   100
            300        5                 65                30                0.136527  1   0.25    0.25  0.3   0.5   50
            300        5                 65                30                0.136527  1   0.2     0.2   0.21  0.5   40
            300        5                 65                30                0.136527  1   0.2     0.2   0.21  0.5   40
            300        5                 65                30                0         1   0.2     0.2   0.21  0.53  40
            1200       5                 65                30                0         1   0.2     0.2   0.21  0.53  40
            Rocks, ParticleSizeSand, ParticleSizeSilt, ParticleSizeClay source: Calculated
            SoilCrop STRUMSoil: LL=[0.2, 0.2, 0.2, 0.2, 0.2, 0.2, 0.2]; KL=[1, 1, 1, 1, 1, 1, 1]; XF=[1, 1, 1, 1, 1, 1, 1]
            SoilCrop SPRUMSoil: LL=[0.2, 0.2, 0.2, 0.2, 0.2, 0.2, 0.2]; KL=[0.11, 0.11, 0.11, 0.11, 0.11, 0.11, 0.11]; XF=[1, 1, 1, 1, 1, 1, 1]
          Nutrient
          SoilTemperature Temperature
        SurfaceOrganicMatter: InitialResidueName=wheat_stubble; InitialResidueType=wheat; InitialResidueMass=500; InitialStandingFraction=0; InitialCPR=0; InitialCNR=100
        Fertiliser
        Irrigation
        Plant SPRUM
        SprumPastureInstance UnderStoryPasture: AgeAtSimulationStart=0; YearsToMaxDimension=1; RUE=1; Presidue=0; RsenRate=0; Proot=0.1; PSBaseT=5; PSLOptT=20; PSUOptT=25; PSMaxT=30; GRINZ=true; MaxRD=600; MaxHeight=300; MaxPrunedHeight=100; MaxCover=0.97; MinCover=0.5; ExtinctCoeff=0.5; RegrowthDuration=300; FullCanopyDuration=0; BaseT=3; OptT=25; MaxT=35; RootNConc=0.01; LeafNConc=0.05; ResidueNConc=0.01; LegumePropn=0.2; GSMax=0.004; R50=150; WaterStress=true
        BiomassRemovalEvents Mow: NameOfPlantToRemoveFrom=SPRUM; RemovalType=0
          BiomassRemovalFractions:
            PlantName  OrganName  TypeString  LiveToRemove  DeadToRemove  LiveToResidue  DeadToResidue
            SPRUM      Residue    Cutting     0             0             0.5            0.5
            SPRUM      Leaf       Cutting     0             0             1              1
            SPRUM      Nodule     Cutting     0             0             0              0
            SPRUM      Root       Cutting     0             0             0              0
    Simulation EverGreen
      Clock: Start=2000-07-21; End=2011-07-01
      Summary SummaryFile
      Weather: FileName=WeatherFiles\Whakatu.met
      MicroClimate: a_interception=0; b_interception=1; c_interception=0; d_interception=0; SoilHeatFluxFraction=0.4; MinimumHeightDiffForNewLayer=0; NightInterceptionFraction=0.5; ReferenceHeight=2
      SoilArbitrator Soil Arbitrator
      Manager AutoIrrigationDeficitBased: same as PatternTest.Decidious.AutoIrrigationDeficitBased
      Manager AutomaticFertiliser: same as PatternTest.Decidious.AutomaticFertiliser
      ZoneAgregate (disabled)
      Report ZoneAgregateReport (disabled): same as PatternTest.Decidious.ZoneAgregateReport
      RectangularZone Row: Length=100; Width=1.3; Slope=0; AspectAngle=0; Altitude=50
        Report RowZoneReport: EventNames=[Clock].DoReport
        Soil: same as PatternTest.Decidious.Row.Soil
        SurfaceOrganicMatter: InitialResidueName=wheat_stubble; InitialResidueType=wheat; InitialResidueMass=500; InitialStandingFraction=0; InitialCPR=0; InitialCNR=100
        Plant STRUM
        StrumTreeInstance Avocado: TreeType=Ever green; RowSpacing=7; InterRowSpacing=7; AlleyZoneWidthFrac=0.1; AgeAtSimulationStart=10; YearsToMaxDimension=6; TrunkMassAtMaxDimension=15; WoodDensity=500; BudBreakDAWS=70; StartFullCanopyDAWS=260; StartLeafFallDAWS=310; EndLeafFallDAWS=360; GRINZ=true; MaxRD=3000; Proot=0.3; Pleaf=0.5; Ptrunk=0.2; CanopyBaseHeight=1800; MaxPrunedHeight=5000; MaxHeight=5700; MaxPrunedWidth=5800; MaxWidth=6500; RootNConc=0.01; LeafNConc=0.02; TrunkNConc=0.01; FruitNConc=0.02; ExtinctCoeff=0.5; BaseCover=0.85; MaxCover=0.96; RUE=0.9; GSMax=0.005; R50=200; WaterStress=true; Number=500; PotentialFWPerFruit=250; DMC=0.29; FruitDensity=0.43; DateMaxBloom=20-oct; DAFStartLinearGrowth=130; DAFEndLinearGrowth=340; DAFMaxSize=366; TotalSolarRadiation=0
        Fertiliser
        Irrigation
        BiomassRemovalEvents Pick: same as PatternTest.Decidious.Row.Pick
        BiomassRemovalEvents Prune: NameOfPlantToRemoveFrom=STRUM; RemovalType=3
          BiomassRemovalFractions:
            PlantName  OrganName  TypeString  LiveToRemove  DeadToRemove  LiveToResidue  DeadToResidue
            STRUM      Root       Pruning     0             0             0              0
            STRUM      Leaf       Pruning     0             0             1              1
            STRUM      Trunk      Pruning     0             0             0.15           1
            STRUM      Fruit      Pruning     0             0             1              1
      RectangularZone Alley: same as PatternTest.Decidious.Alley
    Simulation BareUnderStory
      Clock: Start=2000-07-21; End=2011-07-01
      Summary SummaryFile
      Weather: FileName=WeatherFiles\Whakatu.met
      MicroClimate: a_interception=0; b_interception=1; c_interception=0; d_interception=0; SoilHeatFluxFraction=0.4; MinimumHeightDiffForNewLayer=0; NightInterceptionFraction=0.5; ReferenceHeight=2
      SoilArbitrator Soil Arbitrator
      Manager AutoIrrigationDeficitBased: same as PatternTest.Decidious.AutoIrrigationDeficitBased
      Manager AutomaticFertiliser: same as PatternTest.Decidious.AutomaticFertiliser
      ZoneAgregate
      Report ZoneAgregateReport: EventNames=[Clock].DoReport
        VariableNames:
          [Clock].Today
          [ZoneAgregate].SimulationArea
          [ZoneAgregate].EO
          [ZoneAgregate].ES
          [ZoneAgregate].ET
          [ZoneAgregate].IncommingRadiation
          [ZoneAgregate].GreenAreaRadiationInterception
          [ZoneAgregate].DeadMaterialRadiationInterception
          [ZoneAgregate].FRadIntGreen
          [ZoneAgregate].FRadIntDead
          [ZoneAgregate].Irrigation
          [ZoneAgregate].Nitrogen
      RectangularZone Row: Length=100; Width=1.3; Slope=0; AspectAngle=0; Altitude=50
        Report RowZoneReport: EventNames=[Clock].DoReport
        Soil: same as PatternTest.Decidious.Row.Soil
        SurfaceOrganicMatter: InitialResidueName=wheat_stubble; InitialResidueType=wheat; InitialResidueMass=500; InitialStandingFraction=0; InitialCPR=0; InitialCNR=100
        Plant STRUM
        StrumTreeInstance Avocado: TreeType=Deciduous; RowSpacing=4; InterRowSpacing=1; AlleyZoneWidthFrac=0.5; AgeAtSimulationStart=10; YearsToMaxDimension=6; TrunkMassAtMaxDimension=15; WoodDensity=500; BudBreakDAWS=70; StartFullCanopyDAWS=260; StartLeafFallDAWS=310; EndLeafFallDAWS=360; GRINZ=true; MaxRD=3000; Proot=0.3; Pleaf=0.5; Ptrunk=0.2; CanopyBaseHeight=1800; MaxPrunedHeight=5000; MaxHeight=5700; MaxPrunedWidth=4000; MaxWidth=4000; RootNConc=0.01; LeafNConc=0.02; TrunkNConc=0.01; FruitNConc=0.02; ExtinctCoeff=0.5; BaseCover=0.85; MaxCover=0.96; RUE=0.9; GSMax=0.005; R50=200; WaterStress=true; Number=500; PotentialFWPerFruit=250; DMC=0.29; FruitDensity=0.43; DateMaxBloom=20-oct; DAFStartLinearGrowth=130; DAFEndLinearGrowth=340; DAFMaxSize=366; TotalSolarRadiation=0
        Fertiliser
        Irrigation
        BiomassRemovalEvents Pick: same as PatternTest.Decidious.Row.Pick
        BiomassRemovalEvents Prune: same as PatternTest.EverGreen.Row.Prune
      RectangularZone Alley: Length=100; Width=2.2; Slope=0; AspectAngle=0; Altitude=50
        Report BareAlleyZoneReport: EventNames=[Clock].DoReport
          VariableNames:
            [Clock].Today
            sum([Alley].Soil.OutputLayers.SWmm)
            [Alley].Soil.OutputLayers.SW
            [Alley].Irrigation.IrrigationApplied
            [Alley].Fertiliser.NitrogenApplied
            [Alley].Soil.SoilWater.Drainage
            [Alley].Soil.SoilWater.Evaporation
        Soil: same as PatternTest.Decidious.Alley.Soil
        SurfaceOrganicMatter: InitialResidueName=wheat_stubble; InitialResidueType=wheat; InitialResidueMass=500; InitialStandingFraction=0; InitialCPR=0; InitialCNR=100
        Fertiliser
        Irrigation
        Plant SPRUM
    Experiment AlleyFrac
      Factors
        Factor: Specification=[Row].Avocado.AlleyZoneWidthFrac = 0.01,0.33,0.66,.99
      Simulation BareUnderStory1
        Clock: Start=2000-07-21; End=2001-07-01
        Summary SummaryFile
        Weather: FileName=WeatherFiles\Whakatu.met
        MicroClimate: a_interception=0; b_interception=1; c_interception=0; d_interception=0; SoilHeatFluxFraction=0.4; MinimumHeightDiffForNewLayer=0; NightInterceptionFraction=0.5; ReferenceHeight=2
        SoilArbitrator Soil Arbitrator
        Manager AutoIrrigationDeficitBased: same as PatternTest.Decidious.AutoIrrigationDeficitBased
        Manager AutomaticFertiliser: same as PatternTest.Decidious.AutomaticFertiliser
        ZoneAgregate
        Report ZoneAgregateReport: same as PatternTest.BareUnderStory.ZoneAgregateReport
        RectangularZone Row: same as PatternTest.BareUnderStory.Row
        RectangularZone Alley: same as PatternTest.BareUnderStory.Alley
    Experiment AlleyWidth
      Factors
        Factor
          CompositeFactor 1m
            Specifications:
              [Row].Avocado.MaxPrunedWidth = 1000
              [Row].Avocado.MaxWidth = 1000
          CompositeFactor 2m
            Specifications:
              [Row].Avocado.MaxPrunedWidth = 2000
              [Row].Avocado.MaxWidth = 2000
          CompositeFactor 3m
            Specifications:
              [Row].Avocado.MaxPrunedWidth = 3000
              [Row].Avocado.MaxWidth = 3000
          CompositeFactor 4m
            Specifications:
              [Row].Avocado.MaxPrunedWidth = 4000
              [Row].Avocado.MaxWidth = 4000
      Simulation BareUnderStory2
        Clock: Start=2000-07-21; End=2001-07-01
        Summary SummaryFile
        Weather: FileName=WeatherFiles\Whakatu.met
        MicroClimate: a_interception=0; b_interception=1; c_interception=0; d_interception=0; SoilHeatFluxFraction=0.4; MinimumHeightDiffForNewLayer=0; NightInterceptionFraction=0.5; ReferenceHeight=2
        SoilArbitrator Soil Arbitrator
        Manager AutoIrrigationDeficitBased: same as PatternTest.Decidious.AutoIrrigationDeficitBased
        Manager AutomaticFertiliser: same as PatternTest.Decidious.AutomaticFertiliser
        ZoneAgregate
        Report ZoneAgregateReport: same as PatternTest.BareUnderStory.ZoneAgregateReport
        RectangularZone Row: Length=100; Width=1.3; Slope=0; AspectAngle=0; Altitude=50
          Report RowZoneReport: EventNames=[Clock].DoReport
          Soil: same as PatternTest.Decidious.Row.Soil
          SurfaceOrganicMatter: InitialResidueName=wheat_stubble; InitialResidueType=wheat; InitialResidueMass=500; InitialStandingFraction=0; InitialCPR=0; InitialCNR=100
          Plant STRUM
          StrumTreeInstance Avocado: TreeType=Deciduous; RowSpacing=4; InterRowSpacing=1; AlleyZoneWidthFrac=0.75; AgeAtSimulationStart=10; YearsToMaxDimension=6; TrunkMassAtMaxDimension=15; WoodDensity=500; BudBreakDAWS=70; StartFullCanopyDAWS=260; StartLeafFallDAWS=310; EndLeafFallDAWS=360; GRINZ=true; MaxRD=3000; Proot=0.3; Pleaf=0.5; Ptrunk=0.2; CanopyBaseHeight=1800; MaxPrunedHeight=5000; MaxHeight=5700; MaxPrunedWidth=4000; MaxWidth=4000; RootNConc=0.01; LeafNConc=0.02; TrunkNConc=0.01; FruitNConc=0.02; ExtinctCoeff=0.5; BaseCover=0.85; MaxCover=0.96; RUE=0.9; GSMax=0.005; R50=200; WaterStress=true; Number=500; PotentialFWPerFruit=250; DMC=0.29; FruitDensity=0.43; DateMaxBloom=20-oct; DAFStartLinearGrowth=130; DAFEndLinearGrowth=340; DAFMaxSize=366; TotalSolarRadiation=0
          Fertiliser
          Irrigation
          BiomassRemovalEvents Pick: same as PatternTest.Decidious.Row.Pick
          BiomassRemovalEvents Prune: same as PatternTest.EverGreen.Row.Prune
        RectangularZone Alley: same as PatternTest.BareUnderStory.Alley
    Experiment TotalWidth
      Factors
        Factor: Specification=[Row].Avocado.RowSpacing = 2,4
      Simulation BareUnderStory4
        Clock: Start=2000-07-21; End=2001-07-01
        Summary SummaryFile
        Weather: FileName=WeatherFiles\Whakatu.met
        MicroClimate: a_interception=0; b_interception=1; c_interception=0; d_interception=0; SoilHeatFluxFraction=0.4; MinimumHeightDiffForNewLayer=0; NightInterceptionFraction=0.5; ReferenceHeight=2
        SoilArbitrator Soil Arbitrator
        Manager AutoIrrigationDeficitBased: same as PatternTest.Decidious.AutoIrrigationDeficitBased
        Manager AutomaticFertiliser: same as PatternTest.Decidious.AutomaticFertiliser
        ZoneAgregate
        Report ZoneAgregateReport: same as PatternTest.BareUnderStory.ZoneAgregateReport
        RectangularZone Row: Length=100; Width=1.3; Slope=0; AspectAngle=0; Altitude=50
          Report RowZoneReport: EventNames=[Clock].DoReport
          Soil: Latitude=0; Longitude=0
            LayerStructure: Thickness=[200, 200, 200, 200, 200, 200, 300, 300, 400, 800]
            Chemical: same as PatternTest.Decidious.Row.Soil.Chemical
            Water: Thickness=[300, 300, 300, 300, 300, 300, 1200]; InitialValues=[0.35, 0.35, 0.3, 0.21, 0.21, 0.21, 0.21]; InitialPAWmm=66; RelativeTo=LL15; FilledFromTop=false
            WaterBalance SoilWater: same as PatternTest.Decidious.Row.Soil.SoilWater
            Organic: same as PatternTest.Decidious.Row.Soil.Organic
            OutputLayers: Thickness=[300, 300, 300, 300, 300, 300]
            Solute NO3: same as PatternTest.Decidious.Row.Soil.NO3
            Solute NH4: same as PatternTest.Decidious.Row.Soil.NH4
            Solute Urea: same as PatternTest.Decidious.Row.Soil.Urea
            Nutrient
            SoilTemperature Temperature
            Physical
              Thickness  ParticleSizeSand  ParticleSizeSilt  ParticleSizeClay  Rocks     BD  AirDry  LL15  DUL   SAT   KS
              300        5                 65                30                0.136527  1   0.2     0.3   0.35  0.5   100
              300        5                 65                30                0.136527  1   0.2     0.3   0.35  0.5   100
              300        5                 65                30                0.136527  1   0.25    0.25  0.3   0.5   50
              300        5                 65                30                0.136527  1   0.2     0.2   0.21  0.5   40
              300        5                 65                30                0.136527  1   0.2     0.2   0.21  0.5   40
              300        5                 65                30                0         1   0.2     0.2   0.21  0.53  40
              1200       5                 65                30                0         1   0.2     0.2   0.21  0.53  40
              Rocks, ParticleSizeSand, ParticleSizeSilt, ParticleSizeClay source: Calculated
              SoilCrop STRUMSoil: LL=[0.3, 0.3, 0.25, 0.2, 0.2, 0.2, 0.2]; KL=[1, 1, 1, 1, 1, 1, 1]; XF=[1, 1, 1, 1, 1, 1, 1]
              SoilCrop SPRUMSoil: LL=[0.3, 0.3, 0.25, 0.2, 0.2, 0.2, 0.2]; KL=[0.11, 0.11, 0.11, 0.11, 0.11, 0.11, 0.11]; XF=[1, 1, 1, 1, 1, 1, 1]
          SurfaceOrganicMatter: InitialResidueName=wheat_stubble; InitialResidueType=wheat; InitialResidueMass=500; InitialStandingFraction=0; InitialCPR=0; InitialCNR=100
          Plant STRUM
          StrumTreeInstance Avocado: TreeType=Deciduous; RowSpacing=2; InterRowSpacing=1; AlleyZoneWidthFrac=0.5; AgeAtSimulationStart=10; YearsToMaxDimension=6; TrunkMassAtMaxDimension=15; WoodDensity=500; BudBreakDAWS=70; StartFullCanopyDAWS=260; StartLeafFallDAWS=310; EndLeafFallDAWS=360; GRINZ=true; MaxRD=3000; Proot=0.3; Pleaf=0.5; Ptrunk=0.2; CanopyBaseHeight=1800; MaxPrunedHeight=5000; MaxHeight=5700; MaxPrunedWidth=4000; MaxWidth=4000; RootNConc=0.01; LeafNConc=0.02; TrunkNConc=0.01; FruitNConc=0.02; ExtinctCoeff=0.5; BaseCover=0.85; MaxCover=0.96; RUE=0.9; GSMax=0.005; R50=200; WaterStress=true; Number=500; PotentialFWPerFruit=250; DMC=0.29; FruitDensity=0.43; DateMaxBloom=20-oct; DAFStartLinearGrowth=130; DAFEndLinearGrowth=340; DAFMaxSize=366; TotalSolarRadiation=0
          Fertiliser
          Irrigation
          BiomassRemovalEvents Pick: same as PatternTest.Decidious.Row.Pick
          BiomassRemovalEvents Prune: same as PatternTest.EverGreen.Row.Prune
        RectangularZone Alley: Length=100; Width=2.2; Slope=0; AspectAngle=0; Altitude=50
          Report BareAlleyZoneReport: EventNames=[Clock].DoReport
            VariableNames:
              [Clock].Today
              sum([Alley].Soil.OutputLayers.SWmm)
              [Alley].Soil.OutputLayers.SW
              [Alley].Irrigation.IrrigationApplied
              [Alley].Fertiliser.NitrogenApplied
              [Alley].Soil.SoilWater.Drainage
              [Alley].Soil.SoilWater.Evaporation
          Soil: Latitude=0; Longitude=0
            LayerStructure: Thickness=[200, 200, 200, 200, 200, 200, 300, 300, 400, 800]
            Chemical: same as PatternTest.Decidious.Row.Soil.Chemical
            Water: Thickness=[300, 300, 300, 300, 300, 300, 1200]; InitialValues=[0.35, 0.35, 0.3, 0.21, 0.21, 0.21, 0.21]; InitialPAWmm=66; RelativeTo=LL15; FilledFromTop=false
            WaterBalance SoilWater: same as PatternTest.Decidious.Row.Soil.SoilWater
            Organic: same as PatternTest.Decidious.Alley.Soil.Organic
            OutputLayers: Thickness=[300, 300, 300, 300, 300, 300]
            Solute NO3: same as PatternTest.Decidious.Row.Soil.NO3
            Solute NH4: same as PatternTest.Decidious.Row.Soil.NH4
            Solute Urea: same as PatternTest.Decidious.Row.Soil.Urea
            Physical: same as PatternTest.TotalWidth.BareUnderStory4.Row.Soil.Physical
            Nutrient
            SoilTemperature Temperature
          SurfaceOrganicMatter: InitialResidueName=wheat_stubble; InitialResidueType=wheat; InitialResidueMass=500; InitialStandingFraction=0; InitialCPR=0; InitialCNR=100
          Fertiliser
          Irrigation
          Plant SPRUM
    Experiment CanopyWidth
      Factors
        Factor
          CompositeFactor 500mm
            Specifications:
              [Row].Avocado.MaxPrunedWidth = 500
              [Row].Avocado.MaxWidth = 500
          CompositeFactor 1m
            Specifications:
              [Row].Avocado.MaxPrunedWidth = 1000
              [Row].Avocado.MaxWidth = 1000
          CompositeFactor 2m
            Specifications:
              [Row].Avocado.MaxPrunedWidth = 2000
              [Row].Avocado.MaxWidth = 2000
          CompositeFactor 3m
            Specifications:
              [Row].Avocado.MaxPrunedWidth = 3000
              [Row].Avocado.MaxWidth = 3000
          CompositeFactor 4m
            Specifications:
              [Row].Avocado.MaxPrunedWidth = 4000
              [Row].Avocado.MaxWidth = 4000
      Simulation BareUnderStory5
        Clock: Start=2000-07-21; End=2001-07-01
        Summary SummaryFile
        Weather: FileName=WeatherFiles\Whakatu.met
        MicroClimate: a_interception=0; b_interception=1; c_interception=0; d_interception=0; SoilHeatFluxFraction=0.4; MinimumHeightDiffForNewLayer=0; NightInterceptionFraction=0.5; ReferenceHeight=2
        SoilArbitrator Soil Arbitrator
        Manager AutoIrrigationDeficitBased: same as PatternTest.Decidious.AutoIrrigationDeficitBased
        Manager AutomaticFertiliser: same as PatternTest.Decidious.AutomaticFertiliser
        ZoneAgregate
        Report ZoneAgregateReport: same as PatternTest.BareUnderStory.ZoneAgregateReport
        RectangularZone Row: Length=100; Width=1.3; Slope=0; AspectAngle=0; Altitude=50
          Report RowZoneReport: EventNames=[Clock].DoReport
          Soil: same as PatternTest.Decidious.Row.Soil
          SurfaceOrganicMatter: InitialResidueName=wheat_stubble; InitialResidueType=wheat; InitialResidueMass=500; InitialStandingFraction=0; InitialCPR=0; InitialCNR=100
          Plant STRUM
          StrumTreeInstance Avocado: TreeType=Ever green; RowSpacing=4; InterRowSpacing=1; AlleyZoneWidthFrac=0.75; AgeAtSimulationStart=10; YearsToMaxDimension=6; TrunkMassAtMaxDimension=15; WoodDensity=500; BudBreakDAWS=70; StartFullCanopyDAWS=260; StartLeafFallDAWS=310; EndLeafFallDAWS=360; GRINZ=true; MaxRD=3000; Proot=0.3; Pleaf=0.5; Ptrunk=0.2; CanopyBaseHeight=1800; MaxPrunedHeight=5000; MaxHeight=5700; MaxPrunedWidth=4000; MaxWidth=4000; RootNConc=0.01; LeafNConc=0.02; TrunkNConc=0.01; FruitNConc=0.02; ExtinctCoeff=0.5; BaseCover=0.85; MaxCover=0.96; RUE=0.9; GSMax=0.005; R50=200; WaterStress=true; Number=500; PotentialFWPerFruit=250; DMC=0.29; FruitDensity=0.43; DateMaxBloom=20-oct; DAFStartLinearGrowth=130; DAFEndLinearGrowth=340; DAFMaxSize=366; TotalSolarRadiation=0
          Fertiliser
          Irrigation
          BiomassRemovalEvents Pick: same as PatternTest.Decidious.Row.Pick
          BiomassRemovalEvents Prune: same as PatternTest.EverGreen.Row.Prune
        RectangularZone Alley: same as PatternTest.BareUnderStory.Alley
    Experiment ZoneSize
      Factors
        Factor: Specification=[Row].Avocado.AlleyZoneWidthFrac = 0.01,0.33,0.66,0.99
      Simulation BareUnderStory7
        Clock: Start=2000-07-21; End=2001-07-01
        Summary SummaryFile
        Weather: FileName=WeatherFiles\Whakatu.met
        MicroClimate: a_interception=0; b_interception=1; c_interception=0; d_interception=0; SoilHeatFluxFraction=0.4; MinimumHeightDiffForNewLayer=0; NightInterceptionFraction=0.5; ReferenceHeight=2
        SoilArbitrator Soil Arbitrator
        Manager AutoIrrigationDeficitBased: same as PatternTest.Decidious.AutoIrrigationDeficitBased
        Manager AutomaticFertiliser: same as PatternTest.Decidious.AutomaticFertiliser
        ZoneAgregate (disabled)
        Report ZoneAgregateReport (disabled): same as PatternTest.Decidious.ZoneAgregateReport
        RectangularZone Row: Length=100; Width=1.3; Slope=0; AspectAngle=0; Altitude=50
          Report RowZoneReport: EventNames=[Clock].DoReport
          SurfaceOrganicMatter: InitialResidueName=wheat_stubble; InitialResidueType=wheat; InitialResidueMass=500; InitialStandingFraction=0; InitialCPR=0; InitialCNR=100
          Plant STRUM
          StrumTreeInstance Avocado: TreeType=Ever green; RowSpacing=4; InterRowSpacing=1; AlleyZoneWidthFrac=1; AgeAtSimulationStart=10; YearsToMaxDimension=6; TrunkMassAtMaxDimension=15; WoodDensity=500; BudBreakDAWS=70; StartFullCanopyDAWS=260; StartLeafFallDAWS=310; EndLeafFallDAWS=360; GRINZ=false; MaxRD=3000; Proot=0.3; Pleaf=0.5; Ptrunk=0.2; CanopyBaseHeight=1800; MaxPrunedHeight=5000; MaxHeight=5700; MaxPrunedWidth=4000; MaxWidth=4000; RootNConc=0.01; LeafNConc=0.02; TrunkNConc=0.01; FruitNConc=0.02; ExtinctCoeff=0.5; BaseCover=0.85; MaxCover=0.96; RUE=0.9; GSMax=0.005; R50=200; WaterStress=true; Number=500; PotentialFWPerFruit=250; DMC=0.29; FruitDensity=0.43; DateMaxBloom=20-oct; DAFStartLinearGrowth=130; DAFEndLinearGrowth=340; DAFMaxSize=366; TotalSolarRadiation=0
          Fertiliser
          Irrigation
          BiomassRemovalEvents Pick: same as PatternTest.Decidious.Row.Pick
          BiomassRemovalEvents Prune: same as PatternTest.EverGreen.Row.Prune
          Soil: same as PatternTest.TotalWidth.BareUnderStory4.Row.Soil
        RectangularZone Alley: Length=100; Width=2.2; Slope=0; AspectAngle=0; Altitude=50
          Report BareAlleyZoneReport: EventNames=[Clock].DoReport
            VariableNames:
              [Clock].Today
              sum([Alley].Soil.OutputLayers.SWmm)
              [Alley].Soil.OutputLayers.SW
              [Alley].Irrigation.IrrigationApplied
              [Alley].Fertiliser.NitrogenApplied
              [Alley].Soil.SoilWater.Drainage
              [Alley].Soil.SoilWater.Evaporation
          SurfaceOrganicMatter: InitialResidueName=wheat_stubble; InitialResidueType=wheat; InitialResidueMass=500; InitialStandingFraction=0; InitialCPR=0; InitialCNR=100
          Fertiliser
          Irrigation
          Plant SPRUM
          Soil: same as PatternTest.TotalWidth.BareUnderStory4.Row.Soil
    Experiment RootInNeighoursZone
      Factors
        Factor: Specification=[Row].Avocado.GRINZ = true,false
      Simulation BareUnderStory3
        Clock: Start=2000-07-21; End=2001-07-01
        Summary SummaryFile
        Weather: FileName=WeatherFiles\Whakatu.met
        MicroClimate: a_interception=0; b_interception=1; c_interception=0; d_interception=0; SoilHeatFluxFraction=0.4; MinimumHeightDiffForNewLayer=0; NightInterceptionFraction=0.5; ReferenceHeight=2
        SoilArbitrator Soil Arbitrator
        Manager AutoIrrigationDeficitBased
          AllowIrrigation = False
          depthPAWC = 1000
          triggerDeficit = 80
          irrigateAmount = 15
          returndays = 3
          IrrigateAlley = True
          script: same as in PatternTest.Decidious.AutoIrrigationDeficitBased
        Manager AutomaticFertiliser: same as PatternTest.Decidious.AutomaticFertiliser
        ZoneAgregate
        Report ZoneAgregateReport: same as PatternTest.BareUnderStory.ZoneAgregateReport
        RectangularZone Row: Length=100; Width=1.3; Slope=0; AspectAngle=0; Altitude=50
          Report RowZoneReport: EventNames=[Clock].DoReport
          Soil: same as PatternTest.TotalWidth.BareUnderStory4.Row.Soil
          SurfaceOrganicMatter: InitialResidueName=wheat_stubble; InitialResidueType=wheat; InitialResidueMass=500; InitialStandingFraction=0; InitialCPR=0; InitialCNR=100
          Plant STRUM
          StrumTreeInstance Avocado: TreeType=Ever green; RowSpacing=4; InterRowSpacing=1; AlleyZoneWidthFrac=0.5; AgeAtSimulationStart=10; YearsToMaxDimension=6; TrunkMassAtMaxDimension=15; WoodDensity=500; BudBreakDAWS=70; StartFullCanopyDAWS=260; StartLeafFallDAWS=310; EndLeafFallDAWS=360; GRINZ=true; MaxRD=3000; Proot=0.3; Pleaf=0.5; Ptrunk=0.2; CanopyBaseHeight=1800; MaxPrunedHeight=5000; MaxHeight=5700; MaxPrunedWidth=2000; MaxWidth=2000; RootNConc=0.01; LeafNConc=0.02; TrunkNConc=0.01; FruitNConc=0.02; ExtinctCoeff=0.5; BaseCover=0.85; MaxCover=0.96; RUE=0.9; GSMax=0.005; R50=200; WaterStress=false; Number=500; PotentialFWPerFruit=250; DMC=0.29; FruitDensity=0.43; DateMaxBloom=20-oct; DAFStartLinearGrowth=130; DAFEndLinearGrowth=340; DAFMaxSize=366; TotalSolarRadiation=0
          Fertiliser
          Irrigation
          BiomassRemovalEvents Pick: same as PatternTest.Decidious.Row.Pick
          BiomassRemovalEvents Prune: same as PatternTest.EverGreen.Row.Prune
        RectangularZone Alley: same as PatternTest.TotalWidth.BareUnderStory4.Alley
    Experiment SingleZoneSize
      Factors
        Factor: Specification=[Row].Apple.RowSpacing = 0.1,1
      Simulation SingleZone1
        Clock: Start=2000-07-21; End=2011-07-01
        Summary SummaryFile
        Weather: FileName=WeatherFiles\Whakatu.met
        MicroClimate: a_interception=0; b_interception=1; c_interception=0; d_interception=0; SoilHeatFluxFraction=0.4; MinimumHeightDiffForNewLayer=0; NightInterceptionFraction=0.5; ReferenceHeight=2
        SoilArbitrator Soil Arbitrator
        ZoneAgregate (disabled)
        Report ZoneAgregateReport (disabled): same as PatternTest.Decidious.ZoneAgregateReport
        RectangularZone Row: Length=100; Width=1.3; Slope=0; AspectAngle=0; Altitude=50
          Report RowZoneReport: EventNames=[Clock].DoReport
          Soil: same as PatternTest.Decidious.Row.Soil
          SurfaceOrganicMatter: InitialResidueName=wheat_stubble; InitialResidueType=wheat; InitialResidueMass=500; InitialStandingFraction=0; InitialCPR=0; InitialCNR=100
          Plant STRUM
          StrumTreeInstance Apple: TreeType=Deciduous; RowSpacing=2; InterRowSpacing=1; AlleyZoneWidthFrac=0; AgeAtSimulationStart=1; YearsToMaxDimension=6; TrunkMassAtMaxDimension=12; WoodDensity=500; BudBreakDAWS=70; StartFullCanopyDAWS=125; StartLeafFallDAWS=305; EndLeafFallDAWS=330; GRINZ=true; MaxRD=3000; Proot=0.1; Pleaf=0.2; Ptrunk=0.15; CanopyBaseHeight=1000; MaxPrunedHeight=2500; MaxHeight=3500; MaxPrunedWidth=5000; MaxWidth=5000; RootNConc=0.01; LeafNConc=0.02; TrunkNConc=0.01; FruitNConc=0.02; ExtinctCoeff=0.6; BaseCover=0; MaxCover=0.95; RUE=1.2; GSMax=0.006; R50=100; WaterStress=false; Number=50; PotentialFWPerFruit=70; DMC=0.14; FruitDensity=0.75; DateMaxBloom=1-oct; DAFStartLinearGrowth=30; DAFEndLinearGrowth=90; DAFMaxSize=150; TotalSolarRadiation=0
          Fertiliser
          Irrigation
          BiomassRemovalEvents Pick: same as PatternTest.Decidious.Row.Pick
          BiomassRemovalEvents Prune: same as PatternTest.Decidious.Row.Prune
    Simulation SingleZone
      Clock: Start=2000-07-21; End=2011-07-01
      Summary SummaryFile
      Weather: FileName=WeatherFiles\Whakatu.met
      MicroClimate: a_interception=0; b_interception=1; c_interception=0; d_interception=0; SoilHeatFluxFraction=0.4; MinimumHeightDiffForNewLayer=0; NightInterceptionFraction=0.5; ReferenceHeight=2
      SoilArbitrator Soil Arbitrator
      ZoneAgregate (disabled)
      Report ZoneAgregateReport (disabled): same as PatternTest.Decidious.ZoneAgregateReport
      RectangularZone Row: same as PatternTest.SingleZoneSize.SingleZone1.Row
  Folder NZ AppleExperiments (disabled)
    Experiment Manawatu_1994
      Factors
        Permutation
          Factor _Irr_
            CompositeFactor Control: Specifications=[IrrigationOperations]
              Operations IrrigationOperations
                1994-10-20  [Irrigation].Apply(4)
                1994-10-21  [Irrigation].Apply(4)
                1994-10-22  [Irrigation].Apply(4)
                1994-10-23  [Irrigation].Apply(4)
                1994-10-24  [Irrigation].Apply(4)
                1994-10-25  [Irrigation].Apply(4)
                1994-10-26  [Irrigation].Apply(4)
                1994-10-27  [Irrigation].Apply(4)
                1994-10-28  [Irrigation].Apply(4)
                1994-10-29  [Irrigation].Apply(4)
                1994-10-30  [Irrigation].Apply(4)
                1994-10-31  [Irrigation].Apply(4)
                1994-11-01  [Irrigation].Apply(4)
                1994-11-02  [Irrigation].Apply(4)
                1994-11-03  [Irrigation].Apply(4)
                1994-11-04  [Irrigation].Apply(4)
                1994-11-05  [Irrigation].Apply(4)
                1994-11-06  [Irrigation].Apply(4)
                1994-11-07  [Irrigation].Apply(4)
                1994-11-08  [Irrigation].Apply(4)
                1994-11-09  [Irrigation].Apply(4)
                1994-11-10  [Irrigation].Apply(4)
                1994-11-11  [Irrigation].Apply(4)
                1994-11-12  [Irrigation].Apply(4)
                1994-11-13  [Irrigation].Apply(4)
                1994-11-14  [Irrigation].Apply(4)
                1994-11-15  [Irrigation].Apply(4)
                1994-11-16  [Irrigation].Apply(4)
                1994-11-17  [Irrigation].Apply(4)
                1994-11-18  [Irrigation].Apply(4)
                1994-11-19  [Irrigation].Apply(4)
                1994-11-20  [Irrigation].Apply(4)
                1994-11-21  [Irrigation].Apply(4)
                1994-11-22  [Irrigation].Apply(4)
                1994-11-23  [Irrigation].Apply(4)
                1994-11-24  [Irrigation].Apply(4)
                1994-11-25  [Irrigation].Apply(4)
                1994-11-26  [Irrigation].Apply(4)
                1994-11-27  [Irrigation].Apply(4)
                1994-11-28  [Irrigation].Apply(4)
                1994-11-29  [Irrigation].Apply(4)
                1994-11-30  [Irrigation].Apply(4)
                1994-12-01  [Irrigation].Apply(4)
                1994-12-02  [Irrigation].Apply(4)
                1994-12-03  [Irrigation].Apply(4)
                1994-12-04  [Irrigation].Apply(4)
                1994-12-05  [Irrigation].Apply(4)
                1994-12-06  [Irrigation].Apply(4)
                1994-12-07  [Irrigation].Apply(4)
                1994-12-08  [Irrigation].Apply(4)
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            CompositeFactor EarlyDeficit: Specifications=[IrrigationOperations]
              Operations IrrigationOperations
                1994-12-14  [Irrigation].Apply(2)
                1994-12-15  [Irrigation].Apply(2)
                1994-12-16  [Irrigation].Apply(2)
                1994-12-17  [Irrigation].Apply(2)
                1994-12-18  [Irrigation].Apply(2)
                1994-12-19  [Irrigation].Apply(2)
                1994-12-20  [Irrigation].Apply(2)
                1994-12-21  [Irrigation].Apply(2)
                1994-12-22  [Irrigation].Apply(2)
                1994-12-23  [Irrigation].Apply(2)
                1994-12-24  [Irrigation].Apply(2)
                1994-12-25  [Irrigation].Apply(2)
                1994-12-26  [Irrigation].Apply(2)
                1994-12-27  [Irrigation].Apply(2)
                1994-12-28  [Irrigation].Apply(2)
                1994-12-29  [Irrigation].Apply(2)
                1994-12-30  [Irrigation].Apply(2)
                1994-12-31  [Irrigation].Apply(2)
                1995-01-01  [Irrigation].Apply(2)
                1995-01-02  [Irrigation].Apply(2)
                1995-01-03  [Irrigation].Apply(2)
                1995-01-04  [Irrigation].Apply(2)
                1995-01-05  [Irrigation].Apply(2)
                1995-01-06  [Irrigation].Apply(2)
                1995-01-07  [Irrigation].Apply(2)
                1995-01-08  [Irrigation].Apply(2)
                1995-01-09  [Irrigation].Apply(2)
                1995-01-10  [Irrigation].Apply(2)
                1995-01-11  [Irrigation].Apply(2)
                1995-01-12  [Irrigation].Apply(2)
                1995-01-13  [Irrigation].Apply(2)
                1995-01-14  [Irrigation].Apply(2)
                1995-01-15  [Irrigation].Apply(2)
                1995-01-16  [Irrigation].Apply(2)
                1995-01-17  [Irrigation].Apply(2)
                1995-01-18  [Irrigation].Apply(2)
                1995-01-19  [Irrigation].Apply(2)
                1995-01-20  [Irrigation].Apply(2)
                1995-01-21  [Irrigation].Apply(2)
                1995-01-22  [Irrigation].Apply(2)
                1995-01-23  [Irrigation].Apply(2)
                1995-01-24  [Irrigation].Apply(2)
                1995-01-25  [Irrigation].Apply(2)
                1995-01-26  [Irrigation].Apply(2)
                1995-01-27  [Irrigation].Apply(2)
                1995-01-28  [Irrigation].Apply(2)
                1995-01-29  [Irrigation].Apply(4)
                1995-01-30  [Irrigation].Apply(4)
                1995-01-31  [Irrigation].Apply(4)
                1995-02-01  [Irrigation].Apply(4)
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            CompositeFactor LateDeficit: Specifications=[IrrigationOperations]
              Operations IrrigationOperations
                1994-10-20  [Irrigation].Apply(4)
                1994-10-21  [Irrigation].Apply(4)
                1994-10-22  [Irrigation].Apply(4)
                1994-10-23  [Irrigation].Apply(4)
                1994-10-24  [Irrigation].Apply(4)
                1994-10-25  [Irrigation].Apply(4)
                1994-10-26  [Irrigation].Apply(4)
                1994-10-27  [Irrigation].Apply(4)
                1994-10-28  [Irrigation].Apply(4)
                1994-10-29  [Irrigation].Apply(4)
                1994-10-30  [Irrigation].Apply(4)
                1994-10-31  [Irrigation].Apply(4)
                1994-11-01  [Irrigation].Apply(4)
                1994-11-02  [Irrigation].Apply(4)
                1994-11-03  [Irrigation].Apply(4)
                1994-11-04  [Irrigation].Apply(4)
                1994-11-05  [Irrigation].Apply(4)
                1994-11-06  [Irrigation].Apply(4)
                1994-11-07  [Irrigation].Apply(4)
                1994-11-08  [Irrigation].Apply(4)
                1994-11-09  [Irrigation].Apply(4)
                1994-11-10  [Irrigation].Apply(4)
                1994-11-11  [Irrigation].Apply(4)
                1994-11-12  [Irrigation].Apply(4)
                1994-11-13  [Irrigation].Apply(4)
                1994-11-14  [Irrigation].Apply(4)
                1994-11-15  [Irrigation].Apply(4)
                1994-11-16  [Irrigation].Apply(4)
                1994-11-17  [Irrigation].Apply(4)
                1994-11-18  [Irrigation].Apply(4)
                1994-11-19  [Irrigation].Apply(4)
                1994-11-20  [Irrigation].Apply(4)
                1994-11-21  [Irrigation].Apply(4)
                1994-11-22  [Irrigation].Apply(4)
                1994-11-23  [Irrigation].Apply(4)
                1994-11-24  [Irrigation].Apply(4)
                1994-11-25  [Irrigation].Apply(4)
                1994-11-26  [Irrigation].Apply(4)
                1994-11-27  [Irrigation].Apply(4)
                1994-11-28  [Irrigation].Apply(4)
                1994-11-29  [Irrigation].Apply(4)
                1994-11-30  [Irrigation].Apply(4)
                1994-12-01  [Irrigation].Apply(4)
                1994-12-02  [Irrigation].Apply(4)
                1994-12-03  [Irrigation].Apply(4)
                1994-12-04  [Irrigation].Apply(4)
                1994-12-05  [Irrigation].Apply(4)
                1994-12-06  [Irrigation].Apply(4)
                1994-12-07  [Irrigation].Apply(4)
                1994-12-08  [Irrigation].Apply(4)
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                1995-02-02  [Irrigation].Apply(2)
      Simulation Manawatu_94
        Memo Experiment description
          *	Based on Mills et al (1997).

          *	Lysimeter (1.2 m deep by 1 m wide) trial conducted during the 1994/95 season.

          *	Location: Massey University, Palmerston North (40°2'S, 175°4'E.

          *	Soil: Manawatu fine sandy loam.

          *	Plant material: 4-year-old 'Braeburn' on MM106 rootstock

          *	Date of full bloom (DAF): 20/10/1994

          *	Three irrigation regimes: Control, Early Deficit, Late Deficit
        Clock: Start=1994-06-25; End=1995-08-28
        Summary SummaryFile
        Weather: FileName=WeatherFiles\PalmerstonNorth-Turitea.met
        MicroClimate: a_interception=0; b_interception=1; c_interception=0; d_interception=0; SoilHeatFluxFraction=0.4; MinimumHeightDiffForNewLayer=0; NightInterceptionFraction=0.5; ReferenceHeight=2
        SoilArbitrator Soil Arbitrator
        RectangularZone Row: Length=1; Width=1; Slope=0; AspectAngle=0; Altitude=50
          Report RowZoneReport
          Report ReportBoth: EventNames=[Clock].DoReport
          SurfaceOrganicMatter: InitialResidueName=wheat_stubble; InitialResidueType=wheat; InitialResidueMass=500; InitialStandingFraction=0; InitialCPR=0; InitialCNR=100
          Plant STRUM
          Fertiliser
          Irrigation
          Manager ClimateControl
            StartDate = 1-jan
            EndDate = 31-dec
```csharp
using Models.Soils;
using System.Xml.Serialization;
using Models;
using Models.PMF;
using System.Text;
using System.Collections.Generic;
using APSIM.Shared.Utilities;
using Models.Core;
using System;
using Models.Climate;

namespace Models
{
    [Serializable] 
    [System.Xml.Serialization.XmlInclude(typeof(Model))]
    public class Script : Model
    {
        [Link] Weather Met;
        [Link] Clock Clock;
    
        [Description("Start Date (d-mmm)")]
        public string StartDate { get; set; }
        
        [Description("End Date (d-mmm)")]
        public string EndDate { get; set; }
 
    
        [EventSubscribe("PreparingNewWeatherData")]
        private void OnPreparingNewWeatherData(object sender, EventArgs e)
        {
            if (DateUtilities.WithinDates(StartDate, Clock.Today, EndDate))
                Met.Rain = 0;        
        }
    }
}
```
          Operations IrrigationOperations
            1986-06-01  [Irrigation].Apply(70);
            1986-06-15  [Irrigation].Apply(70);
            1986-06-29  [Irrigation].Apply(70);
            1986-07-13  [Irrigation].Apply(70);
            1986-07-27  [Irrigation].Apply(70);
            1986-08-10  [Irrigation].Apply(70);
            1986-08-24  [Irrigation].Apply(70);
            1986-09-07  [Irrigation].Apply(70);
          Operations NitrogenOperations
            1993-09-15  [Fertiliser].Apply(25, "UreaN", 10);
            1993-11-15  [Fertiliser].Apply(25, "UreaN", 10);
            1994-02-15  [Fertiliser].Apply(50, "UreaN", 10);
          Soil: SoilType=Silt loam; LocalName=Tokomaru; Site=Massey University 1; NearestTown=Palmerston North, Massey University 1; Region=Manawatu; Country=New Zealand; ApsoilNumber=1365; Latitude=-40.395; Longitude=175.609; LocationAccuracy=+/-50 m; YearOfSampling=2010
            DataSource=The database of New Zealand soils was compiled by AgResearch (www.agresearch.co.nz) and based on soil properties gathered, mainly from publications, in the course of conducting several simulation-based research projects but particularly from the Pastoral 21 Environment program which was funded by the New Zealand Ministry for Business, Innovation and Employment,  Dairy NZ, Fonterra and Meat & Wool NZ.
            Comments=Lowered BD value in layer 5 to make run in APSIM. Original values in rb column.The data is a combination of published or supplied measurements, pedotransfer functions, and expert opinion. See Cichota et al. (2013; Soil Research 51: 92-111, http://dx.doi.org/10.1071/SR12338) for a description of the pedotransfer functions. The soil carbon and fresh organic matter settings have been set as those broadly appropriate for permanent productive pastoral systems, see Cichota el al. (2012; Soil Research 50: 694-707, http://dx.doi.org/10.1071/SR12208). Users should take care to adapt these to local conditions before using the data in simulations. FOM values estimated to be 900 kg/ha of FOM in top 600mm of soil and another 100 kg/ha below. Soil C:N ratios taken from soil Silt loam (Marton NoXXXX).
            Physical
              Thickness  ParticleSizeSand  ParticleSizeSilt  ParticleSizeClay  Rocks  BD   AirDry  LL15  DUL   SAT  KS
              200        50                30                20                0      1.4  0.02    0.05  0.15  0.2  198.563
              200        50                30                20                0      1.4  0.05    0.05  0.15  0.2  231.474
              200        50                30                20                0      1.4  0.05    0.05  0.15  0.2  109.84
              400        70                20                10                40     1.6  0.02    0.02  0.15  0.2  1000
              200        95                5                 0                 0      1.6  0.03    0.03  0.15  0.2  500
              BD source: Field measured and checked for sensibility
              AirDry source: Estimated based on local knowledge
              LL15, DUL source: Laboratory measured
              SAT source: Calculated from measured, estimated or calculated BD
              SoilCrop STRUMSoil: LL=[0.05, 0.05, 0.05, 0.02, 0.03]; KL=[0.1, 0.1, 0.1, 0.1, 0.1]; XF=[1, 1, 1, 1, 1]
                LL source: Estimated based on local knowledge
            WaterBalance SoilWater: SummerDate=1-nov; SummerU=0; SummerCona=0; WinterDate=1-apr; WinterU=0; WinterCona=0; DiffusConst=88; DiffusSlope=35; Salb=1; CN2Bare=0; CNRed=20; CNCov=0.8; DischargeWidth=0; CatchmentArea=0; PSIDul=-100; Thickness=[100, 150, 200, 350, 700]; SWCON=[0.57, 0.9, 0.9, 0.9, 0.9]
            Organic: FOMCNRatio=40; CarbonUnits=Total
              Thickness  Carbon  SoilCNRatio  FBiom  FInert  FOM
              100        4.5     11.026       0.08   0.47    58.943
              150        2       11.026       0.05   0.457   43.666
              200        0.75    11.026       0.008  0.77    29.27
              350        0.35    11.026       0.008  0.928   14.535
              700        0.1     11.026       0.008  0.982   3.584
            Chemical: Thickness=[100, 150, 200, 350, 700]; PH=[6.5, 6.5, 6.5, 6.5, 6.5]; PHUnits=Water
              PH source: Estimated based on local knowledge
            Water: Thickness=[200, 200, 200, 400, 200]; InitialValues=[0.15, 0.15, 0.15, 0.15, 0.15]; InitialPAWmm=136; RelativeTo=LL15; FilledFromTop=false
            Solute NO3: Thickness=[100, 150, 200, 350, 700]; InitialValues=[217, 15, 1.667, 1.667, 0]; InitialValuesUnits=ppm; WaterTableConcentration=0; D0=0; DepthConstant=0; MaxDepthSoluteAccessible=0; RunoffEffectivenessAtMovingSolute=0; MaxEffectiveRunoff=0
            Solute NH4: Thickness=[100, 150, 200, 350, 700]; InitialValues=[0, 0, 0, 0, 0]; InitialValuesUnits=ppm; WaterTableConcentration=0; D0=0; DepthConstant=0; MaxDepthSoluteAccessible=0; RunoffEffectivenessAtMovingSolute=0; MaxEffectiveRunoff=0
            Solute Urea: Thickness=[100, 150, 200, 350, 700]; InitialValues=[0, 0, 0, 0, 0]; InitialValuesUnits=kg/ha; WaterTableConcentration=0; D0=0; DepthConstant=0; MaxDepthSoluteAccessible=0; RunoffEffectivenessAtMovingSolute=0; MaxEffectiveRunoff=0
            OutputLayers: Thickness=[200, 200, 200, 200, 200, 200]
            LayerStructure: Thickness=[200, 200, 200, 200, 200, 200]
            Nutrient
            SoilTemperature CERESSoilTemperature
          StrumTreeInstance Apple: AgeAtSimulationStart=6; YearsToMaxDimension=6; TrunkMassAtMaxDimension=12; BudBreakDAWS=100; StartFullCanopyDAWS=150; StartLeafFallDAWS=305; EndLeafFallDAWS=330; GRINZ=true; MaxRD=3000; Proot=0.1; CanopyBaseHeight=1000; MaxPrunedHeight=2800; MaxHeight=3500; MaxPrunedWidth=700; MaxWidth=1000; RootNConc=0.01; LeafNConc=0.02; TrunkNConc=0.01; FruitNConc=0.02; ExtinctCoeff=0.8; MaxCover=0.98; GSMax=0.004; R50=100; WaterStress=false; Number=50; DMC=0.16
            zero: RowSpacing, InterRowSpacing, AlleyZoneWidthFrac, WoodDensity, Pleaf, Ptrunk, BaseCover, RUE, PotentialFWPerFruit, FruitDensity, DAFStartLinearGrowth, DAFEndLinearGrowth, DAFMaxSize, TotalSolarRadiation
          Manager AgrgateZoneVariables
```csharp
using Models.Climate;
using System;
using Models.Core;
using Models.PMF;
using System.Collections.Generic;
using Models.Soils;
using APSIM.Shared.Utilities;
using Models.Zones;
using Models.PMF.Organs;

namespace Models
{
    [Serializable]
    public class Script : Model
    {
    }
}
```
          Manager AutomaticFertiliser
            Fertilise = True
            Season_Start = 1-Aug
            Season_End = 30-Apr
            Season_Allocation = 100000
            TriggerN = 50
            NApplicationAmount = 25
            Return_days = 3
            Top_Depth = 300
```csharp
using Newtonsoft.Json;
using Models.PMF.Phen;
using Models.Soils.Nutrients;
using Models.Interfaces;
using APSIM.Shared.Utilities;
using Models.PMF;
using System.Xml.Serialization;
using Models.Soils;
using Models.Core;
using System;
using Models.PMF.Organs;

        
namespace Models
{
    [Serializable] 
    [System.Xml.Serialization.XmlInclude(typeof(Model))]
    public class Script : Model
    {
        [Link] private ISummary summary;
        [Link] private Fertiliser Fertiliser;
        [Link] private Clock Clock;
        [Link] private Plant SCRUM;
        [Link(ByName = true)]
        private ISolute NO3;
        [Link] private Soils.Soil Soil;
        [Link(Type = LinkType.Path, Path = "[STRUM].Root")]
        private Root root;
        [Link(Type = LinkType.Path, Path = "[STRUM].Phenology")]
        private Phenology phenology;
        [Link]
        private IPhysical soilPhysical;
        //Communication to other modules
       
        //User inputs from properties tab
        [Description("Fertilise (tick for yes)")]
        public bool Fertilise { get; set; }
        [Description("SeasonStart (dd-MMM)")]
        public string Season_Start { get; set; }
        [Description("SeasonEnd (dd-MMM)")]
        public string Season_End { get; set; }
        [Description("Season Allocation (kg/ha)")]
        public double Season_Allocation { get; set; }
        [Description("Mineral N to maintain soil above (kg/ha)")]
        public double TriggerN { get; set; }
        [Description("Amount of N to apply (kg/ha)")]
        public double NApplicationAmount { get; set; }
        [Description("Minimum days for Fertiliser spreader to return")]
        public double Return_days { get; set; }
        [Description("Depth to calculate mineral N (mm)")]
        public double Top_Depth { get; set; }
       
        //Class members
        [JsonIgnore] private bool FertiliserIsAvailable { get; set; }
        [JsonIgnore] public bool SeasonIsOpen { get; set; }
        [JsonIgnore] private bool CropIsActive { get; set; }
        [JsonIgnore] private bool FertSpreaderIsAvailable { get; set; }
        [JsonIgnore] private bool SoilNIsLow { get; set; }
        [JsonIgnore] public double Top_SoilN { get; set; }
        [JsonIgnore] public double Accumulated_depth { get; set; }
        [JsonIgnore] public double Days_since_fertiliser { get; set; }
        [JsonIgnore] public double Season_Application { get; set; }
        
        //Variables for date logic testing
        [JsonIgnore] public string StartString { get; set; }
        [JsonIgnore] public string EndString { get; set; }
        [JsonIgnore] public DateTime StartDate { get; set; }
        [JsonIgnore] public DateTime EndDate { get; set; }
        [JsonIgnore] public int TodayYear { get; set; }
        [JsonIgnore] public int TodayMonth { get; set; }
        [JsonIgnore] public int StartMonth { get; set; }
        [JsonIgnore] public int EndMonth { get; set; }
        [JsonIgnore] public int TodayDay { get; set; }
        [JsonIgnore] public int StartDay { get; set; }
        [JsonIgnore] public int EndDay { get; set; }
              
        //Determine daily requirement for fertiliser
        [EventSubscribe("StartOfDay")]
        private void OnStartOfDay(object sender, EventArgs e)
        { 
            //Can we irrigate?
            FertiliserIsAvailable = false; 
            if (Fertilise)
                FertiliserIsAvailable = true; 
    
            //Are we Allowed to Irrigate?
            TodayYear = Clock.Today.Year;
            StartString = Season_Start + "-" + TodayYear.ToString();
            EndString = Season_End + "-" + TodayYear.ToString();
            StartDate = DateTime.Parse(StartString);
            EndDate = DateTime.Parse(EndString);
            TodayMonth = Clock.Today.Month;
            TodayDay = Clock.Today.Day;
            StartDay = StartDate.Day;
            StartMonth = StartDate.Month;
            EndDay = EndDate.Day;
            EndMonth = EndDate.Month;
          
            SeasonIsOpen = false;
            //if we are in the spring and after the start date then yes
            if ((Clock.Today.Month > 6) && (Clock.Today >= StartDate))
                SeasonIsOpen = true;
            //if we are in the autumn and before the end date then yes
            if ((Clock.Today.Month <= 6) && (Clock.Today <= EndDate))
                SeasonIsOpen = true;
          
            //Is there a crop in the ground that needs irrigation?
            //CropIsActive = false;
            //if ((phenology.Stage >= 3.0) && (phenology.Stage < 6.0))
            CropIsActive = true;
          
            //Is the irrigator available?
            FertSpreaderIsAvailable = false;
            Days_since_fertiliser += 1;
            if (Days_since_fertiliser >= Return_days)
                FertSpreaderIsAvailable = true;
          
            //Is the soil N low enough to require fertiliser?
            SoilNIsLow = false;
            double CurrentRootDepth = 0;
            double RootDepth = root.Depth;
            CurrentRootDepth = Math.Max(RootDepth, CurrentRootDepth);
          
            Accumulated_depth = 0;
            Top_SoilN = 0;
            for (int layer = 0; Accumulated_depth < Top_Depth; layer++)
            {
                Top_SoilN += NO3.kgha[layer];
                Accumulated_depth += soilPhysical.Thickness[layer];
            }
            if (Top_SoilN <= TriggerN)
                SoilNIsLow = true;
                
            //Lets bloody well irrigate then!!!!
            if ((FertiliserIsAvailable) && (SeasonIsOpen) && (CropIsActive) && (FertSpreaderIsAvailable) && (SoilNIsLow)) //The conditions are rife for irrigation
            {
                Fertiliser.Apply(NApplicationAmount, "UreaN", 10);
                Days_since_fertiliser = 0;
                Season_Application += NApplicationAmount;
                summary.WriteMessage(this, "Automatic Fertiliser", MessageType.Diagnostic);
            
            }
        }
    }
}
```
          Manager DAS
            DAS = 0
```csharp
using Models.Soils;
using System;
using Models.Core;
using System.Collections.Generic;
using System.Text;
using Models.PMF;
using Models;
using System.Xml.Serialization;
using APSIM.Shared.Utilities;
using System.Data;

namespace Models
{
    [Serializable] 
    //[System.Xml.Serialization.XmlInclude(typeof(Model))]
    public class Script : Model
    {
        
    
        
        
        [Description("Days after start")]
        public double DAS { get; set; }
        
         [EventSubscribe("StartOfSimulation")]
        private void DoStartOfSimulation(object sender, EventArgs e)
        {
            DAS = 0;
        }
        
        [EventSubscribe("DoReportCalculations")]
        private void OnDoReportCalculations(object sender, EventArgs e)
        {
            DAS += 1;
        }
    
    }
}
```
          BiomassRemovalEvents Pick: NameOfPlantToRemoveFrom=STRUM; RemovalType=2
            BiomassRemovalFractions:
              PlantName  OrganName  TypeString  LiveToRemove  DeadToRemove  LiveToResidue  DeadToResidue
              STRUM      Root       Harvesting  0             0             0              0
              STRUM      Leaf       Harvesting  0             0             0              0
              STRUM      Trunk      Harvesting  0             0             0              0
              STRUM      Fruit      Harvesting  0.8           0             0.1            0.5
          BiomassRemovalEvents Prune: NameOfPlantToRemoveFrom=STRUM; RemovalType=3
            BiomassRemovalFractions:
              PlantName  OrganName  TypeString  LiveToRemove  DeadToRemove  LiveToResidue  DeadToResidue
              STRUM      Root       Pruning     0             0             0              0
              STRUM      Leaf       Pruning     0             0             1              1
              STRUM      Trunk      Pruning     0             0             0.3            0.9
              STRUM      Fruit      Pruning     0             0             1              1
    Experiment Manawatu_1997
      Factors
        Permutation
          Factor _Irr_
            CompositeFactor Control: Specifications=[IrrigationOperations]
              Operations IrrigationOperations
                1997-10-20  [Irrigation].Apply(2.6)
                1997-10-21  [Irrigation].Apply(2.6)
                1997-10-22  [Irrigation].Apply(2.6)
                1997-10-23  [Irrigation].Apply(2.6)
                1997-10-24  [Irrigation].Apply(2.6)
                1997-10-25  [Irrigation].Apply(2.6)
                1997-10-26  [Irrigation].Apply(2.6)
                1997-10-27  [Irrigation].Apply(2.6)
                1997-10-28  [Irrigation].Apply(2.6)
                1997-10-29  [Irrigation].Apply(2.6)
                1997-10-30  [Irrigation].Apply(2.6)
                1997-10-31  [Irrigation].Apply(2.6)
                1997-11-01  [Irrigation].Apply(2.6)
                1997-11-02  [Irrigation].Apply(2.6)
                1997-11-03  [Irrigation].Apply(2.6)
                1997-11-04  [Irrigation].Apply(2.6)
                1997-11-05  [Irrigation].Apply(2.6)
                1997-11-06  [Irrigation].Apply(2.6)
                1997-11-07  [Irrigation].Apply(2.6)
                1997-11-08  [Irrigation].Apply(2.6)
                1997-11-09  [Irrigation].Apply(2.6)
                1997-11-10  [Irrigation].Apply(2.6)
                1997-11-11  [Irrigation].Apply(2.6)
                1997-11-12  [Irrigation].Apply(2.6)
                1997-11-13  [Irrigation].Apply(2.6)
                1997-11-14  [Irrigation].Apply(2.6)
                1997-11-15  [Irrigation].Apply(2.6)
                1997-11-16  [Irrigation].Apply(2.6)
                1997-11-17  [Irrigation].Apply(2.6)
                1997-11-18  [Irrigation].Apply(2.6)
                1997-11-19  [Irrigation].Apply(2.6)
                1997-11-20  [Irrigation].Apply(2.6)
                1997-11-21  [Irrigation].Apply(2.6)
                1997-11-22  [Irrigation].Apply(2.6)
                1997-11-23  [Irrigation].Apply(2.6)
                1997-11-24  [Irrigation].Apply(2.6)
                1997-11-25  [Irrigation].Apply(2.6)
                1997-11-26  [Irrigation].Apply(2.6)
                1997-11-27  [Irrigation].Apply(2.6)
                1997-11-28  [Irrigation].Apply(2.6)
                1997-11-29  [Irrigation].Apply(2.6)
                1997-11-30  [Irrigation].Apply(2.6)
                1997-12-01  [Irrigation].Apply(2.6)
                1997-12-02  [Irrigation].Apply(2.6)
                1997-12-03  [Irrigation].Apply(2.6)
                1997-12-04  [Irrigation].Apply(2.6)
                1997-12-05  [Irrigation].Apply(2.6)
                1997-12-06  [Irrigation].Apply(2.6)
                1997-12-07  [Irrigation].Apply(2.6)
                1997-12-08  [Irrigation].Apply(2.6)
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                1998-02-12  [Irrigation].Apply(4)
            CompositeFactor Deficit: Specifications=[IrrigationOperations]
              Operations IrrigationOperations
                1997-10-20  [Irrigation].Apply(2.6)
                1997-10-21  [Irrigation].Apply(2.6)
                1997-10-22  [Irrigation].Apply(2.6)
                1997-10-23  [Irrigation].Apply(2.6)
                1997-10-24  [Irrigation].Apply(2.6)
                1997-10-25  [Irrigation].Apply(2.6)
                1997-10-26  [Irrigation].Apply(2.6)
                1997-10-27  [Irrigation].Apply(2.6)
                1997-10-28  [Irrigation].Apply(2.6)
                1997-10-29  [Irrigation].Apply(2.6)
                1997-10-30  [Irrigation].Apply(2.6)
                1997-10-31  [Irrigation].Apply(2.6)
                1997-11-01  [Irrigation].Apply(2.6)
                1997-11-02  [Irrigation].Apply(2.6)
                1997-11-03  [Irrigation].Apply(2.6)
                1997-11-04  [Irrigation].Apply(2.6)
                1997-11-05  [Irrigation].Apply(2.6)
                1997-11-06  [Irrigation].Apply(2.6)
                1997-11-07  [Irrigation].Apply(2.6)
                1997-11-08  [Irrigation].Apply(2.6)
                1997-11-09  [Irrigation].Apply(2.6)
                1997-11-10  [Irrigation].Apply(2.6)
                1997-11-11  [Irrigation].Apply(2.6)
                1997-11-12  [Irrigation].Apply(2.6)
                1997-11-13  [Irrigation].Apply(2.6)
                1997-11-14  [Irrigation].Apply(2.6)
                1997-11-15  [Irrigation].Apply(2.6)
                1997-11-16  [Irrigation].Apply(2.6)
                1997-11-17  [Irrigation].Apply(2.6)
                1997-11-18  [Irrigation].Apply(2.6)
                1997-11-19  [Irrigation].Apply(2.6)
                1997-11-20  [Irrigation].Apply(2.6)
                1997-11-21  [Irrigation].Apply(2.6)
                1997-11-22  [Irrigation].Apply(2.6)
                1997-11-23  [Irrigation].Apply(2.6)
                1997-11-24  [Irrigation].Apply(2.6)
                1997-11-25  [Irrigation].Apply(2.6)
                1997-11-26  [Irrigation].Apply(2.6)
                1997-11-27  [Irrigation].Apply(2.6)
                1997-11-28  [Irrigation].Apply(2.6)
                1997-11-29  [Irrigation].Apply(2.6)
                1997-11-30  [Irrigation].Apply(2.6)
                1997-12-01  [Irrigation].Apply(2.6)
                1997-12-02  [Irrigation].Apply(2.6)
                1997-12-03  [Irrigation].Apply(2.6)
                1997-12-04  [Irrigation].Apply(2.6)
                1997-12-05  [Irrigation].Apply(2.6)
                1997-12-06  [Irrigation].Apply(2.6)
                1997-12-07  [Irrigation].Apply(2.6)
                1997-12-08  [Irrigation].Apply(2.6)
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                1998-02-12  [Irrigation].Apply(0.8)
                1998-02-25  [Irrigation].Apply(20.8)
      Simulation Manawatu_97
        Memo Experiment description
          *	Based on Mpelasako et 2001.

          *	Lysimeter (1.2 m deep by 1 m wide) trial conducted during the 1997/98 season.

          *	Location: Massey University, Palmerston North (40°2'S, 175°4'E.

          *	Soil: Manawatu fine sandy loam.

          *	Plant material: 4-year-old 'Braeburn' on MM106 rootstock

          *	Full bloom assumed to be 20/10/1997 - date estimated to be similar to Mills et al (1997)
        Clock: Start=1997-07-01; End=1998-06-30
        Summary SummaryFile
        Weather: FileName=WeatherFiles\PalmerstonNorth-Turitea.met
        MicroClimate: a_interception=0; b_interception=1; c_interception=0; d_interception=0; SoilHeatFluxFraction=0.4; MinimumHeightDiffForNewLayer=0; NightInterceptionFraction=0.5; ReferenceHeight=2
        SoilArbitrator Soil Arbitrator
        RectangularZone Row: Length=1; Width=1; Slope=0; AspectAngle=0; Altitude=50
          Report RowZoneReport: EventNames=[Clock].DoReport
          Report ReportBoth: EventNames=[Clock].DoReport
          SurfaceOrganicMatter: InitialResidueName=wheat_stubble; InitialResidueType=wheat; InitialResidueMass=500; InitialStandingFraction=0; InitialCPR=0; InitialCNR=100
          Plant STRUM
          Fertiliser
          Irrigation
          Manager AgrgateZoneVariables
            script: same as in NZ AppleExperiments.Manawatu_1994.Manawatu_94.Row.AgrgateZoneVariables
          Operations IrrigationOperations
          Soil: SoilType=Silt loam; LocalName=Tokomaru; Site=Massey University 1; NearestTown=Palmerston North, Massey University 1; Region=Manawatu; Country=New Zealand; ApsoilNumber=1365; Latitude=-40.395; Longitude=175.609; LocationAccuracy=+/-50 m; YearOfSampling=2010
            DataSource=The database of New Zealand soils was compiled by AgResearch (www.agresearch.co.nz) and based on soil properties gathered, mainly from publications, in the course of conducting several simulation-based research projects but particularly from the Pastoral 21 Environment program which was funded by the New Zealand Ministry for Business, Innovation and Employment,  Dairy NZ, Fonterra and Meat & Wool NZ.
            Comments=Lowered BD value in layer 5 to make run in APSIM. Original values in rb column.The data is a combination of published or supplied measurements, pedotransfer functions, and expert opinion. See Cichota et al. (2013; Soil Research 51: 92-111, http://dx.doi.org/10.1071/SR12338) for a description of the pedotransfer functions. The soil carbon and fresh organic matter settings have been set as those broadly appropriate for permanent productive pastoral systems, see Cichota el al. (2012; Soil Research 50: 694-707, http://dx.doi.org/10.1071/SR12208). Users should take care to adapt these to local conditions before using the data in simulations. FOM values estimated to be 900 kg/ha of FOM in top 600mm of soil and another 100 kg/ha below. Soil C:N ratios taken from soil Silt loam (Marton NoXXXX).
            Physical: same as NZ AppleExperiments.Manawatu_1994.Manawatu_94.Row.Soil.Physical
            WaterBalance SoilWater: SummerDate=1-nov; SummerU=0; SummerCona=0; WinterDate=1-apr; WinterU=0; WinterCona=0; DiffusConst=88; DiffusSlope=35; Salb=1; CN2Bare=0; CNRed=20; CNCov=0.8; PSIDul=-100; Thickness=[100, 150, 200, 350, 700]; SWCON=[0.57, 0.9, 0.9, 0.9, 0.9]
            Organic: same as NZ AppleExperiments.Manawatu_1994.Manawatu_94.Row.Soil.Organic
            Chemical: same as NZ AppleExperiments.Manawatu_1994.Manawatu_94.Row.Soil.Chemical
            Water: Thickness=[200, 200, 200, 400, 200]; InitialValues=[0.15, 0.15, 0.15, 0.15, 0.15]; InitialPAWmm=136; RelativeTo=LL15; FilledFromTop=false
            Solute NO3: same as NZ AppleExperiments.Manawatu_1994.Manawatu_94.Row.Soil.NO3
            Solute NH4: same as NZ AppleExperiments.Manawatu_1994.Manawatu_94.Row.Soil.NH4
            Solute Urea: same as NZ AppleExperiments.Manawatu_1994.Manawatu_94.Row.Soil.Urea
            OutputLayers: Thickness=[200, 200, 200, 200, 200, 200, 200]
            LayerStructure: Thickness=[200, 200, 200, 200, 200, 200, 100]
            Nutrient
            SoilTemperature CERESSoilTemperature
          Manager ClimateControl
            StartDate = 20-oct
            EndDate = 15-apr
            script: same as in NZ AppleExperiments.Manawatu_1994.Manawatu_94.Row.ClimateControl
          Manager AutomaticFertiliser
            Season_Start = 1-Aug
            Season_End = 30-Apr
            Season_Allocation = 100000
            TriggerN = 50
            NApplicationAmount = 25
            Return_days = 3
            Top_Depth = 300
            Fertilise = True
            script: same as in NZ AppleExperiments.Manawatu_1994.Manawatu_94.Row.AutomaticFertiliser
          StrumTreeInstance Apple: AgeAtSimulationStart=6; YearsToMaxDimension=6; TrunkMassAtMaxDimension=12; BudBreakDAWS=100; StartFullCanopyDAWS=150; StartLeafFallDAWS=305; EndLeafFallDAWS=330; GRINZ=false; MaxRD=1500; Proot=0.1; CanopyBaseHeight=1000; MaxPrunedHeight=2800; MaxHeight=3500; MaxPrunedWidth=700; MaxWidth=1000; RootNConc=0.01; LeafNConc=0.02; TrunkNConc=0.01; FruitNConc=0.02; ExtinctCoeff=0.8; MaxCover=0.98; GSMax=0.006; R50=100; WaterStress=false; Number=50; DMC=0.16
            zero: RowSpacing, InterRowSpacing, AlleyZoneWidthFrac, WoodDensity, Pleaf, Ptrunk, BaseCover, RUE, PotentialFWPerFruit, FruitDensity, DAFStartLinearGrowth, DAFEndLinearGrowth, DAFMaxSize, TotalSolarRadiation
          Manager DAS: same as NZ AppleExperiments.Manawatu_1994.Manawatu_94.Row.DAS
          BiomassRemovalEvents Pick: same as NZ AppleExperiments.Manawatu_1994.Manawatu_94.Row.Pick
          BiomassRemovalEvents Prune: same as NZ AppleExperiments.Manawatu_1994.Manawatu_94.Row.Prune
    Simulation Apple_Dwarf
      Memo ExperimentDescription
        *	Based on Green et al 2013 - PFR report for the Hawkes Bay Regional Council

        * 	Location: Hastings, NZ

        *	Cultivar: Pink Lady

        *	Transpiration measured using sap flow sensors.
      Clock: Start=2008-07-01; End=2011-07-01
      Summary SummaryFile
      Weather: FileName=WeatherFiles\Whakatu.met
      MicroClimate: a_interception=0; b_interception=1; c_interception=0; d_interception=0; SoilHeatFluxFraction=0.4; MinimumHeightDiffForNewLayer=0; NightInterceptionFraction=0.5; ReferenceHeight=2
      SoilArbitrator Soil Arbitrator
      RectangularZone Row: Length=100; Width=1.3; Slope=0; AspectAngle=0; Altitude=50
        Report RowZoneReport: EventNames=[Clock].DoReport
        Report ReportBoth: EventNames=[Clock].DoReport
        Report Drainage: EventNames=[Clock].DoReport
          VariableNames:
            [Clock].Today
            sum of [Soil].SoilWater.Flux[6] from 2008-10-01 to 2011-03-08 as drainage
            [Soil].Water.MM[9] + [Soil].Water.MM[10] as SW_belowRoots
        Soil: Latitude=0; Longitude=0
          LayerStructure: Thickness=[200, 200, 200, 200, 200, 200, 300, 300, 400, 800]
          Chemical: Thickness=[100, 200, 300, 300, 300, 300]; PH=[6.6, 6.2, 5.7, 5.5, 5.5, 5.5]; PHUnits=Water
          Water: Thickness=[300, 300, 300, 300, 300, 300, 1200]; InitialValues=[0.37, 0.37, 0.378, 0.421, 0.412, 0.395, 0.395]; InitialPAWmm=562.8; RelativeTo=LL15; FilledFromTop=false
          WaterBalance SoilWater: SummerDate=1-Nov; SummerU=9; SummerCona=4.4; WinterDate=1-Apr; WinterU=9; WinterCona=4.4; DiffusConst=88; DiffusSlope=35.4; Salb=0.3; CN2Bare=68; CNRed=20; CNCov=0.8; DischargeWidth=0; CatchmentArea=0; PSIDul=-100
            Thickness  SWCON  KLAT
            300        0.55   0
            300        0.55   0
            300        0.55   0
            300        0.55   0
            300        0.1    0
            300        0.02   0
            400        0.02   0
            800        0      0
          Organic: FOMCNRatio=30; CarbonUnits=Total
            Thickness  Carbon  SoilCNRatio  FBiom  FInert  FOM
            100        1.82    11.5         0.025  0.3     1243.93
            200        1.47    11.5         0.025  0.4     833.832
            300        1.2     11.5         0.015  0.75    457.617
            300        1.03    11.5         0.01   0.9     251.145
            300        0.47    11.5         0.01   0.96    137.831
            300        0.47    11.5         0.01   0.96    75.6435
          OutputLayers: Thickness=[300, 300, 300, 300, 300, 300]
          Solute NO3: Thickness=[100, 200, 300, 300, 300, 300]; InitialValues=[217, 15, 1.66667, 1.66667, 0, 0]; InitialValuesUnits=ppm; WaterTableConcentration=0; D0=0; DepthConstant=0; MaxDepthSoluteAccessible=0; RunoffEffectivenessAtMovingSolute=0; MaxEffectiveRunoff=0
          Solute NH4: Thickness=[100, 200, 300, 300, 300, 300]; InitialValues=[0, 0, 0, 0, 0, 0]; InitialValuesUnits=ppm; WaterTableConcentration=0; D0=0; DepthConstant=0; MaxDepthSoluteAccessible=0; RunoffEffectivenessAtMovingSolute=0; MaxEffectiveRunoff=0
          Solute Urea: Thickness=[100, 200, 300, 300, 300, 300]; InitialValues=[0, 0, 0, 0, 0, 0]; InitialValuesUnits=kg/ha; WaterTableConcentration=0; D0=0; DepthConstant=0; MaxDepthSoluteAccessible=0; RunoffEffectivenessAtMovingSolute=0; MaxEffectiveRunoff=0
          Physical
            Thickness  ParticleSizeSand  ParticleSizeSilt  ParticleSizeClay  Rocks     BD  AirDry  LL15  DUL   SAT   KS
            300        5                 65                30                0.136527  1   0.2     0.2   0.4   0.5   100
            300        5                 65                30                0.136527  1   0.2     0.2   0.4   0.5   100
            300        5                 65                30                0.136527  1   0.25    0.25  0.4   0.5   50
            300        5                 65                30                0.136527  1   0.2     0.2   0.46  0.5   40
            300        5                 65                30                0.136527  1   0.2     0.2   0.45  0.5   40
            300        5                 65                30                0         1   0.2     0.2   0.43  0.53  40
            1200       5                 65                30                0         1   0.2     0.2   0.43  0.53  40
            Rocks, ParticleSizeSand, ParticleSizeSilt, ParticleSizeClay source: Calculated
            SoilCrop STRUMSoil: LL=[0.2, 0.2, 0.2, 0.2, 0.2, 0.2, 0.2]; KL=[0.1, 0.1, 0.1, 0.1, 0.1, 0.1, 0.1]; XF=[1, 1, 1, 1, 1, 1, 1]
            SoilCrop SPRUMSoil: LL=[0.2, 0.2, 0.2, 0.2, 0.2, 0.2, 0.2]; KL=[0.11, 0.11, 0.11, 0.11, 0.11, 0.11, 0.11]; XF=[1, 1, 1, 1, 1, 1, 1]
          Nutrient
          SoilTemperature Temperature
        SurfaceOrganicMatter: InitialResidueName=wheat_stubble; InitialResidueType=wheat; InitialResidueMass=500; InitialStandingFraction=0; InitialCPR=0; InitialCNR=100
        Plant STRUM
        StrumTreeInstance Apple: TreeType=Deciduous; RowSpacing=3.5; InterRowSpacing=1.5; AlleyZoneWidthFrac=0.1; AgeAtSimulationStart=6; YearsToMaxDimension=6; TrunkMassAtMaxDimension=12; WoodDensity=600; BudBreakDAWS=70; StartFullCanopyDAWS=125; StartLeafFallDAWS=290; EndLeafFallDAWS=305; GRINZ=true; MaxRD=3000; Proot=0.3; Pleaf=0.5; Ptrunk=0.2; CanopyBaseHeight=1000; MaxPrunedHeight=2800; MaxHeight=3500; MaxPrunedWidth=1300; MaxWidth=1600; RootNConc=0.01; LeafNConc=0.02; TrunkNConc=0.01; FruitNConc=0.02; ExtinctCoeff=0.8; BaseCover=0; MaxCover=0.98; RUE=1.1; GSMax=0.005; R50=100; WaterStress=true; Number=200; PotentialFWPerFruit=500; DMC=0.14; FruitDensity=0.75; DateMaxBloom=15-Sep; DAFStartLinearGrowth=70; DAFEndLinearGrowth=200; DAFMaxSize=230; TotalSolarRadiation=0
        Fertiliser
        Irrigation
        Operations
          2008-09-16  [Irrigation].apply(15)
          2008-10-05  [Irrigation].apply(5)
          2008-10-06  [Irrigation].apply(6)
          2008-10-11  [Irrigation].apply(15)
          2008-10-18  [Irrigation].apply(16)
          2008-10-22  [Irrigation].apply(2)
          2008-10-25  [Irrigation].apply(12)
          2008-11-01  [Irrigation].apply(6)
          2008-11-04  [Irrigation].apply(20)
          2008-11-14  [Irrigation].apply(15)
          2008-11-19  [Irrigation].apply(15)
          2008-11-23  [Irrigation].apply(15)
          2008-11-27  [Irrigation].apply(15)
          2008-12-01  [Irrigation].apply(2)
          2008-12-03  [Irrigation].apply(15)
          2008-12-06  [Irrigation].apply(15)
          2008-12-13  [Irrigation].apply(9)
          2008-12-16  [Irrigation].apply(15)
          2008-12-24  [Irrigation].apply(16)
          2008-12-31  [Irrigation].apply(8)
          2009-01-04  [Irrigation].apply(15)
          2009-01-11  [Irrigation].apply(15)
          2009-01-18  [Irrigation].apply(15)
          2009-01-24  [Irrigation].apply(15)
          2009-01-30  [Irrigation].apply(15)
          2009-02-04  [Irrigation].apply(15)
          2009-02-12  [Irrigation].apply(18)
          2009-02-16  [Irrigation].apply(12)
          2009-02-20  [Irrigation].apply(7)
          2009-03-01  [Irrigation].apply(50)
          2009-03-22  [Irrigation].apply(25)
          2009-12-16  [Irrigation].apply(20)
          2009-12-21  [Irrigation].apply(20)
          2009-12-26  [Irrigation].apply(20)
          2010-01-03  [Irrigation].apply(20)
          2010-01-08  [Irrigation].apply(15)
          2010-03-17  [Irrigation].apply(20)
          2010-03-18  [Irrigation].apply(20)
          2010-03-19  [Irrigation].apply(20)
          2010-03-12  [Irrigation].apply(20)
          2010-10-28  [Irrigation].apply(15)
          2010-10-29  [Irrigation].apply(15)
          2010-11-30  [Irrigation].apply(15)
          2010-12-06  [Irrigation].apply(15)
          2010-12-07  [Irrigation].apply(15)
          2010-12-27  [Irrigation].apply(15)
          2011-01-02  [Irrigation].apply(15)
          2011-01-04  [Irrigation].apply(15)
          2011-01-29  [Irrigation].apply(15)
          2011-02-16  [Irrigation].apply(15)
        Manager AgrgateZoneVariables
          script: same as in NZ AppleExperiments.Manawatu_1994.Manawatu_94.Row.AgrgateZoneVariables
        Manager WaterTable
          StartDate = 1-dec
          EndDate = 1-mar
```csharp
using Models.Zones;
using APSIM.Shared.Utilities;
using Models.Soils;
using System.Collections.Generic;
using Models.PMF;
using Models.Core;
using System;

namespace Models
{
    [Serializable]
    public class Script : Model
    {
        [Link] Clock Clock;
        [Link] Soil soil;
        [Link] Irrigation irrigation;
        [Description("Start of sowing window (d-mmm)")]
        public string StartDate { get; set; }
        [Description("End of sowing window (d-mmm)")]
        public string EndDate { get; set; }

        [EventSubscribe("StartOfDay")]
        private void OnStartOfDay(object sender, EventArgs e)
        {
        if (DateUtilities.WithinDates(StartDate, Clock.Today, EndDate))
            irrigation.Apply(2, 2500);
        }
    }
}
```
        Manager DAS: same as NZ AppleExperiments.Manawatu_1994.Manawatu_94.Row.DAS
        BiomassRemovalEvents Pick: NameOfPlantToRemoveFrom=STRUM; RemovalType=2
          BiomassRemovalFractions:
            PlantName  OrganName  TypeString  LiveToRemove  DeadToRemove  LiveToResidue  DeadToResidue
            STRUM      Root       Harvesting  0             0             0              0
            STRUM      Leaf       Harvesting  0             0             0              0
            STRUM      Trunk      Harvesting  0             0             0              0
            STRUM      Fruit      Harvesting  0.8           0             0.2            1
        BiomassRemovalEvents Prune: same as NZ AppleExperiments.Manawatu_1994.Manawatu_94.Row.Prune
      RectangularZone Alley: Length=100; Width=2.2; Slope=0; AspectAngle=0; Altitude=50
        Report AlleyZoneReport: EventNames=[Clock].DoReport
        Report ReportBoth: EventNames=[Clock].DoReport
        Report Drainage: EventNames=[Clock].DoReport
          VariableNames:
            [Clock].Today
            sum of [Soil].SoilWater.Flux[6] from 2008-10-01 to 2011-03-08 as drainage
            [Soil].Water.MM[9] + [Soil].Water.MM[10] as SW_belowRoots
        Soil: Latitude=0; Longitude=0
          LayerStructure: Thickness=[200, 200, 200, 200, 200, 200, 300, 300, 400, 800]
          Chemical: Thickness=[100, 200, 300, 300, 300, 300]; PH=[6.6, 6.2, 5.7, 5.5, 5.5, 5.5]; PHUnits=Water
          Water: Thickness=[300, 300, 300, 300, 300, 300, 1200]; InitialValues=[0.4, 0.4, 0.4, 0.46, 0.45, 0.43, 0.43]; InitialPAWmm=663; RelativeTo=LL15; FilledFromTop=false
          WaterBalance SoilWater: same as NZ AppleExperiments.Apple_Dwarf.Row.Soil.SoilWater
          Organic: same as NZ AppleExperiments.Apple_Dwarf.Row.Soil.Organic
          OutputLayers: Thickness=[300, 300, 300, 300, 300, 300]
          Solute NO3: same as NZ AppleExperiments.Apple_Dwarf.Row.Soil.NO3
          Solute NH4: same as NZ AppleExperiments.Apple_Dwarf.Row.Soil.NH4
          Solute Urea: same as NZ AppleExperiments.Apple_Dwarf.Row.Soil.Urea
          Physical
            Thickness  BD  AirDry  LL15  DUL   SAT   KS
            300        1   0.2     0.2   0.4   0.5   100
            300        1   0.2     0.2   0.4   0.5   100
            300        1   0.25    0.25  0.4   0.5   50
            300        1   0.2     0.2   0.46  0.5   40
            300        1   0.2     0.2   0.45  0.5   40
            300        1   0.2     0.2   0.43  0.53  40
            1200       1   0.2     0.2   0.43  0.53  40
            SoilCrop STRUMSoil: LL=[0.2, 0.2, 0.2, 0.2, 0.2, 0.2, 0.2]; KL=[0.1, 0.1, 0.1, 0.1, 0.1, 0.1, 0.1]; XF=[1, 1, 1, 1, 1, 1, 1]
            SoilCrop SPRUMSoil: LL=[0.2, 0.2, 0.2, 0.2, 0.2, 0.2, 0.2]; KL=[0.11, 0.11, 0.11, 0.11, 0.11, 0.11, 0.11]; XF=[1, 1, 1, 1, 1, 1, 1]
          Nutrient
          SoilTemperature Temperature
        SurfaceOrganicMatter: InitialResidueName=wheat_stubble; InitialResidueType=wheat; InitialResidueMass=500; InitialStandingFraction=0; InitialCPR=0; InitialCNR=100
        Fertiliser
        Irrigation
        Manager AgrgateZoneVariables
          script: same as in NZ AppleExperiments.Manawatu_1994.Manawatu_94.Row.AgrgateZoneVariables
        Operations: same as NZ AppleExperiments.Apple_Dwarf.Row.Operations
        Manager WaterTable: same as NZ AppleExperiments.Apple_Dwarf.Row.WaterTable
        Manager DAS: same as NZ AppleExperiments.Manawatu_1994.Manawatu_94.Row.DAS
        Plant SPRUM
        SprumPastureInstance BasePasture: AgeAtSimulationStart=1; YearsToMaxDimension=1; RUE=0.8; Presidue=0; RsenRate=0; Proot=0.1; PSBaseT=5; PSLOptT=20; PSUOptT=25; PSMaxT=35; GRINZ=true; MaxRD=700; MaxHeight=300; MaxPrunedHeight=100; MaxCover=0.98; MinCover=0.5; ExtinctCoeff=0.5; RegrowthDuration=400; FullCanopyDuration=0; BaseT=3; OptT=25; MaxT=35; RootNConc=0.01; LeafNConc=0.05; ResidueNConc=0.01; LegumePropn=0; GSMax=0.004; R50=150; WaterStress=true
        BiomassRemovalEvents Mow: NameOfPlantToRemoveFrom=SPRUM; RemovalType=0
          BiomassRemovalFractions:
            PlantName  OrganName  TypeString  LiveToRemove  DeadToRemove  LiveToResidue  DeadToResidue
            SPRUM      Residue    Cutting     0             0             0.5            0.5
            SPRUM      Leaf       Cutting     0             0             1              1
            SPRUM      Nodule     Cutting     0             0             0              0
            SPRUM      Root       Cutting     0             0             0              0
      Memo Reason why drainage looks bad
        The flux meters were flooded by a rising water table so the drainage observations are not representative of actual drainage
    Simulation Apple_Tall
      Clock: Start=2009-07-01; End=2011-07-01
      Summary SummaryFile
      Weather: FileName=WeatherFiles\Whakatu.met
      MicroClimate: a_interception=0; b_interception=1; c_interception=0; d_interception=0; SoilHeatFluxFraction=0.4; MinimumHeightDiffForNewLayer=0; NightInterceptionFraction=0.5; ReferenceHeight=2
      SoilArbitrator Soil Arbitrator
      RectangularZone Row: Length=100; Width=1.3; Slope=0; AspectAngle=0; Altitude=50
        Report RowZoneReport: EventNames=[Clock].DoReport
        Report ReportBoth: EventNames=[Clock].DoReport
        Report Drainage: EventNames=[Clock].DoReport
          VariableNames:
            [Clock].Today
            sum of [Soil].SoilWater.Flux[7] from 2008-10-01 to 2010-07-23 as drainage
        Manager AgrgateZoneVariables
```csharp
using Models.Climate;
using System;
using Models.Core;
using Models.PMF;
using System.Collections.Generic;
using Models.Soils;
using APSIM.Shared.Utilities;
using Models.Zones;
using Models.PMF.Organs;

namespace Models
{
    [Serializable]
    public class Script : Model
    {
        [Link] private Weather weather;
        private RectangularZone AlleyZone {get; set; }
        private RectangularZone RowZone {get; set;}
        private RectangularZone ThisZone {get; set;}
        private double AreaWidth {get; set;}
        public double TotRadn {get; set;}
        public double FRadInt {get; set;}
        public double ET {get; set;}
        public double ES {get; set;}
        public double PET {get; set;}
        public double LAI {get; set;}
        public double Height {get; set;}
        public double RootDepth {get; set;}
        public double PlantWidth {get; set;}
        public double InterceptedRadiation {get; set;}
        public double TreeRadInt {get; set;}


        [EventSubscribe("StartOfSimulation")]
        private void DoStartOfSimulation(object sender, EventArgs e)
        {
               
               ThisZone = this.Parent.Parent as RectangularZone;
               RowZone = this.Parent.Parent.Parent.FindInScope("Row") as RectangularZone;
               AlleyZone = (RectangularZone)this.Parent.Parent.Parent.FindInScope("Alley") as RectangularZone;
               AreaWidth = AlleyZone.Width + RowZone.Width;
               PlantWidth = 0;
        }
        
        [EventSubscribe("DoReportCalculations")]
        private void OnDoReportCalculations(object sender, EventArgs e)
        {

            if (ThisZone.Name == "Row")
                {
                TreeRadInt = (double)RowZone.Get("STRUM.Leaf.RadiationIntercepted") + (double)RowZone.Get("STRUM.Trunk.EnergyBalance.RadiationInterceptedByDead");
                FRadInt = (TreeRadInt * RowZone.Width)/(weather.Radn * AreaWidth);
                InterceptedRadiation = (double)RowZone.Get("STRUM.Leaf.RadiationIntercepted");
                ET = (double)RowZone.Get("STRUM.Leaf.Transpiration") * RowZone.Width/AreaWidth;
                LAI = (double)RowZone.Get("STRUM.Leaf.LAI");
                Height = (double)RowZone.Get("STRUM.Height");
                RootDepth = (double)RowZone.Get("STRUM.Root.Depth");
                PlantWidth = (double)RowZone.Get("STRUM.Leaf.Width")/1000;
                }
            else
                {
                FRadInt = ((double)AlleyZone.Get("SPRUM.Leaf.RadiationIntercepted") * AlleyZone.Width)/(weather.Radn * AreaWidth);
                InterceptedRadiation = (double)AlleyZone.Get("SPRUM.Leaf.RadiationIntercepted");
                ET = (double)AlleyZone.Get("SPRUM.Leaf.Transpiration") * ThisZone.Width/AreaWidth;
                LAI = (double)AlleyZone.Get("SPRUM.Leaf.LAI");
                Height = (double)AlleyZone.Get("SPRUM.Height");
                RootDepth = (double)AlleyZone.Get("SPRUM.Root.Depth");
                }
            TotRadn = weather.Radn * AreaWidth; 
            ES = (double)ThisZone.Get("Soil.SoilWater.Es") * ThisZone.Width/AreaWidth;
            double PETWidth = Math.Min(Math.Max(PlantWidth,ThisZone.Width),AreaWidth);
            PET = (double)ThisZone.Get("Soil.SoilWater.Eo") * PETWidth/AreaWidth;
        }
    }
}
```
        Soil: Latitude=0; Longitude=0
          LayerStructure: Thickness=[200, 200, 200, 200, 200, 200, 400, 400, 400, 600]
          Chemical: Thickness=[100, 200, 300, 300, 300, 300]; PH=[6.6, 6.2, 5.7, 5.5, 5.5, 5.5]; PHUnits=Water
          Water: Thickness=[400, 400, 400, 1800]; InitialValues=[0.34, 0.44, 0.52, 0.52]; InitialPAWmm=628; RelativeTo=LL15; FilledFromTop=false
          Physical
            Thickness  ParticleSizeSand  ParticleSizeSilt  ParticleSizeClay  Rocks     BD   AirDry  LL15  DUL   SAT
            400        5                 65                30                0.205604  1    0.09    0.18  0.34  0.46
            400        5                 65                30                0         1    0.24    0.24  0.44  0.55
            400        5                 65                30                0         0.8  0.3     0.3   0.52  0.6
            300        5                 65                30                0         0.8  0.3     0.3   0.52  0.6
            100        5                 65                30                0         0.8  0.3     0.3   0.52  0.6
            100        5                 65                30                0         0.8  0.3     0.3   0.52  0.6
            1300       5                 65                30                0         0.8  0.3     0.3   0.52  0.6
            Rocks, ParticleSizeSand, ParticleSizeSilt, ParticleSizeClay source: Calculated
            SoilCrop STRUMSoil: LL=[0.18, 0.24, 0.3, 0.3, 0.3, 0.3, 0.3]; KL=[1, 1, 1, 1, 1, 1, 1]; XF=[1, 1, 1, 1, 1, 1, 1]
            SoilCrop SPRUMSoil: LL=[0.18, 0.24, 0.3, 0.3, 0.3, 0.3, 0.3]; KL=[0.11, 0.11, 0.11, 0.11, 0.11, 0.11, 0.06]; XF=[1, 1, 1, 1, 1, 1, 1]
          WaterBalance SoilWater: SummerDate=1-Nov; SummerU=9; SummerCona=4.4; WinterDate=1-Apr; WinterU=9; WinterCona=4.4; DiffusConst=88; DiffusSlope=35.4; Salb=0.3; CN2Bare=68; CNRed=20; CNCov=0.8; DischargeWidth=0; CatchmentArea=0; PSIDul=-100
            Thickness  SWCON  KLAT
            150        0.55   0
            150        0.55   0
            100        0.55   0
            200        0.55   0
            200        0.55   0
            200        0.55   0
            200        0.55   0
            200        0.55   0
            200        0.55   0
            200        0.55   0
            200        0.55   0
            200        0.55   0
            400        0.55   0
          Organic: same as NZ AppleExperiments.Apple_Dwarf.Row.Soil.Organic
          OutputLayers: Thickness=[400, 400, 400, 400]
          Solute NO3: Thickness=[100, 200, 300, 300, 300, 300]; InitialValues=[217, 15, 1.66667, 1.78571, 0, 0]; InitialValuesUnits=ppm; WaterTableConcentration=0; D0=0; DepthConstant=0; MaxDepthSoluteAccessible=0; RunoffEffectivenessAtMovingSolute=0; MaxEffectiveRunoff=0
          Solute NH4: same as NZ AppleExperiments.Apple_Dwarf.Row.Soil.NH4
          Solute Urea: same as NZ AppleExperiments.Apple_Dwarf.Row.Soil.Urea
          Nutrient
          SoilTemperature Temperature
        SurfaceOrganicMatter: InitialResidueName=wheat_stubble; InitialResidueType=wheat; InitialResidueMass=500; InitialStandingFraction=0; InitialCPR=0; InitialCNR=100
        Fertiliser
        Irrigation
        Operations
          2008-09-13  [Irrigation].apply(15)
          2008-10-05  [Irrigation].apply(5)
          2008-10-06  [Irrigation].apply(6)
          2008-11-10  [Irrigation].apply(15)
          2008-10-18  [Irrigation].apply(16)
          2008-10-22  [Irrigation].apply(2)
          2008-10-25  [Irrigation].apply(12)
          2008-11-01  [Irrigation].apply(6)
          2008-11-10  [Irrigation].apply(15)
          2008-11-14  [Irrigation].apply(15)
          2008-11-20  [Irrigation].apply(15)
          2008-11-26  [Irrigation].apply(12)
          2008-12-01  [Irrigation].apply(2)
          2008-12-02  [Irrigation].apply(15)
          2008-12-08  [Irrigation].apply(15)
          2008-12-13  [Irrigation].apply(9)
          2009-12-18  [Irrigation].apply(20)
          2008-12-24  [Irrigation].apply(16)
          2008-12-31  [Irrigation].apply(8)
          2009-01-03  [Irrigation].apply(15)
          2009-01-11  [Irrigation].apply(15)
          2009-01-23  [Irrigation].apply(15)
          2009-02-12  [Irrigation].apply(18)
          2009-02-16  [Irrigation].apply(12)
          2009-02-20  [Irrigation].apply(7)
          2009-03-01  [Irrigation].apply(50)
          2009-03-22  [Irrigation].apply(25)
          2009-12-16  [Irrigation].apply(15)
          2009-12-21  [Irrigation].apply(18)
          2009-12-26  [Irrigation].apply(18)
          2010-01-03  [Irrigation].apply(20)
          2010-01-08  [Irrigation].apply(20)
          2010-03-28  [Irrigation].apply(30)
          2010-10-27  [Irrigation].apply(15)
          2010-11-25  [Irrigation].apply(15)
          2010-12-06  [Irrigation].apply(20)
          2010-12-12  [Irrigation].apply(15)
          2010-12-26  [Irrigation].apply(20)
          2011-01-01  [Irrigation].apply(20)
          2011-01-17  [Irrigation].apply(20)
          2011-02-07  [Irrigation].apply(20)
          2011-02-16  [Irrigation].apply(20)
          2011-03-16  [Irrigation].apply(20)
        Manager WaterTable: same as NZ AppleExperiments.Apple_Dwarf.Row.WaterTable
        Plant STRUM
        StrumTreeInstance Apple: TreeType=Deciduous; RowSpacing=2; InterRowSpacing=3; AlleyZoneWidthFrac=0.1; AgeAtSimulationStart=6; YearsToMaxDimension=6; TrunkMassAtMaxDimension=12; BudBreakDAWS=70; StartFullCanopyDAWS=125; StartLeafFallDAWS=260; EndLeafFallDAWS=280; GRINZ=true; MaxRD=3000; Proot=0.1; CanopyBaseHeight=1000; MaxPrunedHeight=2800; MaxHeight=3500; MaxPrunedWidth=1300; MaxWidth=1600; RootNConc=0.01; LeafNConc=0.02; TrunkNConc=0.01; FruitNConc=0.02; ExtinctCoeff=0.8; MaxCover=0.98; GSMax=0.004; R50=100; WaterStress=false; Number=50; DMC=0.14
          zero: WoodDensity, Pleaf, Ptrunk, BaseCover, RUE, PotentialFWPerFruit, FruitDensity, DAFStartLinearGrowth, DAFEndLinearGrowth, DAFMaxSize, TotalSolarRadiation
        Manager DAS: same as NZ AppleExperiments.Manawatu_1994.Manawatu_94.Row.DAS
        BiomassRemovalEvents Pick: same as NZ AppleExperiments.Manawatu_1994.Manawatu_94.Row.Pick
        BiomassRemovalEvents Prune: same as NZ AppleExperiments.Manawatu_1994.Manawatu_94.Row.Prune
      RectangularZone Alley: Length=100; Width=2.2; Slope=0; AspectAngle=0; Altitude=50
        Report AlleyZoneReport: EventNames=[Clock].DoReport
        Report ReportBoth: EventNames=[Clock].DoReport
        Report Drainage: EventNames=[Clock].DoReport
          VariableNames:
            [Clock].Today
            sum of [Soil].SoilWater.Flux[7] from 2008-10-01 to 2010-07-23 as drainage
        Manager AgrgateZoneVariables: same as NZ AppleExperiments.Apple_Tall.Row.AgrgateZoneVariables
        Soil: Latitude=0; Longitude=0
          LayerStructure: Thickness=[200, 200, 200, 200, 200, 200, 400, 400, 400, 600]
          Chemical: Thickness=[100, 200, 300, 300, 300, 300]; PH=[6.6, 6.2, 5.7, 5.5, 5.5, 5.5]; PHUnits=Water
          Water: Thickness=[400, 400, 400, 1800]; InitialValues=[0.34, 0.44, 0.52, 0.52]; InitialPAWmm=628; RelativeTo=LL15; FilledFromTop=false
          Physical
            Thickness  BD   AirDry  LL15  DUL   SAT
            400        1    0.09    0.18  0.34  0.46
            400        1    0.24    0.24  0.44  0.55
            400        0.8  0.3     0.3   0.52  0.6
            300        0.8  0.3     0.3   0.52  0.6
            100        0.8  0.3     0.3   0.52  0.6
            100        0.8  0.3     0.3   0.52  0.6
            1300       0.8  0.3     0.3   0.52  0.6
            SoilCrop STRUMSoil: LL=[0.18, 0.24, 0.3, 0.3, 0.3, 0.3, 0.3]; KL=[1, 1, 1, 1, 1, 1, 1]; XF=[1, 1, 1, 1, 1, 1, 1]
            SoilCrop SPRUMSoil: LL=[0.18, 0.24, 0.3, 0.3, 0.3, 0.3, 0.3]; KL=[0.11, 0.11, 0.11, 0.11, 0.11, 0.11, 0.11]; XF=[1, 1, 1, 1, 1, 1, 1]
          WaterBalance SoilWater: same as NZ AppleExperiments.Apple_Tall.Row.Soil.SoilWater
          Organic: same as NZ AppleExperiments.Apple_Dwarf.Row.Soil.Organic
          OutputLayers: Thickness=[400, 400, 400, 400]
          Solute NO3: same as NZ AppleExperiments.Apple_Tall.Row.Soil.NO3
          Solute NH4: same as NZ AppleExperiments.Apple_Dwarf.Row.Soil.NH4
          Solute Urea: same as NZ AppleExperiments.Apple_Dwarf.Row.Soil.Urea
          Nutrient
          SoilTemperature Temperature
        SurfaceOrganicMatter: InitialResidueName=wheat_stubble; InitialResidueType=wheat; InitialResidueMass=500; InitialStandingFraction=0; InitialCPR=0; InitialCNR=100
        Fertiliser
        Irrigation
        Manager WaterTable: same as NZ AppleExperiments.Apple_Dwarf.Row.WaterTable
        Manager DAS: same as NZ AppleExperiments.Manawatu_1994.Manawatu_94.Row.DAS
        Plant SPRUM
        SprumPastureInstance BasePasture: AgeAtSimulationStart=1; YearsToMaxDimension=1; RUE=1; Presidue=0; RsenRate=0; Proot=0.1; PSBaseT=5; PSLOptT=20; PSUOptT=25; PSMaxT=35; GRINZ=true; MaxRD=700; MaxHeight=300; MaxPrunedHeight=100; MaxCover=0.97; MinCover=0.5; ExtinctCoeff=0.5; RegrowthDuration=300; FullCanopyDuration=0; BaseT=3; OptT=25; MaxT=35; RootNConc=0.01; LeafNConc=0.05; ResidueNConc=0.01; LegumePropn=0; GSMax=0.004; R50=150; WaterStress=true
        BiomassRemovalEvents OnCut: same as NZ AppleExperiments.Apple_Dwarf.Alley.Mow
      Memo Reason why drainage looks bad
        The flux meters were flooded by a rising water table so the drainage observations are not representative of actual drainage
  Folder USA AppleExperiments
    Experiment Prosser_Apple_Deep
      Memo ExperimentDescription
        *	Based on Ebel e al (2001) - HORTSCIENCE, VOL. 36(7)

        *	Trial site: Roza irrigation district in the lower Yakima valley near Prosser, Wash. (lat. 45°N; long. 119°W and 380 m above sea level)

        *	Soil: Warden fine sandy loam (coarse, silty, mixed, mesic, Xerollic Camborthids) that was uniform down the profile and overlaid fractured basalt bedrock

        *	The permanent wilting and field capacity were 8% (80 mm·m–1) and 28% (280 mm·m–1) by volume, respectively - total available soil water was 200 mm·m–1 for the two orchards.

        *	The shallow soil (mean depth = 0.8 m) and deeper soil (average depth = 1.2 m) had 160 and 240 mm of total water available at field capacity (FC), respectively.

        *	Irrigation treatments: withholding irrigation all season or from 3, 5, 7, 9, 11, 13, 15 or 17 weeks before harvest.

        *	Total pan evaporation was 1005 mm and precipitation was negligible from May through September.
      Memo Apples in this region
        *	Apples grown in Washington, e.g. Red/Golden Delicious, Gala, and Granny Smith, are in season from August to early November.

        *	Apple trees in Washington should be sown in early spring.
      Factors
        Permutation
          Factor Soil
            CompositeFactor _: Specifications=[Soil]
              Soil: Latitude=0; Longitude=0
                LayerStructure: Thickness=[200, 200, 200, 200, 200, 200, 300, 300, 400, 800]
                Chemical: Thickness=[100, 200, 300, 300, 300, 300]; PH=[6.6, 6.2, 5.7, 5.5, 5.5, 5.5]; PHUnits=Water
                Water: Thickness=[300, 300, 300, 300, 300, 300, 1200]; InitialValues=[0.28, 0.28, 0.28, 0.28, 0.015, 0.015, 0.015]; InitialPAWmm=249; RelativeTo=LL15; FilledFromTop=false
                Physical
                  Thickness  BD  AirDry  LL15  DUL    SAT   KS
                  300        1   0.04    0.08  0.28   0.35  100
                  300        1   0.08    0.08  0.28   0.35  100
                  300        1   0.08    0.08  0.28   0.35  50
                  300        1   0.08    0.08  0.28   0.35  40
                  300        1   0.01    0.01  0.015  0.02  10
                  300        1   0.01    0.01  0.015  0.02  1
                  1200       1   0.01    0.01  0.015  0.02  0
                  SoilCrop STRUMSoil: LL=[0.04, 0.08, 0.08, 0.08, 0.01, 0.01, 0.01]; KL=[0.05, 0.05, 0.05, 0.05, 0.05, 0.05, 0.05]; XF=[1, 1, 1, 1, 1, 1, 1]
                  SoilCrop SPRUMSoil: LL=[0.04, 0.08, 0.08, 0.08, 0.01, 0.01, 0.01]; KL=[0.05, 0.05, 0.05, 0.05, 0.05, 0.05, 0.05]; XF=[1, 1, 1, 1, 1, 1, 1]
                WaterBalance SoilWater: same as PatternTest.Decidious.Row.Soil.SoilWater
                Organic: same as PatternTest.Decidious.Alley.Soil.Organic
                OutputLayers: Thickness=[200, 200, 200, 200, 200, 200, 200, 200]
                Solute NO3: Thickness=[100, 200, 300, 300, 300, 300]; InitialValues=[217, 15, 1.667, 1.667, 0, 0]; InitialValuesUnits=ppm; WaterTableConcentration=0; D0=0; DepthConstant=0; MaxDepthSoluteAccessible=0; RunoffEffectivenessAtMovingSolute=0; MaxEffectiveRunoff=0
                Solute NH4: same as PatternTest.Decidious.Row.Soil.NH4
                Solute Urea: same as PatternTest.Decidious.Row.Soil.Urea
                Nutrient
                SoilTemperature Temperature
            Memo Notes
              ### Notes about this factor

              _Rogerio Cichota_

              Eyre_23a3 is a Weathered Orthic Recent soil
              Darnley_4a2 is a Typic Argillic Pallic Soil
              Waikiwi_33a2 is a Typic Firm Brown Soil
              Windermere_16a1 is a Mellow Humic Organic Soil
              Patua_10a1 is a Typic Impeded Allophanic Soil

              ==========================================================================================

              **Summmaries, selected properties**

              | SoilName | RootingDepth | BD_TopLayer | BDMax_AnyLayer | PAW_Top100cm | PAW_Total | KSat_TopLayer | KSatMin_AnyLayer | Carbon_TopLayer | CN2Bare | CNReduction |
              |:-------- | ------------:| -----------:| --------------:| ------------:| ---------:| -------------:| ----------------:| ---------------:| -------:| -----------:|
              |          |         (mm) |     (kg/m³) |        (kg/m³) |         (mm) |      (mm) |        (mm/h) |           (mm/h) |             (%) |     (-) |         (-) |
              | Eyre_23a3 | 710 | 0.841 | 0.841 | 53.5 | 79.5 | 1440 | 1440 | 2.97 | 99.0 | 39.0 |
              | Darnley_4a2 | 700 | 1.254 | 1.388 | 102.0 | 160.0 | 1440 | 1.2 | 3.90 | 89.0 | 20.0 |
              | Waikiwi_33a2 | 2000 | 1.189 | 1.441 | 156.5 | 295.5 | 1440 | 192 | 4.78 | 88.0 | 20.0 |
              | Windermere_16a1 | 2000 | 0.300 | 1.476 | 242.3 | 391.3 | 960 | 192 | 28.65 | 90.0 | 16.0 |
              | Patua_10a1 | 800 | 0.801 | 0.801 | 127.5 | 207.5 | 1920 | 960 | 10.00 | 92.0 | 18.0 |
              | Templeton_1a2 | 2000 | 1.332 | 1.693 | 171.3 | 328.3 | 1440 | 24 | 3.72 | 88.0 | 20.0 |
              | Flaxton_4a1 | 2000 | 1.186 | 1.414 | 171.2 | 405.2 | 1440 | 24 | 5.43 | 93.0 | 16.0 |
          Factor Irr: Specification=[IrrigationOperations]
            Operations 0
            Operations 1
              1986-06-01  [Irrigation].Apply(70);
            Operations 2
              1986-06-01  [Irrigation].Apply(70);
              1986-06-15  [Irrigation].Apply(70);
            Operations 3
              1986-06-01  [Irrigation].Apply(70);
              1986-06-15  [Irrigation].Apply(70);
              1986-06-29  [Irrigation].Apply(70);
            Operations 4
              1986-06-01  [Irrigation].Apply(70);
              1986-06-15  [Irrigation].Apply(70);
              1986-06-29  [Irrigation].Apply(70);
              1986-07-13  [Irrigation].Apply(70);
            Operations 5
              1986-06-01  [Irrigation].Apply(70);
              1986-06-15  [Irrigation].Apply(70);
              1986-06-29  [Irrigation].Apply(70);
              1986-07-13  [Irrigation].Apply(70);
              1986-07-27  [Irrigation].Apply(70);
            Operations 6
              1986-06-01  [Irrigation].Apply(70);
              1986-06-15  [Irrigation].Apply(70);
              1986-06-29  [Irrigation].Apply(70);
              1986-07-13  [Irrigation].Apply(70);
              1986-07-27  [Irrigation].Apply(70);
              1986-08-10  [Irrigation].Apply(70);
            Operations 7
              1986-06-01  [Irrigation].Apply(70);
              1986-06-15  [Irrigation].Apply(70);
              1986-06-29  [Irrigation].Apply(70);
              1986-07-13  [Irrigation].Apply(70);
              1986-07-27  [Irrigation].Apply(70);
              1986-08-10  [Irrigation].Apply(70);
              1986-08-24  [Irrigation].Apply(70);
            Operations 8
              1986-06-01  [Irrigation].Apply(70);
              1986-06-15  [Irrigation].Apply(70);
              1986-06-29  [Irrigation].Apply(70);
              1986-07-13  [Irrigation].Apply(70);
              1986-07-27  [Irrigation].Apply(70);
              1986-08-10  [Irrigation].Apply(70);
              1986-08-24  [Irrigation].Apply(70);
              1986-09-07  [Irrigation].Apply(70);
      Simulation DeepSoil
        Clock: Start=1986-05-01; End=1986-11-28
        Summary SummaryFile
        Weather: FileName=WeatherFiles\Pendleton.met
        MicroClimate: a_interception=0; b_interception=1; c_interception=0; d_interception=0; SoilHeatFluxFraction=0.4; MinimumHeightDiffForNewLayer=0; NightInterceptionFraction=0.5; ReferenceHeight=2
        SoilArbitrator Soil Arbitrator
        RectangularZone Row: Length=100; Width=1.5; Slope=0; AspectAngle=0; Altitude=50
          Report RowZoneReport: EventNames=[Clock].DoReport
          Report ReportBoth: EventNames=[Clock].DoReport
          Soil: Latitude=0; Longitude=0
            LayerStructure: Thickness=[200, 200, 200, 200, 200, 200, 100]
            Chemical: Thickness=[100, 200, 300, 300, 300]; PH=[6.6, 6.2, 5.7, 5.5, 5.5]; PHUnits=Water
            Water: Thickness=[300, 300, 300, 300, 100]; InitialValues=[0.497, 0.356, 0.145, 0.092, 0.092]; InitialPAWmm=98.1; RelativeTo=LL15; FilledFromTop=true
            Physical
              Thickness  ParticleSizeSand  ParticleSizeSilt  ParticleSizeClay  BD     AirDry  LL15   DUL    SAT    KS
              300        35                47.5              17.5              0.801  0.116   0.232  0.497  0.607  100
              300        35                42.5              22.5              0.765  0.191   0.294  0.447  0.621  100
              300        85                10                5                 0.575  0.145   0.145  0.274  0.45   50
              300        85                10                5                 0.369  0.092   0.092  0.172  0.266  40
              100        85                10                5                 0.369  0.092   0.092  0.172  0.266  0.001
              SoilCrop STRUMSoil: LL=[0.2, 0.2, 0.2, 0.2, 0]; KL=[0.1, 0.1, 0.1, 0.1, 0.1]; XF=[1, 1, 1, 1, 0]
              SoilCrop SPRUMSoil: LL=[0.2, 0.2, 0.2, 0.2, 0]; KL=[0.1, 0.1, 0.1, 0.1, 0.1]; XF=[1, 1, 1, 1, 0]
            WaterBalance SoilWater: SummerDate=1-Nov; SummerU=9; SummerCona=4.4; WinterDate=1-Apr; WinterU=9; WinterCona=4.4; DiffusConst=88; DiffusSlope=35.4; Salb=0.3; CN2Bare=68; CNRed=20; CNCov=0.8; DischargeWidth=0; CatchmentArea=0; PSIDul=-100
              Thickness  SWCON  KLAT
              300        0.55   0
              300        0.55   0
              300        0.55   0
              300        0.55   0
              100        0.1    0
            Organic: FOMCNRatio=30; CarbonUnits=Total
              Thickness  Carbon  SoilCNRatio  FBiom  FInert  FOM
              100        1.82    11.5         0.025  0.3     1243.931
              200        1.47    11.5         0.025  0.4     833.832
              300        1.2     11.5         0.015  0.75    457.617
              300        1.03    11.5         0.01   0.9     251.145
              300        0.47    11.5         0.01   0.96    137.831
              100        0.47    11.5         0.01   0.96    75.644
            OutputLayers: Thickness=[200, 200, 200, 200, 200, 200, 200]
            Solute NO3: Thickness=[100, 200, 300, 300, 300]; InitialValues=[117, 15, 1.667, 1.667, 0]; InitialValuesUnits=ppm; WaterTableConcentration=0; D0=0; DepthConstant=0; MaxDepthSoluteAccessible=0; RunoffEffectivenessAtMovingSolute=0; MaxEffectiveRunoff=0
            Solute NH4: Thickness=[100, 200, 300, 300, 300]; InitialValues=[0, 0, 0, 0, 0]; InitialValuesUnits=ppm; WaterTableConcentration=0; D0=0; DepthConstant=0; MaxDepthSoluteAccessible=0; RunoffEffectivenessAtMovingSolute=0; MaxEffectiveRunoff=0
            Solute Urea: Thickness=[100, 200, 300, 300, 300]; InitialValues=[0, 0, 0, 0, 0]; InitialValuesUnits=kg/ha; WaterTableConcentration=0; D0=0; DepthConstant=0; MaxDepthSoluteAccessible=0; RunoffEffectivenessAtMovingSolute=0; MaxEffectiveRunoff=0
            Nutrient
            SoilTemperature Temperature
          SurfaceOrganicMatter: InitialResidueName=wheat_stubble; InitialResidueType=wheat; InitialResidueMass=500; InitialStandingFraction=0; InitialCPR=0; InitialCNR=100
          Plant STRUM
          Fertiliser
          Irrigation
          Operations IrrigationOperations: same as USA AppleExperiments.Prosser_Apple_Deep.Factors.Permutation.Irr.8
          Manager AgrgateZoneVariables
            script: same as in NZ AppleExperiments.Manawatu_1994.Manawatu_94.Row.AgrgateZoneVariables
          Operations NitrogenOperations
            1986-05-31  [Fertiliser].Apply(10, "UreaN", 10);
            1986-06-14  [Fertiliser].Apply(10, "UreaN", 10);
            1986-06-28  [Fertiliser].Apply(10, "UreaN", 10);
            1986-07-12  [Fertiliser].Apply(10, "UreaN", 10);
            1986-07-26  [Fertiliser].Apply(10, "UreaN", 10);
            1986-08-09  [Fertiliser].Apply(10, "UreaN", 10);
            1986-08-23  [Fertiliser].Apply(10, "UreaN", 10);
            1986-09-06  [Fertiliser].Apply(10, "UreaN", 10);
          StrumTreeInstance WashStateApple: GRINZ=false; Proot=0.1; MaxHeight=3500; WaterStress=false
            zero: RowSpacing, InterRowSpacing, AlleyZoneWidthFrac, AgeAtSimulationStart, YearsToMaxDimension, WoodDensity, BudBreakDAWS, StartFullCanopyDAWS, StartLeafFallDAWS, EndLeafFallDAWS, Pleaf, Ptrunk, MaxWidth, BaseCover, MaxCover, RUE, Number, PotentialFWPerFruit, FruitDensity, DAFStartLinearGrowth, DAFEndLinearGrowth, DAFMaxSize, TotalSolarRadiation
          BiomassRemovalEvents Pick: NameOfPlantToRemoveFrom=STRUM; RemovalType=0
            BiomassRemovalFractions:
              PlantName  OrganName  TypeString  LiveToRemove  DeadToRemove  LiveToResidue  DeadToResidue
              STRUM      Root       Cutting     0             0             0              0
              STRUM      Leaf       Cutting     0             0             0              0
              STRUM      Trunk      Cutting     0             0             0              0
              STRUM      Fruit      Cutting     0.8           0             0.1            0
          BiomassRemovalEvents Prune: NameOfPlantToRemoveFrom=STRUM; RemovalType=3
            BiomassRemovalFractions:
              PlantName  OrganName  TypeString  LiveToRemove  DeadToRemove  LiveToResidue  DeadToResidue
              STRUM      Root       Pruning     0             0             0              0
              STRUM      Leaf       Pruning     0             0             1              1
              STRUM      Trunk      Pruning     0             0             0.3            0.9
              STRUM      Fruit      Pruning     0             0             1              1
        RectangularZone Alley: Length=100; Width=3; Slope=0; AspectAngle=0; Altitude=50
          Report AlleyZoneReport: EventNames=[Clock].DoReport
          Report ReportBoth: EventNames=[Clock].DoReport
          Operations NitrogenOperations
            1993-09-15  [Fertiliser].Apply(25, "UreaN", 10);
            1993-11-15  [Fertiliser].Apply(25, "UreaN", 10);
            1994-02-15  [Fertiliser].Apply(50, "UreaN", 10);
          SurfaceOrganicMatter: InitialResidueName=wheat_stubble; InitialResidueType=wheat; InitialResidueMass=500; InitialStandingFraction=0; InitialCPR=0; InitialCNR=100
          Fertiliser
          Irrigation
          Manager AgrgateZoneVariables
            script: same as in NZ AppleExperiments.Manawatu_1994.Manawatu_94.Row.AgrgateZoneVariables
          Soil: Latitude=0; Longitude=0
            LayerStructure: Thickness=[200, 200, 200, 200, 200, 200, 100]
            Chemical: Thickness=[100, 200, 300, 300, 300]; PH=[6.6, 6.2, 5.7, 5.5, 5.5]; PHUnits=Water
            Water: Thickness=[300, 300, 300, 300, 100]; InitialValues=[0.497, 0.356, 0.145, 0.092, 0.092]; InitialPAWmm=98.1; RelativeTo=LL15; FilledFromTop=true
            Physical: same as USA AppleExperiments.Prosser_Apple_Deep.DeepSoil.Row.Soil.Physical
            WaterBalance SoilWater: same as USA AppleExperiments.Prosser_Apple_Deep.DeepSoil.Row.Soil.SoilWater
            Organic: same as USA AppleExperiments.Prosser_Apple_Deep.DeepSoil.Row.Soil.Organic
            OutputLayers: Thickness=[200, 200, 200, 200, 200, 200, 200]
            Solute NO3: Thickness=[1800]; InitialValues=[3]; InitialValuesUnits=ppm; WaterTableConcentration=0; D0=0; DepthConstant=0; MaxDepthSoluteAccessible=0; RunoffEffectivenessAtMovingSolute=0; MaxEffectiveRunoff=0
              Solute NO3: same as USA AppleExperiments.Prosser_Apple_Deep.DeepSoil.Row.Soil.NO3
            Solute NH4: Thickness=[1800]; InitialValues=[1]; InitialValuesUnits=ppm; WaterTableConcentration=0; D0=0; DepthConstant=0; MaxDepthSoluteAccessible=0; RunoffEffectivenessAtMovingSolute=0; MaxEffectiveRunoff=0
            Solute Urea: Thickness=[1800]; InitialValues=[0]; InitialValuesUnits=ppm; WaterTableConcentration=0; D0=0; DepthConstant=0; MaxDepthSoluteAccessible=0; RunoffEffectivenessAtMovingSolute=0; MaxEffectiveRunoff=0
            Nutrient
            SoilTemperature Temperature
          Operations IrrigationOperations: same as USA AppleExperiments.Prosser_Apple_Deep.Factors.Permutation.Irr.8
          Plant SPRUM
          BiomassRemovalEvents OnCut: same as PatternTest.Decidious.Alley.Mow
          SprumPastureInstance BasePasture: AgeAtSimulationStart=1; YearsToMaxDimension=1; RUE=1; Presidue=0; RsenRate=0; Proot=0.1; PSBaseT=5; PSLOptT=20; PSUOptT=25; PSMaxT=35; GRINZ=true; MaxRD=700; MaxHeight=300; MaxPrunedHeight=100; MaxCover=0.97; MinCover=0.5; ExtinctCoeff=0.5; RegrowthDuration=300; FullCanopyDuration=0; BaseT=3; OptT=25; MaxT=35; RootNConc=0.01; LeafNConc=0.05; ResidueNConc=0.01; LegumePropn=0; GSMax=0.004; R50=150; WaterStress=true
    Experiment Prosser_Apple_Shallow
      Memo ExperimentDescription: same as USA AppleExperiments.Prosser_Apple_Deep.ExperimentDescription
      Memo Apples in this region
        *	Apples grown in Washington, e.g. Red/Golden Delicious, Gala, and Granny Smith, are in season from August to early November.

        *	Apple trees in Washington should be sown in early spring.
      Factors
        Permutation
          Factor Soil
            CompositeFactor _: Specifications=[Soil]
              Soil: Latitude=0; Longitude=0
                LayerStructure: Thickness=[200, 200, 200, 200, 200, 200, 300, 300, 400, 800]
                Chemical: Thickness=[100, 200, 300, 300, 300, 300]; PH=[6.6, 6.2, 5.7, 5.5, 5.5, 5.5]; PHUnits=Water
                Water: Thickness=[300, 300, 200, 300, 300, 300, 1200]; InitialValues=[0.28, 0.28, 0.28, 0.015, 0.015, 0.015, 0.015]; InitialPAWmm=170.5; RelativeTo=LL15; FilledFromTop=false
                Physical
                  Thickness  BD  AirDry  LL15  DUL    SAT    KS
                  300        1   0.04    0.08  0.28   0.35   100
                  300        1   0.08    0.08  0.28   0.35   100
                  200        1   0.08    0.08  0.28   0.35   50
                  300        1   0.01    0.01  0.015  0.02   40
                  300        1   0.01    0.01  0.015  0.02   10
                  300        1   0.01    0.01  0.015  0.022  1
                  1200       1   0.01    0.01  0.015  0.02   0
                  SoilCrop STRUMSoil: LL=[0.04, 0.08, 0.08, 0.08, 0.01, 0.01, 0.01]; KL=[0.05, 0.05, 0.05, 0.05, 0.05, 0.05, 0.05]; XF=[1, 1, 1, 1, 1, 1, 1]
                  SoilCrop SPRUMSoil: LL=[0.04, 0.08, 0.08, 0.08, 0, 0, 0]; KL=[0.11, 0.11, 0.11, 0.11, 0.11, 0.11, 0.11]; XF=[1, 1, 1, 1, 1, 1, 1]
                WaterBalance SoilWater: same as PatternTest.Decidious.Row.Soil.SoilWater
                Organic: same as PatternTest.Decidious.Alley.Soil.Organic
                OutputLayers: Thickness=[200, 200, 200, 200]
                Solute NO3: same as USA AppleExperiments.Prosser_Apple_Deep.Factors.Permutation.Soil._.Soil.NO3
                Solute NH4: same as PatternTest.Decidious.Row.Soil.NH4
                Solute Urea: same as PatternTest.Decidious.Row.Soil.Urea
                Nutrient
                SoilTemperature Temperature
            Memo Notes: same as USA AppleExperiments.Prosser_Apple_Deep.Factors.Permutation.Soil.Notes
          Factor Irr: same as USA AppleExperiments.Prosser_Apple_Deep.Factors.Permutation.Irr
      Simulation ShallowSoil
        Clock: Start=1986-05-01; End=1986-11-28
        Summary SummaryFile
        Weather: FileName=WeatherFiles\Pendleton.met
        MicroClimate: a_interception=0; b_interception=1; c_interception=0; d_interception=0; SoilHeatFluxFraction=0.4; MinimumHeightDiffForNewLayer=0; NightInterceptionFraction=0.5; ReferenceHeight=2
        SoilArbitrator Soil Arbitrator
        RectangularZone Row: Length=100; Width=1.5; Slope=0; AspectAngle=0; Altitude=50
          Report RowZoneReport: EventNames=[Clock].DoReport
          Report ReportBoth: EventNames=[Clock].DoReport
          Report Drainage: EventNames=[Clock].DoReport
            VariableNames:
              [Clock].Today
              sum of [Soil].SoilWater.Flux[6] from 2008-10-01 to 2011-03-08 as drainage
              [Soil].Water.MM[9] + [Soil].Water.MM[10] as SW_belowRoots
          Soil: Latitude=0; Longitude=0
            LayerStructure: Thickness=[200, 200, 200, 200, 200, 200, 100]
            Chemical: Thickness=[100, 200, 300, 300, 300]; PH=[6.6, 6.2, 5.7, 5.5, 5.5]; PHUnits=Water
            Water: Thickness=[300, 300, 300, 300, 100]; InitialPAWmm=0; RelativeTo=LL15; FilledFromTop=false
            Physical: Thickness=[300, 300, 300, 300, 100]
              SoilCrop STRUMSoil
              SoilCrop SPRUMSoil
            WaterBalance SoilWater: same as USA AppleExperiments.Prosser_Apple_Deep.DeepSoil.Row.Soil.SoilWater
            Organic: same as USA AppleExperiments.Prosser_Apple_Deep.DeepSoil.Row.Soil.Organic
            OutputLayers: Thickness=[200, 200, 200, 200, 200, 200, 200]
            Solute NO3: Thickness=[100, 200, 300, 300, 300]; InitialValues=[217, 15, 1.667, 1.667, 0]; InitialValuesUnits=ppm; WaterTableConcentration=0; D0=0; DepthConstant=0; MaxDepthSoluteAccessible=0; RunoffEffectivenessAtMovingSolute=0; MaxEffectiveRunoff=0
            Solute NH4: same as USA AppleExperiments.Prosser_Apple_Deep.DeepSoil.Row.Soil.NH4
            Solute Urea: same as USA AppleExperiments.Prosser_Apple_Deep.DeepSoil.Row.Soil.Urea
            Nutrient
            SoilTemperature Temperature
          SurfaceOrganicMatter: InitialResidueName=wheat_stubble; InitialResidueType=wheat; InitialResidueMass=500; InitialStandingFraction=0; InitialCPR=0; InitialCNR=100
          Plant STRUM
          Fertiliser
          Irrigation
          Operations IrrigationOperations: same as USA AppleExperiments.Prosser_Apple_Deep.Factors.Permutation.Irr.8
          Manager AgrgateZoneVariables
            script: same as in NZ AppleExperiments.Manawatu_1994.Manawatu_94.Row.AgrgateZoneVariables
          StrumTreeInstance WashStateApple: same as USA AppleExperiments.Prosser_Apple_Deep.DeepSoil.Row.WashStateApple
          BiomassRemovalEvents Pick: NameOfPlantToRemoveFrom=STRUM; RemovalType=2
            BiomassRemovalFractions:
              PlantName  OrganName  TypeString  LiveToRemove  DeadToRemove  LiveToResidue  DeadToResidue
              STRUM      Root       Harvesting  0             0             0              0
              STRUM      Leaf       Harvesting  0             0             0              0
              STRUM      Trunk      Harvesting  0             0             0              0
              STRUM      Fruit      Harvesting  0.8           0             0.1            0.5
          BiomassRemovalEvents Prune: same as USA AppleExperiments.Prosser_Apple_Deep.DeepSoil.Row.Prune
        RectangularZone Alley: Length=100; Width=3; Slope=0; AspectAngle=0; Altitude=50
          Report AlleyZoneReport: EventNames=[Clock].DoReport
          Report ReportBoth: EventNames=[Clock].DoReport
          Report Drainage: EventNames=[Clock].DoReport
            VariableNames:
              [Clock].Today
              sum of [Soil].SoilWater.Flux[6] from 1986-06-01 to 1986-09-28 as drainage
              [Soil].Water.MM[9] + [Soil].Water.MM[10] as SW_belowRoots
          Manager AgrgateZoneVariables
            script: same as in NZ AppleExperiments.Manawatu_1994.Manawatu_94.Row.AgrgateZoneVariables
          Soil: Latitude=0; Longitude=0
            LayerStructure: Thickness=[200, 200, 200, 200, 200, 200, 300, 300, 400, 800]
            Chemical: Thickness=[100, 200, 300, 300, 300, 300]; PH=[6.6, 6.2, 5.7, 5.5, 5.5, 5.5]; PHUnits=Water
            Water: Thickness=[300, 300, 300, 300, 300, 300, 1200]; InitialPAWmm=0; RelativeTo=LL15; FilledFromTop=false
            Physical: Thickness=[300, 300, 300, 300, 300, 300, 1200]
              SoilCrop STRUMSoil
              SoilCrop SPRUMSoil
            WaterBalance SoilWater: same as PatternTest.Decidious.Row.Soil.SoilWater
            Organic: same as PatternTest.Decidious.Alley.Soil.Organic
            OutputLayers: Thickness=[300, 300, 300, 300, 300, 300]
            Solute NO3: same as PatternTest.Decidious.Row.Soil.NO3
            Solute NH4: same as PatternTest.Decidious.Row.Soil.NH4
            Solute Urea: same as PatternTest.Decidious.Row.Soil.Urea
            Nutrient
            SoilTemperature Temperature
          SurfaceOrganicMatter: InitialResidueName=wheat_stubble; InitialResidueType=wheat; InitialResidueMass=500; InitialStandingFraction=0; InitialCPR=0; InitialCNR=100
          Fertiliser
          Irrigation
          Operations IrrigationOperations: same as USA AppleExperiments.Prosser_Apple_Deep.Factors.Permutation.Irr.8
          Plant SPRUM
          BiomassRemovalEvents OnCut: same as PatternTest.Decidious.Alley.Mow
          SprumPastureInstance BasePasture: same as USA AppleExperiments.Prosser_Apple_Deep.DeepSoil.Alley.BasePasture
  Folder NZ_Sensitivity (disabled)
    Experiment Jervoistown2010Temperature
      Memo Description
        *	Testing for sensitivity
      Factors
        Factor Temperature
          CompositeFactor Minus2: Specifications=[ClimateControl].Script.TempFactor = -2
          CompositeFactor Minus1: Specifications=[ClimateControl].Script.TempFactor = -1
          CompositeFactor Zero: Specifications=[ClimateControl].Script.TempFactor = 0
          CompositeFactor Plus1: Specifications=[ClimateControl].Script.TempFactor = 1
          CompositeFactor Plus2: Specifications=[ClimateControl].Script.TempFactor = 2
      Simulation BlockJ
        Clock: Start=2010-06-24; End=2011-06-23
        Summary SummaryFile
        Weather: FileName=WeatherFiles\VCS_Jervoistown.met
        MicroClimate: a_interception=0; b_interception=1; c_interception=0; d_interception=0; SoilHeatFluxFraction=0.4; MinimumHeightDiffForNewLayer=0; NightInterceptionFraction=0.5; ReferenceHeight=2
        SoilArbitrator Soil Arbitrator
        Manager AutoIrrigationDeficitBased
          AllowIrrigation = True
          SeasonStart = 1-oct
          SeasonEnd = 1-apr
          depthPAWC = 1000
          triggerDeficit = 70
          irrigateAmount = 15
          returndays = 3
          IrrigateAlley = True
```csharp
using Newtonsoft.Json;
using APSIM.Shared.Utilities;
using System.Xml.Serialization;
using Models.Soils;
using Models.PMF;
using Models.Core;
using System;
using Models.Interfaces;

        
namespace Models
{
    [Serializable] 
    [System.Xml.Serialization.XmlInclude(typeof(Model))]
    public class Script : Model
    {
        [Link] private Clock Clock;
        [Link] private Zone patch;
        [Link] private ISummary summary;
        //[Link] private Irrigation Irrigation;
        [Link] private Soil Soil;
        [Link(IsOptional = true)] private IPlant existingCrop;
        [Link] private IPhysical soilPhysical;
        [Link] private ISoilWater waterBalance;
        [Link(Type = LinkType.Scoped, ByName = true)] private Zone Row;
        [Link(Type = LinkType.Scoped, ByName = true)] private Zone Alley;
       
        // Parameters from user interface
        [Separator("Manager for controlling automatic irrigation")]
        [Description(" Allow this manager to control irrigation?")]
        public bool AllowIrrigation { get; set; }
      
        [Separator(" Parameters for the irrigation system")]
        [Description(" Start of irrigation season (d-mmm)")]
        public string SeasonStart { get; set; }
        [Description(" End of irrigation season (d-mmm)")]
        public string SeasonEnd { get; set; }
        [Description(" Depth to calculate PAWC and deficit (mm)")]
        public double depthPAWC { get; set; }
        [Description(" Deficit to trigger irrigations (% PAWC)")]
        public double triggerDeficit { get; set; }
        [Description(" Irrigation amount to apply each event (mm)")]
        public double irrigateAmount { get; set; }
        [Description(" Minimum days for irrigation to return")]
        public double returndays { get; set; }
        
        [Description("Is the Alley zone irrigated?")]
        public bool IrrigateAlley {get; set;}

        //Class members
        [JsonIgnore] public double IrrigLayerSWDeficit { get; set; }
        [JsonIgnore] public double TopSWC { get; set; }
        [JsonIgnore] public double DaysSinceIrrigation { get; set; }
        [JsonIgnore] public double AmountToApply { get; set; }
        [JsonIgnore] public double SeasonAppliedAmount { get; set; }
        
        private bool IrrigationIsAllowed { get; set; }
        private bool SeasonIsOpen { get; set; }
        private bool CropIsActive { get; set; }
        private bool IrrigatorIsAvailable { get; set; }
        private bool SoilIsDry { get; set; }
        private double TopDUL;
        private double TopLL;
        private int nLayers;

    
        //Calculate static soil variables
        [EventSubscribe("StartOfSimulation")]
        private void OnStartOfSimulation(object sender, EventArgs e)
        {
            
            //Can we irrigate at all?
            IrrigationIsAllowed = false; 
            if (AllowIrrigation)
                IrrigationIsAllowed = true; 

            //Calculate soil water variables
            double depthFromSurface = 0.0;
            double fracLayer = 0.0;
            nLayers = soilPhysical.Thickness.Length;
            for (int layer = 0; layer < nLayers; layer++)
            {
                fracLayer = Math.Min(1.0, (depthPAWC - depthFromSurface) / soilPhysical.Thickness[layer]);
                TopLL += soilPhysical.LL15mm[layer] * fracLayer;
                TopDUL += soilPhysical.DULmm[layer] * fracLayer;
                depthFromSurface += soilPhysical.Thickness[layer];
                if (depthFromSurface >= depthPAWC)
                    layer = nLayers;
            }
        }
             
        //Determine daily requirement for irrigation
        [EventSubscribe("StartOfDay")]
        private void OnStartOfDay(object sender, EventArgs e)
        {
            AmountToApply = 0.0;
            DaysSinceIrrigation += 1;

            //Can we irrigate today?          
            SeasonIsOpen = DateUtilities.WithinDates(SeasonStart, Clock.Today, SeasonEnd);
            if (!SeasonIsOpen)
                SeasonAppliedAmount = 0;

            //Is there a crop in the ground that needs irrigation?
            CropIsActive = false;
            if (existingCrop != null)
            {
                string currentCrop = (string)patch.Get("[CropManagement].Script.CurrentCrop");
                if ( existingCrop.IsAlive)
                {
                    CropIsActive = true;
                }
            }
          
            //Is the irrigator available?
            IrrigatorIsAvailable = false;
            if (DaysSinceIrrigation >= returndays)
                IrrigatorIsAvailable = true;
          
            //Is the soil dry enough to require irrigation?
            SoilIsDry = false;
            double depthFromSurface = 0.0;
            double fracLayer = 0.0;
            TopSWC = 0.0;
            for (int layer = 0; layer < nLayers; layer++)
            //for (int layer = 0; depthFromSurface < depthPAWC + soilPhysical.Thickness[layer]; layer++)
            {
                fracLayer = Math.Min(1.0, (depthPAWC - depthFromSurface) / soilPhysical.Thickness[layer]);
                TopSWC += waterBalance.SWmm[layer] * fracLayer;
                depthFromSurface += soilPhysical.Thickness[layer];
                if (depthFromSurface >= depthPAWC)
                    layer = nLayers;
            }
            
            IrrigLayerSWDeficit = TopSWC - TopDUL;
            if (Math.Max(0.0, -IrrigLayerSWDeficit) >= (TopDUL - TopLL) * (100 - triggerDeficit) / 100)
                SoilIsDry = true;

            //Are all the conditions ratifying irrigation
            if (IrrigationIsAllowed && SeasonIsOpen && CropIsActive && IrrigatorIsAvailable && SoilIsDry)
            {
                //Lets irrigate well !!!!
                Irrigation irrigRow = (Irrigation)Row.Get("Irrigation");
                irrigRow.Apply(irrigateAmount, depth: 0);
                DaysSinceIrrigation = 0;
                if (IrrigateAlley)
                {
                   Irrigation irrigAlley = (Irrigation)Alley.Get("Irrigation");
                   irrigAlley.Apply(irrigateAmount , depth: 0);
                   DaysSinceIrrigation = 0;
            
                }
            }
        }
    }
}
```
        Manager AutomaticFertiliser
          AllowFertiliser = yes
          Depth2SoilN = 500
          CriticalSoilN = 30
          FertNAmount = 50
          FertType = UreaN
          FertApplicationDepth = 10
          FertMinimumDays = 15
```csharp
using Newtonsoft.Json;
using Models.Soils.Nutrients;
using Models.Interfaces;
using System.Xml.Serialization;
using APSIM.Shared.Utilities;
using Models.Soils;
using Models.PMF;
using Models.Core;
using System;

namespace Models
{
    [Serializable]
    public class Script : Model
    {
        [Link] private Clock Clock;
        [Link] private Fertiliser fertiliser;
        [Link] private ISummary summary;
        [Link] private Soil Soil;
        private DateTime lastApplicationDate;
        private bool fertiliserIsAllowed;
        private int nLayers;
        [Link(ByName = true)]
        private ISolute NO3;
        [Link(ByName = true)]
        private ISolute NH4;
        [Link(ByName = true)]
        private ISolute Urea;
        [Link]
        private IPhysical soilPhysical;

        //User inputs from properties tab
        [Description("Turn fertiliser applications on? ")]
        public yesnoType AllowFertiliser { get; set; }
        
        [Description("Depth to calculate available soil N (mm): ")]
        public double Depth2SoilN { get; set; }

        [Description("Minimum available N, triggers an application (kgN/ha): ")]
        public double CriticalSoilN { get; set; }

        [Description("Amount of N fertiliser for each application (kgN/ha): ")]
        public double FertNAmount { get; set; }

        [Description("Type of N fertiliser to apply: ")]
        [Display(Type = DisplayType.FertiliserType)]public string FertType { get; set; }

        [Description("Depth at which to apply the fertiliser (mm): ")]
        public double FertApplicationDepth { get; set; }
       
        [Description("Minimum period between applications (days): ")]
        public double FertMinimumDays { get; set; }
       
        public enum yesnoType
        {
            /// <summary>a positive answer</summary>
            yes,
            /// <summary>a negative answer</summary>
            no
        }

        [JsonIgnore] public double TopMineralN { get; set; }
        

        [EventSubscribe("StartOfSimulation")]
        private void OnStartOfSimulation(object sender, EventArgs e)
        {
            fertiliserIsAllowed = (AllowFertiliser == yesnoType.yes);
            nLayers = soilPhysical.Thickness.Length;
        }

        [EventSubscribe("DoManagement")]
        private void OnDoManagement(object sender, EventArgs e)
        {
            double daysSinceLastApplication = (Clock.Today - lastApplicationDate).TotalDays;
            
            // get the N stored in the soil
            double depthFromSurface = 0.0;
            double fracLayer = 0.0;
            TopMineralN = 0.0;
            for (int layer = 0; layer < nLayers; layer++)
            {
                fracLayer = Math.Min(1.0, (Depth2SoilN - depthFromSurface) / soilPhysical.Thickness[layer]);
                TopMineralN += (NO3.kgha[layer]
                + NH4.kgha[layer]
                + Urea.kgha[layer])
                * fracLayer;
                depthFromSurface += soilPhysical.Thickness[layer];
                if (depthFromSurface >= Depth2SoilN)
                    layer = nLayers;
            }

            if (fertiliserIsAllowed && (daysSinceLastApplication >= FertMinimumDays) && (TopMineralN <= CriticalSoilN))
            {
                fertiliser.Apply(FertNAmount, FertType, FertApplicationDepth);
                lastApplicationDate = Clock.Today;
            }
        }
    }
}
```
        Manager ResetDate
          ResetDate = 1-Jun
```csharp
using Newtonsoft.Json;
using Models.PMF.Organs;
using Models.Soils.Nutrients;
using Models.Interfaces;
using System;
using Models.Core;
using System.Collections.Generic;
using System.Text;
using Models.Soils;
using Models.PMF;
using Models;
using System.Xml.Serialization;
using APSIM.Shared.Utilities;
using Models.Climate;



namespace Models
{
    [Serializable] 
    //[System.Xml.Serialization.XmlInclude(typeof(Model))]
    public class Script : Model
    {
    
     [Link] private Clock Clock;
        
    [Separator("Manager to summarise variables")]
        [Description(" Date to end the simulation year and reset: ")]
        public string ResetDate { get; set; }
                  
        [JsonIgnore] public double SimulationYear { get; set; }
        [JsonIgnore] public double DAS { get; set; }
        
         [EventSubscribe("StartOfSimulation")]
        private void DoStartOfSimulation(object sender, EventArgs e)
        {
                DAS = 0;
                SimulationYear = 1971;
        }
        
        [EventSubscribe("StartOfDay")]
        private void OnStartOfDay(object sender, EventArgs e)
        {
            DAS += 1;
            if (DateUtilities.DatesAreEqual(ResetDate, Clock.Today.Date))
            {
                SimulationYear += 1;
                
            }
        }
    
    }
}
```
        Manager ClimateControl
          StartDate = 06/01/2010 00:00:00
          EndDate = 10/30/2010 00:00:00
          TempFactor = 0
```csharp
using Models.Soils;
using System.Xml.Serialization;
using Models;
using Models.PMF;
using System.Text;
using System.Collections.Generic;
using APSIM.Shared.Utilities;
using Models.Core;
using System;
using Models.Climate;

namespace Models
{
    [Serializable] 
    [System.Xml.Serialization.XmlInclude(typeof(Model))]
    public class Script : Model
    {
        [Link] Weather Met;
        [Link] Clock Clock;
    
        [Description("Start Date")]
        public DateTime StartDate { get; set; }
        
        [Description("End Date")]
        public DateTime EndDate { get; set; }

       [Description("Change in temperature")]
        public float TempFactor { get; set; }

 
    
        [EventSubscribe("PreparingNewWeatherData")]
        private void OnPreparingNewWeatherData(object sender, EventArgs e)
        {
         Met.MinT +=  TempFactor;   Met.MaxT +=  TempFactor;    
        
        }
    }
}
```
        RectangularZone Row: Length=100; Width=1.3; Slope=0; AspectAngle=0; Altitude=50
          Report RowZoneReport: EventNames=[Clock].DoReport
          Report ReportBoth: EventNames=[Clock].DoReport
          Soil: Latitude=0; Longitude=0
            LayerStructure: Thickness=[200, 200, 200, 200, 200, 200, 300, 300, 400, 800]
            Chemical: Thickness=[100, 200, 300, 300, 300, 300]; PH=[6.6, 6.2, 5.7, 5.5, 5.5, 5.5]; PHUnits=Water
            Water: Thickness=[300, 300, 300, 300, 300, 300, 1200]; InitialValues=[0.42, 0.41, 0.5, 0.46, 0.45, 0.43, 0.43]; InitialPAWmm=702; RelativeTo=LL15; FilledFromTop=false
            WaterBalance SoilWater: same as NZ AppleExperiments.Apple_Dwarf.Row.Soil.SoilWater
            Organic: same as NZ AppleExperiments.Apple_Dwarf.Row.Soil.Organic
            OutputLayers: Thickness=[300, 300, 300, 300, 300, 300]
            Solute NO3: same as NZ AppleExperiments.Apple_Dwarf.Row.Soil.NO3
            Solute NH4: same as NZ AppleExperiments.Apple_Dwarf.Row.Soil.NH4
            Solute Urea: same as NZ AppleExperiments.Apple_Dwarf.Row.Soil.Urea
            Physical: same as NZ AppleExperiments.Apple_Dwarf.Alley.Soil.Physical
            Nutrient
            SoilTemperature Temperature
          SurfaceOrganicMatter: InitialResidueName=wheat_stubble; InitialResidueType=wheat; InitialResidueMass=500; InitialStandingFraction=0; InitialCPR=0; InitialCNR=100
          Plant STRUM
          StrumTreeInstance Apple: AgeAtSimulationStart=6; YearsToMaxDimension=6; TrunkMassAtMaxDimension=12; BudBreakDAWS=100; StartFullCanopyDAWS=150; StartLeafFallDAWS=305; EndLeafFallDAWS=330; GRINZ=true; MaxRD=1500; Proot=0.1; CanopyBaseHeight=1000; MaxPrunedHeight=2800; MaxHeight=3500; MaxPrunedWidth=700; MaxWidth=1000; RootNConc=0.01; LeafNConc=0.02; TrunkNConc=0.01; FruitNConc=0.02; ExtinctCoeff=0.8; MaxCover=0.98; GSMax=0.006; R50=100; WaterStress=true; Number=50; DMC=0.16
            zero: RowSpacing, InterRowSpacing, AlleyZoneWidthFrac, WoodDensity, Pleaf, Ptrunk, BaseCover, RUE, PotentialFWPerFruit, FruitDensity, DAFStartLinearGrowth, DAFEndLinearGrowth, DAFMaxSize, TotalSolarRadiation
          Fertiliser
          Irrigation
          Manager AgrgateZoneVariables: same as NZ AppleExperiments.Apple_Tall.Row.AgrgateZoneVariables
          BiomassRemovalEvents Pick: same as NZ AppleExperiments.Manawatu_1994.Manawatu_94.Row.Pick
          BiomassRemovalEvents Prune: same as NZ AppleExperiments.Manawatu_1994.Manawatu_94.Row.Prune
        RectangularZone Alley: Length=100; Width=2.2; Slope=0; AspectAngle=0; Altitude=50
          Report AlleyZoneReport: EventNames=[Clock].DoReport
          Report ReportBoth: EventNames=[Clock].DoReport
          Soil: same as NZ AppleExperiments.Apple_Dwarf.Alley.Soil
          SurfaceOrganicMatter: InitialResidueName=wheat_stubble; InitialResidueType=wheat; InitialResidueMass=500; InitialStandingFraction=0; InitialCPR=0; InitialCNR=100
          Fertiliser
          Irrigation
          Manager AgrgateZoneVariables: same as NZ AppleExperiments.Apple_Tall.Row.AgrgateZoneVariables
          Plant SPRUM
          BiomassRemovalEvents OnCut: same as NZ AppleExperiments.Apple_Dwarf.Alley.Mow
          SprumPastureInstance BasePasture: same as NZ AppleExperiments.Apple_Tall.Alley.BasePasture
  Folder NZ Avocado
    Simulation FarNorthIrrAvocado
      Clock: Start=2016-10-20; End=2019-10-30
      Summary SummaryFile
      Weather: FileName=Kaitaia.met
      MicroClimate: a_interception=0; b_interception=1; c_interception=0; d_interception=0; SoilHeatFluxFraction=0.4; MinimumHeightDiffForNewLayer=0; NightInterceptionFraction=0.5; ReferenceHeight=2
      SoilArbitrator Soil Arbitrator
      Manager AutoIrrigationDeficitBased
        AllowIrrigation = True
        SeasonStart = 1-oct
        SeasonEnd = 1-jun
        depthPAWC = 3000
        triggerDeficit = 90
        irrigateAmount = 15
        returndays = 1
        IrrigateAlley = False
```csharp
using Newtonsoft.Json;
using APSIM.Shared.Utilities;
using System.Xml.Serialization;
using Models.Soils;
using Models.PMF;
using Models.Core;
using System;
using Models.Interfaces;

        
namespace Models
{
    [Serializable] 
    [System.Xml.Serialization.XmlInclude(typeof(Model))]
    public class Script : Model
    {
        [Link] private Clock Clock;
        [Link] private Zone patch;
        [Link] private ISummary summary;
        //[Link] private Irrigation Irrigation;
        [Link] private Soil Soil;
        [Link(IsOptional = true)] private IPlant existingCrop;
        [Link] private IPhysical soilPhysical;
        [Link] private ISoilWater waterBalance;
        [Link(Type = LinkType.Scoped, ByName = true)] private Zone Row;
        [Link(Type = LinkType.Scoped, ByName = true, IsOptional=true)] private Zone Alley;
       
        // Parameters from user interface
        [Separator("Manager for controlling automatic irrigation")]
        [Description(" Allow this manager to control irrigation?")]
        public bool AllowIrrigation { get; set; }
      
        [Separator(" Parameters for the irrigation system")]
        [Description(" Start of irrigation season (d-mmm)")]
        public string SeasonStart { get; set; }
        [Description(" End of irrigation season (d-mmm)")]
        public string SeasonEnd { get; set; }
        [Description(" Depth to calculate PAWC and deficit (mm)")]
        public double depthPAWC { get; set; }
        [Description(" Deficit to trigger irrigations (% PAWC)")]
        public double triggerDeficit { get; set; }
        [Description(" Irrigation amount to apply each event (mm)")]
        public double irrigateAmount { get; set; }
        [Description(" Minimum days for irrigation to return")]
        public double returndays { get; set; }
        
        [Description("Is the Alley zone irrigated?")]
        public bool IrrigateAlley {get; set;}

        //Class members
        [JsonIgnore] public double IrrigLayerSWDeficit { get; set; }
        [JsonIgnore] public double TopSWC { get; set; }
        [JsonIgnore] public double DaysSinceIrrigation { get; set; }
        [JsonIgnore] public double AmountToApply { get; set; }
        [JsonIgnore] public double SeasonAppliedAmount { get; set; }
        
        private bool IrrigationIsAllowed { get; set; }
        private bool SeasonIsOpen { get; set; }
        private bool CropIsActive { get; set; }
        private bool IrrigatorIsAvailable { get; set; }
        private bool SoilIsDry { get; set; }
        private double TopDUL;
        private double TopLL;
        private int nLayers;

    
        //Calculate static soil variables
        [EventSubscribe("StartOfSimulation")]
        private void OnStartOfSimulation(object sender, EventArgs e)
        {
            
            //Can we irrigate at all?
            IrrigationIsAllowed = false; 
            if (AllowIrrigation)
                IrrigationIsAllowed = true; 

            //Calculate soil water variables
            double depthFromSurface = 0.0;
            double fracLayer = 0.0;
            nLayers = soilPhysical.Thickness.Length;
            for (int layer = 0; layer < nLayers; layer++)
            {
                fracLayer = Math.Min(1.0, (depthPAWC - depthFromSurface) / soilPhysical.Thickness[layer]);
                TopLL += soilPhysical.LL15mm[layer] * fracLayer;
                TopDUL += soilPhysical.DULmm[layer] * fracLayer;
                depthFromSurface += soilPhysical.Thickness[layer];
                if (depthFromSurface >= depthPAWC)
                    layer = nLayers;
            }
        }
             
        //Determine daily requirement for irrigation
        [EventSubscribe("StartOfDay")]
        private void OnStartOfDay(object sender, EventArgs e)
        {
            AmountToApply = 0.0;
            DaysSinceIrrigation += 1;

            //Can we irrigate today?          
            SeasonIsOpen = DateUtilities.WithinDates(SeasonStart, Clock.Today, SeasonEnd);
            if (!SeasonIsOpen)
                SeasonAppliedAmount = 0;

            //Is there a crop in the ground that needs irrigation?
            CropIsActive = false;
            if (existingCrop != null)
            {
                string currentCrop = (string)patch.Get("[CropManagement].Script.CurrentCrop");
                if ( existingCrop.IsAlive)
                {
                    CropIsActive = true;
                }
            }
          
            //Is the irrigator available?
            IrrigatorIsAvailable = false;
            if (DaysSinceIrrigation >= returndays)
                IrrigatorIsAvailable = true;
          
            //Is the soil dry enough to require irrigation?
            SoilIsDry = false;
            double depthFromSurface = 0.0;
            double fracLayer = 0.0;
            TopSWC = 0.0;
            for (int layer = 0; layer < nLayers; layer++)
            //for (int layer = 0; depthFromSurface < depthPAWC + soilPhysical.Thickness[layer]; layer++)
            {
                fracLayer = Math.Min(1.0, (depthPAWC - depthFromSurface) / soilPhysical.Thickness[layer]);
                TopSWC += waterBalance.SWmm[layer] * fracLayer;
                depthFromSurface += soilPhysical.Thickness[layer];
                if (depthFromSurface >= depthPAWC)
                    layer = nLayers;
            }
            
            IrrigLayerSWDeficit = TopSWC - TopDUL;
            if (Math.Max(0.0, -IrrigLayerSWDeficit) >= (TopDUL - TopLL) * (100 - triggerDeficit) / 100)
                SoilIsDry = true;

            //Are all the conditions ratifying irrigation
            if (IrrigationIsAllowed && SeasonIsOpen && CropIsActive && IrrigatorIsAvailable && SoilIsDry)
            {
                //Lets irrigate well !!!!
                Irrigation irrigRow = (Irrigation)Row.Get("Irrigation");
                irrigRow.Apply(irrigateAmount, depth: 0);
                DaysSinceIrrigation = 0;
                if ((IrrigateAlley)&& (Alley != null))
                {
                   Irrigation irrigAlley = (Irrigation)Alley.Get("Irrigation");
                   irrigAlley.Apply(irrigateAmount , depth: 0);
                   DaysSinceIrrigation = 0;
            
                }
            }
        }
    }
}
```
      Manager ResetDate
```csharp
using Newtonsoft.Json;
using Models.PMF.Organs;
using Models.Soils.Nutrients;
using Models.Interfaces;
using System;
using Models.Core;
using System.Collections.Generic;
using System.Text;
using Models.Soils;
using Models.PMF;
using Models;
using System.Xml.Serialization;
using APSIM.Shared.Utilities;
using Models.Climate;



namespace Models
{
    [Serializable] 
    //[System.Xml.Serialization.XmlInclude(typeof(Model))]
    public class Script : Model
    {
    
     [Link] private Clock Clock;
        
    //[Separator("Manager to summarise variables")]
        //[Description(" Date to end the simulation year and reset: ")]
        //public string ResetDate { get; set; }
                  
        [JsonIgnore] public double SimulationYear { get; set; }
        [JsonIgnore] public double DAS { get; set; }
        
         [EventSubscribe("StartOfSimulation")]
        private void DoStartOfSimulation(object sender, EventArgs e)
        {
                DAS = 0;
                SimulationYear = 2015;
        }
        
        [EventSubscribe("StartOfDay")]
        private void OnStartOfDay(object sender, EventArgs e)
        {
            DAS += 1;
            //if (DateUtilities.DatesAreEqual(ResetDate, Clock.Today.Date))
            if (DateUtilities.DatesAreEqual("20-Oct", Clock.Today.Date))
            {
                SimulationYear += 1;
                DAS = 1;
                
            }
        }
    
    }
}
```
      RectangularZone Row: Length=100; Width=2; Slope=0; AspectAngle=0; Altitude=50
        Report RowZoneReport: EventNames=[Clock].DoReport
        Report ZoneAgregateReport: EventNames=[Clock].DoReport
        Report Drainage: EventNames=[Clock].DoReport
          VariableNames:
            [Clock].Today
            sum of [Soil].SoilWater.Flux[6] from 2017-04-01 to 2019-04-30 as drainage
            //[Soil].Water.MM[9] + [Soil].Water.MM[10] as SW_belowRoots
        SurfaceOrganicMatter: InitialResidueName=wheat_stubble; InitialResidueType=wheat; InitialResidueMass=500; InitialStandingFraction=0; InitialCPR=0; InitialCNR=100
        StrumTreeInstance Avocado: same as PatternTest.EverGreen.Row.Avocado
        Plant STRUM
        Fertiliser
        Irrigation
        Manager AgrgateZoneVariables
          script: same as in NZ AppleExperiments.Manawatu_1994.Manawatu_94.Row.AgrgateZoneVariables
        Manager WaterTable
          StartDate = 1-dec
          EndDate = 1-mar
```csharp
using Models.Zones;
using APSIM.Shared.Utilities;
using Models.Soils;
using System.Collections.Generic;
using Models.PMF;
using Models.Core;
using System;

namespace Models
{
    [Serializable]
    public class Script : Model
    {
        [Link] Clock Clock;
        [Link] Soil soil;
        [Link] Irrigation irrigation;
        [Description("Start of sowing window (d-mmm)")]
        public string StartDate { get; set; }
        [Description("End of sowing window (d-mmm)")]
        public string EndDate { get; set; }

        [EventSubscribe("StartOfDay")]
        private void OnStartOfDay(object sender, EventArgs e)
        {
        if (DateUtilities.WithinDates(StartDate, Clock.Today, EndDate))
            irrigation.Apply(2, 2000);
        }
    }
}
```
        Manager DAS
          DAS = 0
          script: same as in NZ AppleExperiments.Manawatu_1994.Manawatu_94.Row.DAS
        Soil: SoilType=Weathered-argillic Perch-gley Pallic Soils; Latitude=-41; Longitude=174; DataSource=Based on profile descriptions provided by Smap (Nalder_1a1)
          Chemical: PHUnits=Water
            Thickness  PH  CEC
            196        7   21.905
            150        7   16.605
            75         7   12.5
            1579       7   7.307
          Water: Thickness=[196, 150, 75, 315, 315, 315, 315, 319]; InitialValues=[0.3, 0.295, 0.268, 0.273, 0.275, 0.25, 0.25, 0.25]; InitialPAWmm=344.738; RelativeTo=LL15; FilledFromTop=false
          Physical
            Thickness  ParticleSizeSand  ParticleSizeSilt  ParticleSizeClay  Rocks  BD     AirDry  LL15   DUL    SAT    KS
            196        10                63.499            26.501            0      1.346  0.093   0.185  0.3    0.345  959.927
            150        10.001            58.501            31.498            0.109  1.412  0.141   0.187  0.295  0.338  480
            75         15.008            60.997            23.995            0.411  1.193  0.146   0.146  0.268  0.326  479.808
            315        35                52.5              12.5              0.72   0.902  0.093   0.093  0.273  0.322  1.2
            315        35                52.5              12.5              0.72   0.902  0.076   0.076  0.275  0.314  1.2
            315        35                52.5              12.5              0.72   0.902  0.063   0.063  0.25   0.3    1.2
            315        35                52.5              12.5              0.72   0.902  0.063   0.063  0.25   0.3    1.2
            319        35                52.5              12.5              0.72   0.902  0.063   0.063  0.25   0.3    1.2
            Rocks source: Calculated
            SoilCrop STRUMSoil: LL=[0.185, 0.187, 0.146, 0.093, 0.076, 0.063, 0.063, 0.063]; KL=[0.077, 0.077, 0.077, 0, 0, 0, 0, 0]; XF=[1, 1, 1, 0, 0, 0, 0, 0]
            SoilCrop SPRUMSoil: same as NZ Avocado.FarNorthIrrAvocado.Row.Soil.Physical.STRUMSoil
          WaterBalance SoilWater: SummerDate=1-oct; SummerU=9; SummerCona=4.4; WinterDate=1-apr; WinterU=4; WinterCona=2; DiffusConst=88; DiffusSlope=35; Salb=0.13; CN2Bare=96; CNRed=13; CNCov=0.8; DischargeWidth=0; CatchmentArea=0; PSIDul=-100
            Thickness  SWCON  KLAT
            196        0.35   0
            150        0.3    0
            75         0.3    0
            1579       0.2    0
          Organic: FOMCNRatio=40; CarbonUnits=Total
            Thickness  Carbon  SoilCNRatio  FBiom  FInert  FOM
            50         4       11           0.079  0.343   124.07
            50         4       11           0.061  0.403   115.105
            50         4       11           0.048  0.454   106.788
            50         3.311   11           0.038  0.513   99.072
            50         2.285   11           0.031  0.58    91.913
            50         1.598   11           0.025  0.639   85.272
            50         1.137   11           0.021  0.693   79.111
            50         0.828   11           0.018  0.743   73.394
            50         0.621   11           0.016  0.787   68.091
            50         0.482   11           0.015  0.826   63.171
            250        0.285   11           0.012  0.913   43.417
            250        0.211   11           0.01   0.976   29.84
            500        0.201   11           0.01   0.991   14.095
            500        0.2     11           0.01   0.996   6.658
          LayerStructure: Thickness=[196, 150, 75, 315, 315, 315, 315, 319]
          Solute NO3: Thickness=[196, 150, 75, 1579]; InitialValues=[4.705, 3.102, 0.051, 0.065]; InitialValuesUnits=ppm; WaterTableConcentration=0; D0=0; DepthConstant=0; MaxDepthSoluteAccessible=0; RunoffEffectivenessAtMovingSolute=0; MaxEffectiveRunoff=0
          Solute NH4: Thickness=[196, 150, 75, 1579]; InitialValues=[0.706, 0.465, 0.008, 0.01]; InitialValuesUnits=ppm; WaterTableConcentration=0; D0=0; DepthConstant=0; MaxDepthSoluteAccessible=0; RunoffEffectivenessAtMovingSolute=0; MaxEffectiveRunoff=0
          Solute Urea: Thickness=[196, 150, 75, 1579]; InitialValues=[0, 0, 0, 0]; InitialValuesUnits=kg/ha; WaterTableConcentration=0; D0=0; DepthConstant=0; MaxDepthSoluteAccessible=0; RunoffEffectivenessAtMovingSolute=0; MaxEffectiveRunoff=0
          Nutrient
          OutputLayers: Thickness=[300, 300, 300, 400, 200]
          SoilTemperature Temperature
        Manager AutomaticFertiliser
          Fertilise = True
          Season_Start = 1-Aug
          Season_End = 30-Apr
          Season_Allocation = 100000
          TriggerN = 50
          NApplicationAmount = 25
          Return_days = 3
          Top_Depth = 600
          script: same as in NZ AppleExperiments.Manawatu_1994.Manawatu_94.Row.AutomaticFertiliser
        BiomassRemovalEvents Pick: NameOfPlantToRemoveFrom=STRUM; RemovalType=2
          BiomassRemovalFractions:
            PlantName  OrganName  TypeString  LiveToRemove  DeadToRemove  LiveToResidue  DeadToResidue
            STRUM      Root       Harvesting  0             0             0              0
            STRUM      Leaf       Harvesting  0             0             0              0
            STRUM      Trunk      Harvesting  0             0             0              0
            STRUM      Fruit      Harvesting  0.8           0             0.2            1
        BiomassRemovalEvents Prune: NameOfPlantToRemoveFrom=STRUM; RemovalType=3
          BiomassRemovalFractions:
            PlantName  OrganName  TypeString  LiveToRemove  DeadToRemove  LiveToResidue  DeadToResidue
            STRUM      Root       Pruning     0             0             0              0
            STRUM      Leaf       Pruning     0             0             0.2            0.2
            STRUM      Trunk      Pruning     0             0             0.3            0.3
            STRUM      Fruit      Pruning     0             0             0              0
      RectangularZone Alley: Length=100; Width=6; Slope=0; AspectAngle=0; Altitude=50
        Report ZoneAgregateReport: EventNames=[Clock].DoReport
        Report AlleyZoneReport: EventNames=[Clock].DoReport
        Report Drainage: EventNames=[Clock].DoReport
          VariableNames:
            [Clock].Today
            sum of [Soil].SoilWater.Flux[6] from 2017-04-01 to 2019-04-30 as drainage
            //[Soil].Water.MM[9] + [Soil].Water.MM[10] as SW_belowRoots
        SurfaceOrganicMatter: InitialResidueName=wheat_stubble; InitialResidueType=wheat; InitialResidueMass=500; InitialStandingFraction=0; InitialCPR=0; InitialCNR=100
        Fertiliser
        Irrigation
        Manager AgrgateZoneVariables
          script: same as in NZ AppleExperiments.Manawatu_1994.Manawatu_94.Row.AgrgateZoneVariables
        Manager WaterTable: same as NZ Avocado.FarNorthIrrAvocado.Row.WaterTable
        Manager DAS: same as NZ Avocado.FarNorthIrrAvocado.Row.DAS
        Plant SPRUM
        SprumPastureInstance BasePasture: AgeAtSimulationStart=1; YearsToMaxDimension=1; RUE=0.8; Presidue=0; RsenRate=0; Proot=0.1; PSBaseT=5; PSLOptT=20; PSUOptT=25; PSMaxT=35; GRINZ=true; MaxRD=700; MaxHeight=300; MaxPrunedHeight=100; MaxCover=0.98; MinCover=0.5; ExtinctCoeff=0.5; RegrowthDuration=400; FullCanopyDuration=0; BaseT=3; OptT=25; MaxT=35; RootNConc=0.01; LeafNConc=0.05; ResidueNConc=0.01; LegumePropn=0; GSMax=0.004; R50=150; WaterStress=true
        BiomassRemovalEvents Mow: same as PatternTest.Decidious.Alley.Mow
        Soil: SoilType=Weathered-argillic Perch-gley Pallic Soils; LocalName=Nalder_1a1; Latitude=-41; Longitude=174
          DataSource=Profile descriptions provided by Smap based on the work done by Trevor Webb.
          Chemical: PHUnits=Water
            Thickness  PH  CEC
            196        7   21.905
            150        7   16.605
            75         7   12.5
            1579       7   7.307
          Water: Thickness=[196, 150, 75, 315, 315, 315, 315, 319]; InitialValues=[0.337, 0.312, 0.235, 0.128, 0.128, 0.128, 0.128, 0.128]; InitialPAWmm=153.652; RelativeTo=LL15; FilledFromTop=false
          Physical
            Thickness  ParticleSizeSand  ParticleSizeSilt  ParticleSizeClay  Rocks  BD     AirDry  LL15   DUL    SAT    KS
            196        10                63.499            26.501            0      1.346  0.093   0.185  0.3    0.434  959.927
            150        10.001            58.501            31.498            0.109  1.412  0.141   0.215  0.353  0.387  480
            75         15.008            60.997            23.995            0.411  1.193  0.146   0.146  0.295  0.301  479.808
            315        35                52.5              12.5              0.72   0.902  0.063   0.063  0.29   0.301  1.2
            315        35                52.5              12.5              0.72   0.902  0.063   0.063  0.28   0.301  1.2
            315        35                52.5              12.5              0.72   0.902  0.063   0.063  0.25   0.3    1.2
            315        35                52.5              12.5              0.72   0.902  0.063   0.063  0.25   0.3    1.2
            319        35                52.5              12.5              0.72   0.902  0.063   0.063  0.25   0.3    1.2
            Rocks source: Calculated
            SoilCrop STRUMSoil: LL=[0.185, 0.215, 0.146, 0.063, 0.063, 0.063, 0.063, 0.063]; KL=[0.077, 0.077, 0.077, 0, 0, 0, 0, 0]; XF=[1, 1, 1, 0, 0, 0, 0, 0]
            SoilCrop SPRUMSoil: same as NZ Avocado.FarNorthIrrAvocado.Alley.Soil.Physical.STRUMSoil
          WaterBalance SoilWater: SummerDate=1-oct; SummerU=9; SummerCona=4.4; WinterDate=1-apr; WinterU=4; WinterCona=2; DiffusConst=88; DiffusSlope=35; Salb=0.13; CN2Bare=96; CNRed=13; CNCov=0.8; DischargeWidth=0; CatchmentArea=0; PSIDul=-100
            Thickness  SWCON  KLAT
            196        0.35   0
            150        0.3    0
            75         0.3    0
            1579       0.15   0
          Organic: same as NZ Avocado.FarNorthIrrAvocado.Row.Soil.Organic
          LayerStructure: Thickness=[196, 150, 75, 315, 315, 315, 315, 319]
          Solute NO3: same as NZ Avocado.FarNorthIrrAvocado.Row.Soil.NO3
          Solute NH4: same as NZ Avocado.FarNorthIrrAvocado.Row.Soil.NH4
          Solute Urea: same as NZ Avocado.FarNorthIrrAvocado.Row.Soil.Urea
          Nutrient
          OutputLayers: Thickness=[300, 300, 300, 400, 200]
          SoilTemperature Temperature
      ZoneAgregate
      Memo Reason why drainage looks bad
        The flux meters were flooded by a rising water table so the drainage observations are not representative of actual drainage
    Simulation WhangareiIrrAvocado
      Clock: Start=2016-09-29; End=2019-12-30
      Summary SummaryFile
      Weather: FileName=Whangarei.met
      MicroClimate: a_interception=0; b_interception=1; c_interception=0; d_interception=0; SoilHeatFluxFraction=0.4; MinimumHeightDiffForNewLayer=0; NightInterceptionFraction=0.5; ReferenceHeight=2
      SoilArbitrator Soil Arbitrator
      Manager AutoIrrigationDeficitBased
        AllowIrrigation = True
        SeasonStart = 1-oct
        SeasonEnd = 1-jun
        depthPAWC = 3000
        triggerDeficit = 90
        irrigateAmount = 15
        returndays = 1
        IrrigateAlley = False
```csharp
using Newtonsoft.Json;
using APSIM.Shared.Utilities;
using System.Xml.Serialization;
using Models.Soils;
using Models.PMF;
using Models.Core;
using System;
using Models.Interfaces;

        
namespace Models
{
    [Serializable] 
    [System.Xml.Serialization.XmlInclude(typeof(Model))]
    public class Script : Model
    {
        [Link] private Clock Clock;
        [Link] private Zone patch;
        [Link] private ISummary summary;
        //[Link] private Irrigation Irrigation;
        [Link] private Soil Soil;
        [Link(IsOptional = true)] private IPlant existingCrop;
        [Link] private IPhysical soilPhysical;
        [Link] private ISoilWater waterBalance;
        [Link(Type = LinkType.Scoped, ByName = true)] private Zone Row;
        [Link(Type = LinkType.Scoped, ByName = true, IsOptional = true)] private Zone Alley;
       
        // Parameters from user interface
        [Separator("Manager for controlling automatic irrigation")]
        [Description(" Allow this manager to control irrigation?")]
        public bool AllowIrrigation { get; set; }
      
        [Separator(" Parameters for the irrigation system")]
        [Description(" Start of irrigation season (d-mmm)")]
        public string SeasonStart { get; set; }
        [Description(" End of irrigation season (d-mmm)")]
        public string SeasonEnd { get; set; }
        [Description(" Depth to calculate PAWC and deficit (mm)")]
        public double depthPAWC { get; set; }
        [Description(" Deficit to trigger irrigations (% PAWC)")]
        public double triggerDeficit { get; set; }
        [Description(" Irrigation amount to apply each event (mm)")]
        public double irrigateAmount { get; set; }
        [Description(" Minimum days for irrigation to return")]
        public double returndays { get; set; }
        
        [Description("Is the Alley zone irrigated?")]
        public bool IrrigateAlley {get; set;}

        //Class members
        [JsonIgnore] public double IrrigLayerSWDeficit { get; set; }
        [JsonIgnore] public double TopSWC { get; set; }
        [JsonIgnore] public double DaysSinceIrrigation { get; set; }
        [JsonIgnore] public double AmountToApply { get; set; }
        [JsonIgnore] public double SeasonAppliedAmount { get; set; }
        
        private bool IrrigationIsAllowed { get; set; }
        private bool SeasonIsOpen { get; set; }
        private bool CropIsActive { get; set; }
        private bool IrrigatorIsAvailable { get; set; }
        private bool SoilIsDry { get; set; }
        private double TopDUL;
        private double TopLL;
        private int nLayers;

    
        //Calculate static soil variables
        [EventSubscribe("StartOfSimulation")]
        private void OnStartOfSimulation(object sender, EventArgs e)
        {
            
            //Can we irrigate at all?
            IrrigationIsAllowed = false; 
            if (AllowIrrigation)
                IrrigationIsAllowed = true; 

            //Calculate soil water variables
            double depthFromSurface = 0.0;
            double fracLayer = 0.0;
            nLayers = soilPhysical.Thickness.Length;
            for (int layer = 0; layer < nLayers; layer++)
            {
                fracLayer = Math.Min(1.0, (depthPAWC - depthFromSurface) / soilPhysical.Thickness[layer]);
                TopLL += soilPhysical.LL15mm[layer] * fracLayer;
                TopDUL += soilPhysical.DULmm[layer] * fracLayer;
                depthFromSurface += soilPhysical.Thickness[layer];
                if (depthFromSurface >= depthPAWC)
                    layer = nLayers;
            }
        }
             
        //Determine daily requirement for irrigation
        [EventSubscribe("StartOfDay")]
        private void OnStartOfDay(object sender, EventArgs e)
        {
            AmountToApply = 0.0;
            DaysSinceIrrigation += 1;

            //Can we irrigate today?          
            SeasonIsOpen = DateUtilities.WithinDates(SeasonStart, Clock.Today, SeasonEnd);
            if (!SeasonIsOpen)
                SeasonAppliedAmount = 0;

            //Is there a crop in the ground that needs irrigation?
            CropIsActive = false;
            if (existingCrop != null)
            {
                string currentCrop = (string)patch.Get("[CropManagement].Script.CurrentCrop");
                if ( existingCrop.IsAlive)
                {
                    CropIsActive = true;
                }
            }
          
            //Is the irrigator available?
            IrrigatorIsAvailable = false;
            if (DaysSinceIrrigation >= returndays)
                IrrigatorIsAvailable = true;
          
            //Is the soil dry enough to require irrigation?
            SoilIsDry = false;
            double depthFromSurface = 0.0;
            double fracLayer = 0.0;
            TopSWC = 0.0;
            for (int layer = 0; layer < nLayers; layer++)
            //for (int layer = 0; depthFromSurface < depthPAWC + soilPhysical.Thickness[layer]; layer++)
            {
                fracLayer = Math.Min(1.0, (depthPAWC - depthFromSurface) / soilPhysical.Thickness[layer]);
                TopSWC += waterBalance.SWmm[layer] * fracLayer;
                depthFromSurface += soilPhysical.Thickness[layer];
                if (depthFromSurface >= depthPAWC)
                    layer = nLayers;
            }
            
            IrrigLayerSWDeficit = TopSWC - TopDUL;
            if (Math.Max(0.0, -IrrigLayerSWDeficit) >= (TopDUL - TopLL) * (100 - triggerDeficit) / 100)
                SoilIsDry = true;

            //Are all the conditions ratifying irrigation
            if (IrrigationIsAllowed && SeasonIsOpen && CropIsActive && IrrigatorIsAvailable && SoilIsDry)
            {
                //Lets irrigate well !!!!
                Irrigation irrigRow = (Irrigation)Row.Get("Irrigation");
                irrigRow.Apply(irrigateAmount, depth: 0);
                DaysSinceIrrigation = 0;
                if (IrrigateAlley)
                {
                   Irrigation irrigAlley = (Irrigation)Alley.Get("Irrigation");
                   irrigAlley.Apply(irrigateAmount , depth: 0);
                   DaysSinceIrrigation = 0;
            
                }
            }
        }
    }
}
```
      Manager ResetDate: same as NZ Avocado.FarNorthIrrAvocado.ResetDate
      RectangularZone Row: Length=0; Width=0; Slope=0; AspectAngle=0; Altitude=50
        Report RowZoneReport: EventNames=[Clock].DoReport
        Report ReportBoth: EventNames=[Clock].DoReport
        Report Drainage: EventNames=[Clock].DoReport
          VariableNames:
            [Clock].Today
            sum of [Soil].SoilWater.Flux[7] from 2017-04-01 to 2019-12-31 as drainage
        Manager AgrgateZoneVariables
          script: same as in NZ AppleExperiments.Apple_Tall.Row.AgrgateZoneVariables
        Soil: Latitude=0; Longitude=0
          LayerStructure: Thickness=[300, 300, 300, 200, 200, 200, 400, 400, 400, 300]
          Chemical: PHUnits=Water
            Thickness  PH   CEC
            195        6.6  20.535
            495        6.2  11.385
            195        5.7  12.272
            1115       5.5  5.125
          Water: Thickness=[300, 300, 300, 300, 100, 100, 1600]; InitialValues=[0.34, 0.44, 0.52, 0.52, 0.52, 0.52, 0.52]; InitialPAWmm=633; RelativeTo=LL15; FilledFromTop=false
          Physical
            Thickness  ParticleSizeSand  ParticleSizeSilt  ParticleSizeClay  Rocks  BD   AirDry  LL15  DUL   SAT
            300        5                 65                30                0.206  1    0.18    0.18  0.5   0.55
            300        5                 65                30                0      1    0.25    0.25  0.5   0.55
            300        5                 65                30                0      0.8  0.3     0.3   0.5   0.55
            300        5                 65                30                0      0.8  0.3     0.3   0.52  0.6
            100        5                 65                30                0      0.8  0.3     0.3   0.52  0.6
            100        5                 65                30                0      0.8  0.3     0.3   0.52  0.6
            1600       5                 65                30                0      0.8  0.3     0.3   0.52  0.6
            Rocks, ParticleSizeSand, ParticleSizeSilt, ParticleSizeClay source: Calculated
            SoilCrop STRUMSoil: LL=[0.18, 0.25, 0.3, 0.3, 0.3, 0.3, 0.3]; KL=[1, 1, 1, 1, 1, 1, 1]; XF=[1, 1, 1, 1, 1, 1, 1]
            SoilCrop SPRUMSoil: LL=[0.18, 0.24, 0.3, 0.3, 0.3, 0.3, 0.3]; KL=[0.11, 0.11, 0.11, 0.11, 0.11, 0.11, 0.11]; XF=[1, 1, 1, 1, 1, 1, 1]
          WaterBalance SoilWater: SummerDate=1-Nov; SummerU=9; SummerCona=4.4; WinterDate=1-Apr; WinterU=9; WinterCona=4.4; DiffusConst=88; DiffusSlope=35.4; Salb=0.3; CN2Bare=68; CNRed=20; CNCov=0.8; DischargeWidth=0; CatchmentArea=0; PSIDul=-100
            Thickness  SWCON  KLAT
            300        0.3    0
            300        0.3    0
            300        0.3    0
            300        0.3    0
            200        0.3    0
            200        0.3    0
            200        0.3    0
            200        0.3    0
            200        0.36   0
            200        0.3    0
            600        0.3    0
          Organic: FOMCNRatio=40; CarbonUnits=Total
            Thickness  Carbon  SoilCNRatio  FBiom  FInert  FOM
            50         5       11.1         0.079  0.397   124.07
            50         5       11.1         0.061  0.457   115.105
            50         5       11.1         0.048  0.507   106.788
            50         4.13    11.1         0.038  0.562   99.072
            50         2.834   11.1         0.031  0.622   91.913
            50         1.966   11.1         0.025  0.675   85.272
            50         1.384   11.1         0.021  0.722   79.111
            50         0.993   11.1         0.018  0.765   73.394
            50         0.732   11.1         0.016  0.803   68.091
            50         0.556   11.1         0.015  0.838   63.171
            250        0.307   11.1         0.012  0.916   43.417
            250        0.214   11.1         0.01   0.977   29.84
            500        0.201   11.1         0.01   0.991   14.095
            500        0.2     11.1         0.01   0.996   6.658
          OutputLayers: Thickness=[300, 300, 300, 400, 200]
          Solute NO3: Thickness=[195, 495, 195, 1115]; InitialValues=[4.95, 15, 1.667, 1.786]; InitialValuesUnits=ppm; WaterTableConcentration=0; D0=0; DepthConstant=0; MaxDepthSoluteAccessible=0; RunoffEffectivenessAtMovingSolute=0; MaxEffectiveRunoff=0
          Solute NH4: Thickness=[195, 495, 195, 1115]; InitialValues=[0, 0, 0, 0]; InitialValuesUnits=ppm; WaterTableConcentration=0; D0=0; DepthConstant=0; MaxDepthSoluteAccessible=0; RunoffEffectivenessAtMovingSolute=0; MaxEffectiveRunoff=0
          Solute Urea: Thickness=[195, 495, 195, 1115]; InitialValues=[0, 0, 0, 0]; InitialValuesUnits=kg/ha; WaterTableConcentration=0; D0=0; DepthConstant=0; MaxDepthSoluteAccessible=0; RunoffEffectivenessAtMovingSolute=0; MaxEffectiveRunoff=0
          Nutrient
          SoilTemperature Temperature
        SurfaceOrganicMatter: InitialResidueName=wheat_stubble; InitialResidueType=wheat; InitialResidueMass=500; InitialStandingFraction=0; InitialCPR=0; InitialCNR=100
        Fertiliser
        Irrigation
        Manager WaterTable
          StartDate = 1-dec
          EndDate = 1-mar
          script: same as in NZ AppleExperiments.Apple_Dwarf.Row.WaterTable
        Plant STRUM
        Manager DAS: same as NZ Avocado.FarNorthIrrAvocado.Row.DAS
        BiomassRemovalEvents Pick: same as NZ Avocado.FarNorthIrrAvocado.Row.Pick
        BiomassRemovalEvents Prune: same as NZ Avocado.FarNorthIrrAvocado.Row.Prune
        Manager AutomaticFertiliser: same as NZ Avocado.FarNorthIrrAvocado.Row.AutomaticFertiliser
        StrumTreeInstance Avocado: same as PatternTest.EverGreen.Row.Avocado
      RectangularZone Alley: Length=0; Width=0; Slope=0; AspectAngle=0; Altitude=50
        Report AlleyZoneReport: EventNames=[Clock].DoReport
        Report ReportBoth: EventNames=[Clock].DoReport
        Report Drainage: EventNames=[Clock].DoReport
          VariableNames:
            [Clock].Today
            sum of [Soil].SoilWater.Flux[7] from 2008-10-01 to 2010-07-23 as drainage
        Manager AgrgateZoneVariables: same as NZ Avocado.WhangareiIrrAvocado.Row.AgrgateZoneVariables
        SurfaceOrganicMatter: InitialResidueName=wheat_stubble; InitialResidueType=wheat; InitialResidueMass=500; InitialStandingFraction=0; InitialCPR=0; InitialCNR=100
        Fertiliser
        Irrigation
        Manager WaterTable: same as NZ Avocado.WhangareiIrrAvocado.Row.WaterTable
        Manager DAS: same as NZ Avocado.FarNorthIrrAvocado.Row.DAS
        Plant SPRUM
        SprumPastureInstance BasePasture: same as USA AppleExperiments.Prosser_Apple_Deep.DeepSoil.Alley.BasePasture
        BiomassRemovalEvents OnCut: same as PatternTest.Decidious.Alley.Mow
        Soil: Latitude=0; Longitude=0
          LayerStructure: Thickness=[300, 300, 300, 200, 200, 200, 400, 400, 400, 600]
          Chemical: PHUnits=Water
            Thickness  PH   CEC
            195        6.6  20.535
            495        6.2  11.385
            195        5.7  12.272
            1115       5.5  5.125
          Water: Thickness=[195, 495, 195, 1115]; InitialValues=[0.34, 0.44, 0.52, 0.52]; InitialPAWmm=433.3; RelativeTo=LL15; FilledFromTop=false
          Physical
            Thickness  ParticleSizeSand  ParticleSizeSilt  ParticleSizeClay  Rocks  BD   AirDry  LL15  DUL   SAT
            400        5                 65                30                0.206  1    0.09    0.18  0.54  0.55
            400        5                 65                30                0      1    0.24    0.25  0.52  0.55
            400        5                 65                30                0      0.8  0.3     0.3   0.55  0.6
            300        5                 65                30                0      0.8  0.3     0.3   0.52  0.6
            100        5                 65                30                0      0.8  0.3     0.3   0.52  0.6
            100        5                 65                30                0      0.8  0.3     0.3   0.52  0.6
            1300       5                 65                30                0      0.8  0.3     0.3   0.52  0.6
            Rocks, ParticleSizeSand, ParticleSizeSilt, ParticleSizeClay source: Calculated
            SoilCrop STRUMSoil: LL=[0.18, 0.24, 0.3, 0.3, 0.3, 0.3, 0.3]; KL=[1, 1, 1, 1, 1, 1, 1]; XF=[1, 1, 1, 1, 1, 1, 1]
            SoilCrop SPRUMSoil: LL=[0.18, 0.24, 0.3, 0.3, 0.3, 0.3, 0.3]; KL=[0.11, 0.11, 0.11, 0.11, 0.11, 0.11, 0.11]; XF=[1, 1, 1, 1, 1, 1, 1]
          WaterBalance SoilWater: SummerDate=1-Nov; SummerU=9; SummerCona=4.4; WinterDate=1-Apr; WinterU=9; WinterCona=4.4; DiffusConst=88; DiffusSlope=35.4; Salb=0.3; CN2Bare=68; CNRed=20; CNCov=0.8; DischargeWidth=0; CatchmentArea=0; PSIDul=-100
            Thickness  SWCON  KLAT
            150        0.55   0
            150        0.55   0
            100        0.55   0
            200        0.55   0
            200        0.55   0
            200        0.55   0
            200        0.55   0
            200        0.55   0
            200        0.55   0
            200        0.55   0
            200        0.55   0
          Organic: same as NZ Avocado.WhangareiIrrAvocado.Row.Soil.Organic
          OutputLayers: Thickness=[300, 300, 300, 400, 200]
          Solute NO3: same as NZ Avocado.WhangareiIrrAvocado.Row.Soil.NO3
          Solute NH4: same as NZ Avocado.WhangareiIrrAvocado.Row.Soil.NH4
          Solute Urea: same as NZ Avocado.WhangareiIrrAvocado.Row.Soil.Urea
          Nutrient
          SoilTemperature Temperature
      ZoneAgregate
    Simulation BayofPlentyIrrAvocado
      Clock: Start=2016-09-29; End=2019-12-30
      Summary SummaryFile
      Weather: FileName=Omokoroa.met
      MicroClimate: a_interception=0; b_interception=1; c_interception=0; d_interception=0; SoilHeatFluxFraction=0.4; MinimumHeightDiffForNewLayer=0; NightInterceptionFraction=0.5; ReferenceHeight=2
      SoilArbitrator Soil Arbitrator
      Manager AutoIrrigationDeficitBased
        AllowIrrigation = True
        SeasonStart = 1-oct
        SeasonEnd = 1-apr
        depthPAWC = 3000
        triggerDeficit = 90
        irrigateAmount = 15
        returndays = 1
        IrrigateAlley = False
        script: same as in NZ Avocado.FarNorthIrrAvocado.AutoIrrigationDeficitBased
      RectangularZone Row: Length=100; Width=2; Slope=0; AspectAngle=0; Altitude=50
        Report RowZoneReport: EventNames=[Clock].DoReport
        Report ReportBoth: EventNames=[Clock].DoReport
        Report Drainage: EventNames=[Clock].DoReport
          VariableNames:
            [Clock].Today
            //sum of [Soil].SoilWater.Flux[7] from 2017-04-01 to 2019-12-31 as drainage
        Manager AgrgateZoneVariables: same as NZ Avocado.WhangareiIrrAvocado.Row.AgrgateZoneVariables
        SurfaceOrganicMatter: InitialResidueName=wheat_stubble; InitialResidueType=wheat; InitialResidueMass=500; InitialStandingFraction=0; InitialCPR=0; InitialCNR=100
        Fertiliser
        Irrigation
        Manager WaterTable
          StartDate = 1-dec
          EndDate = 1-mar
```csharp
using Models.Zones;
using APSIM.Shared.Utilities;
using Models.Soils;
using System.Collections.Generic;
using Models.PMF;
using Models.Core;
using System;

namespace Models
{
    [Serializable]
    public class Script : Model
    {
        [Link] Clock Clock;
        [Link] Soil soil;
        [Link] Irrigation irrigation;
        [Description("Start of sowing window (d-mmm)")]
        public string StartDate { get; set; }
        [Description("End of sowing window (d-mmm)")]
        public string EndDate { get; set; }

        [EventSubscribe("StartOfDay")]
        private void OnStartOfDay(object sender, EventArgs e)
        {
        if (DateUtilities.WithinDates(StartDate, Clock.Today, EndDate))
            irrigation.Apply(2, 1000);
        }
    }
}
```
        Plant STRUM
        Manager DAS: same as NZ Avocado.FarNorthIrrAvocado.Row.DAS
        Soil: Latitude=0; Longitude=0
          LayerStructure: Thickness=[300, 300, 300, 200, 200, 200, 400, 400, 400, 600]
          Chemical: PHUnits=Water
            Thickness  PH   CEC
            195        6.6  20.535
            495        6.2  11.385
            195        5.7  12.272
            1115       5.5  5.125
          Water: Thickness=[195, 495, 195, 1115]; InitialValues=[0.45, 0.479, 0.517, 0.484]; InitialPAWmm=469.33; RelativeTo=LL15; FilledFromTop=true
          Physical
            Thickness  ParticleSizeSand  ParticleSizeSilt  ParticleSizeClay  Rocks  BD   AirDry  LL15  DUL   SAT
            400        5                 65                30                0.206  1    0.09    0.2   0.47  0.6
            400        5                 65                30                0      1    0.22    0.22  0.55  0.62
            400        5                 65                30                0      0.8  0.22    0.22  0.55  0.64
            300        5                 65                30                0      0.8  0.3     0.3   0.52  0.64
            100        5                 65                30                0      0.8  0.3     0.3   0.52  0.65
            100        5                 65                30                0      0.8  0.3     0.3   0.52  0.6
            1300       5                 65                30                0      0.8  0.3     0.3   0.52  0.6
            Rocks, ParticleSizeSand, ParticleSizeSilt, ParticleSizeClay source: Calculated
            SoilCrop STRUMSoil: LL=[0.18, 0.24, 0.3, 0.3, 0.3, 0.3, 0.3]; KL=[1, 1, 1, 1, 1, 1, 1]; XF=[1, 1, 1, 1, 1, 1, 1]
            SoilCrop SPRUMSoil: LL=[0.18, 0.24, 0.3, 0.3, 0.3, 0.3, 0.3]; KL=[0.11, 0.11, 0.11, 0.11, 0.11, 0.11, 0.11]; XF=[1, 1, 1, 1, 1, 1, 1]
          WaterBalance SoilWater: same as NZ Avocado.WhangareiIrrAvocado.Alley.Soil.SoilWater
          Organic: same as NZ Avocado.WhangareiIrrAvocado.Row.Soil.Organic
          OutputLayers: Thickness=[300, 300, 300, 400, 200]
          Solute NO3: same as NZ Avocado.WhangareiIrrAvocado.Row.Soil.NO3
          Solute NH4: same as NZ Avocado.WhangareiIrrAvocado.Row.Soil.NH4
          Solute Urea: same as NZ Avocado.WhangareiIrrAvocado.Row.Soil.Urea
          Nutrient
          SoilTemperature Temperature
        Manager AutomaticFertiliser: same as NZ Avocado.FarNorthIrrAvocado.Row.AutomaticFertiliser
        BiomassRemovalEvents Pick: same as NZ Avocado.FarNorthIrrAvocado.Row.Pick
        BiomassRemovalEvents Prune: same as NZ Avocado.FarNorthIrrAvocado.Row.Prune
        StrumTreeInstance Avocado: same as PatternTest.EverGreen.Row.Avocado
      RectangularZone Alley: Length=100; Width=8; Slope=0; AspectAngle=0; Altitude=50
        Report AlleyZoneReport: EventNames=[Clock].DoReport
        Report ReportBoth: EventNames=[Clock].DoReport
        Report Drainage: EventNames=[Clock].DoReport
          VariableNames:
            [Clock].Today
            //sum of [Soil].SoilWater.Flux[7] from 2008-10-01 to 2010-07-23 as drainage
        Manager AgrgateZoneVariables: same as NZ Avocado.WhangareiIrrAvocado.Row.AgrgateZoneVariables
        SurfaceOrganicMatter: InitialResidueName=wheat_stubble; InitialResidueType=wheat; InitialResidueMass=500; InitialStandingFraction=0; InitialCPR=0; InitialCNR=100
        Fertiliser
        Irrigation
        Manager WaterTable: same as NZ Avocado.BayofPlentyIrrAvocado.Row.WaterTable
        Manager DAS: same as NZ Avocado.FarNorthIrrAvocado.Row.DAS
        Plant SPRUM
        SprumPastureInstance BasePasture: same as USA AppleExperiments.Prosser_Apple_Deep.DeepSoil.Alley.BasePasture
        BiomassRemovalEvents OnCut: same as PatternTest.Decidious.Alley.Mow
        Soil: same as NZ Avocado.BayofPlentyIrrAvocado.Row.Soil
      ZoneAgregate
      Manager ResetDate: same as NZ Avocado.FarNorthIrrAvocado.ResetDate
    Experiment OmokaroaAvocado
      Factors
        Permutation
          Factor Water
            CompositeFactor Irr: Specifications=[AutoIrrigationDeficitBased]
              Manager AutoIrrigationDeficitBased
                AllowIrrigation = True
                SeasonStart = 1-oct
                SeasonEnd = 1-apr
                depthPAWC = 3000
                triggerDeficit = 90
                irrigateAmount = 50
                returndays = 3
                IrrigateAlley = True
                script: same as in NZ Avocado.FarNorthIrrAvocado.AutoIrrigationDeficitBased
            CompositeFactor Dry: Specifications=[AutoIrrigationDeficitBased]
              Manager AutoIrrigationDeficitBased
                AllowIrrigation = True
                SeasonStart = 1-oct
                SeasonEnd = 1-apr
                depthPAWC = 1000
                triggerDeficit = 10
                irrigateAmount = 15
                returndays = 3
                IrrigateAlley = True
                script: same as in NZ Avocado.FarNorthIrrAvocado.AutoIrrigationDeficitBased
      Simulation BayofPlenty
        Clock: Start=2016-10-01; End=2019-10-01
        Summary SummaryFile
        Weather: FileName=Omokoroa.met
        MicroClimate: a_interception=0; b_interception=1; c_interception=0; d_interception=0; SoilHeatFluxFraction=0.4; MinimumHeightDiffForNewLayer=0; NightInterceptionFraction=0.5; ReferenceHeight=2
        SoilArbitrator Soil Arbitrator
        Manager AutoIrrigationDeficitBased
          AllowIrrigation = True
          SeasonStart = 1-oct
          SeasonEnd = 1-apr
          depthPAWC = 3000
          triggerDeficit = 90
          irrigateAmount = 15
          returndays = 3
          IrrigateAlley = False
          script: same as in NZ Avocado.FarNorthIrrAvocado.AutoIrrigationDeficitBased
        RectangularZone Row: Length=100; Width=1.3; Slope=0; AspectAngle=0; Altitude=50
          Report RowZoneReport: EventNames=[Clock].DoReport
          Report ReportBoth: EventNames=[Clock].DoReport
          Report Drainage: EventNames=[Clock].DoReport
            VariableNames:
              [Clock].Today
              //sum of [Soil].SoilWater.Flux[7] from 2017-04-01 to 2019-12-31 as drainage
          Manager AgrgateZoneVariables: same as NZ Avocado.WhangareiIrrAvocado.Row.AgrgateZoneVariables
          SurfaceOrganicMatter: InitialResidueName=wheat_stubble; InitialResidueType=wheat; InitialResidueMass=500; InitialStandingFraction=0; InitialCPR=0; InitialCNR=100
          Fertiliser
          Irrigation
          Manager WaterTable: same as NZ Avocado.BayofPlentyIrrAvocado.Row.WaterTable
          Plant STRUM
          Manager DAS: same as NZ Avocado.FarNorthIrrAvocado.Row.DAS
          Soil: Latitude=0; Longitude=0
            LayerStructure: Thickness=[300, 300, 300, 200, 200, 200, 400, 400, 400, 600]
            Chemical: PHUnits=Water
              Thickness  PH   CEC
              195        6.6  20.535
              495        6.2  11.385
              195        5.7  12.272
              1115       5.5  5.125
            Water: Thickness=[195, 495, 195, 1115]; InitialValues=[0.4, 0.4, 0.4, 0.484]; InitialPAWmm=397.66; RelativeTo=LL15; FilledFromTop=true
            Physical
              Thickness  ParticleSizeSand  ParticleSizeSilt  ParticleSizeClay  Rocks  BD   AirDry  LL15  DUL   SAT
              400        5                 65                30                0.206  1    0.09    0.2   0.42  0.6
              400        5                 65                30                0      1    0.22    0.22  0.4   0.62
              400        5                 65                30                0      0.8  0.22    0.22  0.55  0.64
              300        5                 65                30                0      0.8  0.3     0.3   0.52  0.64
              100        5                 65                30                0      0.8  0.3     0.3   0.52  0.65
              100        5                 65                30                0      0.8  0.3     0.3   0.52  0.6
              1300       5                 65                30                0      0.8  0.3     0.3   0.52  0.6
              Rocks, ParticleSizeSand, ParticleSizeSilt, ParticleSizeClay source: Calculated
              SoilCrop STRUMSoil: LL=[0.18, 0.24, 0.3, 0.3, 0.3, 0.3, 0.3]; KL=[1, 1, 1, 1, 1, 1, 1]; XF=[1, 1, 1, 1, 1, 1, 1]
              SoilCrop SPRUMSoil: LL=[0.18, 0.24, 0.3, 0.3, 0.3, 0.3, 0.3]; KL=[0.11, 0.11, 0.11, 0.11, 0.11, 0.11, 0.11]; XF=[1, 1, 1, 1, 1, 1, 1]
            WaterBalance SoilWater: same as NZ Avocado.WhangareiIrrAvocado.Alley.Soil.SoilWater
            Organic: same as NZ Avocado.WhangareiIrrAvocado.Row.Soil.Organic
            OutputLayers: Thickness=[300, 300, 300, 400, 200]
            Solute NO3: same as NZ Avocado.WhangareiIrrAvocado.Row.Soil.NO3
            Solute NH4: same as NZ Avocado.WhangareiIrrAvocado.Row.Soil.NH4
            Solute Urea: same as NZ Avocado.WhangareiIrrAvocado.Row.Soil.Urea
            Nutrient
            SoilTemperature Temperature
          BiomassRemovalEvents Pick: same as NZ Avocado.FarNorthIrrAvocado.Row.Pick
          BiomassRemovalEvents Prune: same as NZ Avocado.FarNorthIrrAvocado.Row.Prune
          Manager AutomaticFertiliser: same as NZ Avocado.FarNorthIrrAvocado.Row.AutomaticFertiliser
          StrumTreeInstance Avocado: same as PatternTest.EverGreen.Row.Avocado
        RectangularZone Alley: Length=100; Width=2.2; Slope=0; AspectAngle=0; Altitude=50
          Report AlleyZoneReport: EventNames=[Clock].DoReport
          Report ReportBoth: EventNames=[Clock].DoReport
          Report Drainage: EventNames=[Clock].DoReport
            VariableNames:
              [Clock].Today
              //sum of [Soil].SoilWater.Flux[7] from 2008-10-01 to 2010-07-23 as drainage
          Manager AgrgateZoneVariables: same as NZ Avocado.WhangareiIrrAvocado.Row.AgrgateZoneVariables
          SurfaceOrganicMatter: InitialResidueName=wheat_stubble; InitialResidueType=wheat; InitialResidueMass=500; InitialStandingFraction=0; InitialCPR=0; InitialCNR=100
          Fertiliser
          Irrigation
          Manager WaterTable: same as NZ Avocado.BayofPlentyIrrAvocado.Row.WaterTable
          Manager DAS: same as NZ Avocado.FarNorthIrrAvocado.Row.DAS
          Plant SPRUM
          SprumPastureInstance BasePasture: same as USA AppleExperiments.Prosser_Apple_Deep.DeepSoil.Alley.BasePasture
          BiomassRemovalEvents OnCut: same as PatternTest.Decidious.Alley.Mow
          Operations IrrigationOperations
          Soil: same as NZ Avocado.OmokaroaAvocado.BayofPlenty.Row.Soil
        ZoneAgregate
        Manager ResetDate: same as NZ Avocado.FarNorthIrrAvocado.ResetDate
  Folder NZ Kiwifruit Expts
    Memo Trial details
      *	Correct soils entered

      *	Correct climate data entered

      *	Approx start growth and season-end added
    Folder Experiment
      Simulation Orchard_BAY
        Clock: Start=2012-06-21; End=2022-12-01
        Summary SummaryFile
        Weather: FileName=WeatherFiles\TaurangaAeroEws.met
        MicroClimate: a_interception=0; b_interception=1; c_interception=0; d_interception=0; SoilHeatFluxFraction=0.4; MinimumHeightDiffForNewLayer=0; NightInterceptionFraction=0.5; ReferenceHeight=2
        SoilArbitrator Soil Arbitrator
        Manager AutoIrrigationDeficitBased
          AllowIrrigation = True
          depthPAWC = 3000
          triggerDeficit = 75
          irrigateAmount = 15
          returndays = 3
          IrrigateAlley = False
```csharp
using Newtonsoft.Json;
using APSIM.Shared.Utilities;
using System.Xml.Serialization;
using Models.Soils;
using Models.PMF;
using Models.Core;
using System;
using Models.Interfaces;

        
namespace Models
{
    [Serializable] 
    [System.Xml.Serialization.XmlInclude(typeof(Model))]
    public class Script : Model
    {
        [Link] private Clock Clock;
        [Link] private Zone patch;
        [Link] private ISummary summary;
        //[Link] private Irrigation Irrigation;
        [Link] private Soil Soil;
        [Link(IsOptional = true)] private IPlant existingCrop;
        [Link] private IPhysical soilPhysical;
        [Link] private ISoilWater waterBalance;
        [Link(Type = LinkType.Scoped, ByName = true)] private Zone Row;
        [Link(Type = LinkType.Scoped, ByName = true, IsOptional = true)] private Zone Alley;
        
       
        // Parameters from user interface
        [Separator("Manager for controlling automatic irrigation")]
        [Description(" Allow this manager to control irrigation?")]
        public bool AllowIrrigation { get; set; }
      
        [Separator(" Parameters for the irrigation system")]
        [Description(" Depth to calculate PAWC and deficit (mm)")]
        public double depthPAWC { get; set; }
        [Description(" Deficit to trigger irrigations (% PAWC)")]
        public double triggerDeficit { get; set; }
        [Description(" Irrigation amount to apply each event (mm)")]
        public double irrigateAmount { get; set; }
        [Description(" Minimum days for irrigation to return")]
        public double returndays { get; set; }
        
        [Description("Is the Alley zone irrigated?")]
        public bool IrrigateAlley {get; set;}

        //Class members
        [JsonIgnore] public double IrrigLayerSWDeficit { get; set; }
        [JsonIgnore] public double TopSWC { get; set; }
        [JsonIgnore] public double DaysSinceIrrigation { get; set; }
        [JsonIgnore] public double AmountToApply { get; set; }
        [JsonIgnore] public double SeasonAppliedAmount { get; set; }
        
        private bool IrrigationIsAllowed { get; set; }
        private bool CropIsActive { get; set; }
        private bool IrrigatorIsAvailable { get; set; }
        private bool SoilIsDry { get; set; }
        private double TopDUL;
        private double TopLL;
        private int nLayers;

    
        //Calculate static soil variables
        [EventSubscribe("StartOfSimulation")]
        private void OnStartOfSimulation(object sender, EventArgs e)
        {
            
            //Can we irrigate at all?
            IrrigationIsAllowed = false; 
            if (AllowIrrigation)
                IrrigationIsAllowed = true; 

            //Calculate soil water variables
            double depthFromSurface = 0.0;
            double fracLayer = 0.0;
            nLayers = soilPhysical.Thickness.Length;
            for (int layer = 0; layer < nLayers; layer++)
            {
                fracLayer = Math.Min(1.0, (depthPAWC - depthFromSurface) / soilPhysical.Thickness[layer]);
                TopLL += soilPhysical.LL15mm[layer] * fracLayer;
                TopDUL += soilPhysical.DULmm[layer] * fracLayer;
                depthFromSurface += soilPhysical.Thickness[layer];
                if (depthFromSurface >= depthPAWC)
                    layer = nLayers;
            }
        }
             
        //Determine daily requirement for irrigation
        [EventSubscribe("StartOfDay")]
        private void OnStartOfDay(object sender, EventArgs e)
        {
            AmountToApply = 0.0;
            DaysSinceIrrigation += 1;

            //Is the row crop actively growing?
            CropIsActive = false;
            double StageCode = (double)Row.Get("STRUM.Phenology.Stage");
            if ((StageCode > 3.0) && (StageCode<5.0))
            {
                CropIsActive = true;
            }
          
            //Is the irrigator available?
            IrrigatorIsAvailable = false;
            if (DaysSinceIrrigation >= returndays)
                IrrigatorIsAvailable = true;
          
            //Is the soil dry enough to require irrigation?
            SoilIsDry = false;
            double depthFromSurface = 0.0;
            double fracLayer = 0.0;
            TopSWC = 0.0;
            for (int layer = 0; layer < nLayers; layer++)
            //for (int layer = 0; depthFromSurface < depthPAWC + soilPhysical.Thickness[layer]; layer++)
            {
                fracLayer = Math.Min(1.0, (depthPAWC - depthFromSurface) / soilPhysical.Thickness[layer]);
                TopSWC += waterBalance.SWmm[layer] * fracLayer;
                depthFromSurface += soilPhysical.Thickness[layer];
                if (depthFromSurface >= depthPAWC)
                    layer = nLayers;
            }
            
            IrrigLayerSWDeficit = TopSWC - TopDUL;
            if (Math.Max(0.0, -IrrigLayerSWDeficit) >= (TopDUL - TopLL) * (100 - triggerDeficit) / 100)
                SoilIsDry = true;

            //Are all the conditions ratifying irrigation
            if (IrrigationIsAllowed && CropIsActive && IrrigatorIsAvailable && SoilIsDry)
            {
                //Lets irrigate well !!!!
                Irrigation irrigRow = (Irrigation)Row.Get("Irrigation");
                irrigRow.Apply(irrigateAmount, depth: 0);
                DaysSinceIrrigation = 0;
                if (IrrigateAlley)
                {
                   Irrigation irrigAlley = (Irrigation)Alley.Get("Irrigation");
                   irrigAlley.Apply(irrigateAmount , depth: 0);           
                }
            }
        }
    }
}
```
        Manager AutomaticFertiliser
          AllowFertiliser = yes
          Depth2SoilN = 1500
          CriticalSoilN = 30
          FertNAmount = 40
          FertType = UreaN
          FertApplicationDepth = 10
          FertMinimumDays = 21
          script: same as in PatternTest.Decidious.AutomaticFertiliser
        Manager ResetDate
```csharp
using Newtonsoft.Json;
using Models.PMF.Organs;
using Models.Soils.Nutrients;
using Models.Interfaces;
using System;
using Models.Core;
using System.Collections.Generic;
using System.Text;
using Models.Soils;
using Models.PMF;
using Models;
using System.Xml.Serialization;
using APSIM.Shared.Utilities;
using Models.Climate;



namespace Models
{
    [Serializable] 
    //[System.Xml.Serialization.XmlInclude(typeof(Model))]
    public class Script : Model
    {
    
     [Link] private Clock Clock;
        
    //[Separator("Manager to summarise variables")]
        //[Description(" Date to end the simulation year and reset: ")]
        //public string ResetDate { get; set; }
                  
        [JsonIgnore] public double SimulationYear { get; set; }
        [JsonIgnore] public double DAS { get; set; }
        
         [EventSubscribe("StartOfSimulation")]
        private void DoStartOfSimulation(object sender, EventArgs e)
        {
                DAS = 0;
                SimulationYear = 1983;
        }
        
        [EventSubscribe("StartOfDay")]
        private void OnStartOfDay(object sender, EventArgs e)
        {
            DAS += 1;
            //if (DateUtilities.DatesAreEqual(ResetDate, Clock.Today.Date))
            if (DateUtilities.DatesAreEqual("Jul-1", Clock.Today.Date))
            {
                SimulationYear += 1;
                DAS = 1;
                
            }
        }
    
    }
}
```
        RectangularZone Row: Length=100; Width=1; Slope=0; AspectAngle=0; Altitude=50
          Report RowZoneReport: EventNames=[Clock].DoReport
          SurfaceOrganicMatter: InitialResidueName=wheat_stubble; InitialResidueType=wheat; InitialResidueMass=500; InitialStandingFraction=0; InitialCPR=0; InitialCNR=100
          Plant STRUM
          Fertiliser
          Irrigation
          BiomassRemovalEvents Pick: NameOfPlantToRemoveFrom=STRUM; RemovalType=2
            BiomassRemovalFractions:
              PlantName  OrganName  TypeString  LiveToRemove  DeadToRemove  LiveToResidue  DeadToResidue
              STRUM      Root       Harvesting  0             0             0              0
              STRUM      Leaf       Harvesting  0             0             0              0
              STRUM      Trunk      Harvesting  0             0             0              0
              STRUM      Fruit      Harvesting  0.8           0             0.2            0
          BiomassRemovalEvents Prune: same as USA AppleExperiments.Prosser_Apple_Deep.DeepSoil.Row.Prune
          Soil: SoilType=Typic Orthic Allophanic Soils; Latitude=-41; Longitude=174
            DataSource=Based on profile descriptions provided by Smap (Ngakura_2a1)
            Chemical: PHUnits=Water
              Thickness  PH  CEC
              275        7   14.319
              650        7   6.371
              1075       7   7
            Physical
              Thickness  ParticleSizeSand  ParticleSizeSilt  ParticleSizeClay  Rocks  BD     AirDry  LL15   DUL    SAT    KS
              275        69.5              22                8.5               0.1    0.744  0.096   0.189  0.409  0.628  1920
              287.5      56                31                13                0.25   0.589  0.208   0.208  0.457  0.565  1440
              362.5      56                31                13                0.25   0.589  0.248   0.248  0.469  0.585  1440
              358.3      51.5              32                16.5              0.15   0.802  0.264   0.264  0.46   0.579  1440
              358.3      51.5              32                16.5              0.15   0.802  0.264   0.264  0.46   0.579  1440
              358.3      51.5              32                16.5              0.15   0.802  0.264   0.264  0.46   0.579  1440
              SoilCrop DEROPAPYSoil: LL=[0.189, 0.208, 0.248, 0.264, 0.264, 0.264]; KL=[0.077, 0.077, 0.077, 0.077, 0.077, 0.077]; XF=[1, 1, 1, 1, 1, 1]
              SoilCrop SCRUMSoil: LL=[0.189, 0.208, 0.248, 0.264, 0.264, 0.264]; KL=[0.077, 0.077, 0.077, 0.077, 0.077, 0.077]; XF=[1, 1, 1, 1, 1, 1]
              SoilCrop STRUMSoil: LL=[0.189, 0.208, 0.248, 0.264, 0.264, 0.264]; KL=[0.113, 0.059, 0.026, 0.011, 0.005, 0]; XF=[1, 1, 1, 1, 1, 1]
              SoilCrop SPRUMSoil: LL=[0.189, 0.208, 0.248, 0.264, 0.264, 0.264]; KL=[0.113, 0.059, 0.026, 0.011, 0.005, 0]; XF=[1, 1, 1, 1, 1, 1]
            Water: Thickness=[275, 287.5, 362.5, 358.3, 358.3, 358.3]; InitialValues=[0.409, 0.457, 0.469, 0.46, 0.46, 0.46]; InitialPAWmm=422.8804; RelativeTo=LL15; FilledFromTop=false
            WaterBalance SoilWater: SummerDate=1-oct; SummerU=9; SummerCona=4.4; WinterDate=1-apr; WinterU=4; WinterCona=2; DiffusConst=88; DiffusSlope=35; Salb=0.13; CN2Bare=77; CNRed=37; CNCov=0.8; DischargeWidth=0; CatchmentArea=0; PSIDul=-100
              Thickness  SWCON  KLAT
              275        0.4    0
              650        0.4    0
              1075       0.4    0
            Organic: FOMCNRatio=40; CarbonUnits=Total
              Thickness  Carbon  SoilCNRatio  FBiom  FInert  FOM
              50         10      11.1         0.079  0.575   124.07
              50         10      11.1         0.061  0.575   115.105
              50         10      11.1         0.048  0.614   106.788
              50         8.224   11.1         0.038  0.662   99.072
              50         5.578   11.1         0.031  0.709   91.914
              50         3.805   11.1         0.025  0.75    85.272
              50         2.617   11.1         0.021  0.785   79.111
              50         1.82    11.1         0.018  0.816   73.394
              50         1.286   11.1         0.016  0.844   68.091
              50         0.928   11.1         0.015  0.868   63.171
              250        0.419   11.1         0.012  0.924   43.417
              250        0.23    11.1         0.01   0.978   29.84
              500        0.201   11.1         0.01   0.991   14.095
              500        0.2     11.1         0.01   0.996   6.658
            Solute NO3: Thickness=[275, 650, 1075]; InitialValues=[8.513, 1.569, 0.073]; InitialValuesUnits=ppm; WaterTableConcentration=0; D0=0; DepthConstant=0; MaxDepthSoluteAccessible=0; RunoffEffectivenessAtMovingSolute=0; MaxEffectiveRunoff=0
            Solute NH4: Thickness=[275, 650, 1075]; InitialValues=[1.277, 0.235, 0.011]; InitialValuesUnits=ppm; WaterTableConcentration=0; D0=0; DepthConstant=0; MaxDepthSoluteAccessible=0; RunoffEffectivenessAtMovingSolute=0; MaxEffectiveRunoff=0
            Solute Urea: Thickness=[275, 650, 1075]; InitialValues=[0, 0, 0]; InitialValuesUnits=kg/ha; WaterTableConcentration=0; D0=0; DepthConstant=0; MaxDepthSoluteAccessible=0; RunoffEffectivenessAtMovingSolute=0; MaxEffectiveRunoff=0
            Nutrient
            LayerStructure: Thickness=[200, 362.5, 362.5, 358.3, 358.3, 358.3]
            OutputLayers: Thickness=[600, 600, 800, 400]
            SoilTemperature Temperature
          StrumTreeInstance KiwiFruit: TreeType=Deciduous; RowSpacing=4; InterRowSpacing=4; AlleyZoneWidthFrac=0.75; AgeAtSimulationStart=6; YearsToMaxDimension=6; TrunkMassAtMaxDimension=12; WoodDensity=500; BudBreakDAWS=90; StartFullCanopyDAWS=125; StartLeafFallDAWS=331; EndLeafFallDAWS=365; GRINZ=true; MaxRD=3000; Proot=0.4; Pleaf=0.4; Ptrunk=0.2; CanopyBaseHeight=1850; MaxPrunedHeight=2050; MaxHeight=4000; MaxPrunedWidth=4000; MaxWidth=4000; RootNConc=0.01; LeafNConc=0.02; TrunkNConc=0.01; FruitNConc=0.02; ExtinctCoeff=0.8; BaseCover=0; MaxCover=0.96; RUE=0.9; GSMax=0.009; R50=200; WaterStress=true; Number=960; PotentialFWPerFruit=100; DMC=0.17; FruitDensity=1.02; DateMaxBloom=1-oct; DAFStartLinearGrowth=90; DAFEndLinearGrowth=200; DAFMaxSize=240; TotalSolarRadiation=0
          Manager AutomaticFertiliser
            Fertilise = True
            Season_Start = 1-Aug
            Season_End = 30-Apr
            Season_Allocation = 100000
            TriggerN = 50
            NApplicationAmount = 25
            Return_days = 3
            Top_Depth = 600
```csharp
using Newtonsoft.Json;
using Models.PMF.Phen;
using Models.Soils.Nutrients;
using Models.Interfaces;
using APSIM.Shared.Utilities;
using Models.PMF;
using System.Xml.Serialization;
using Models.Soils;
using Models.Core;
using System;
using Models.PMF.Organs;

        
namespace Models
{
    [Serializable] 
    [System.Xml.Serialization.XmlInclude(typeof(Model))]
    public class Script : Model
    {
        [Link] private ISummary summary;
        [Link] private Fertiliser Fertiliser;
        [Link] private Clock Clock;
        [Link] private Plant SCRUM;
        [Link(ByName = true)]
        private ISolute NO3;
        [Link] private Soils.Soil Soil;
        [Link(Type = LinkType.Path, Path = "[STRUM].Root")]
        private Root root;
        [Link(Type = LinkType.Path, Path = "[STRUM].Phenology")]
        private Phenology phenology;
        [Link]
        private IPhysical soilPhysical;
        //Communication to other modules
       
        //User inputs from properties tab
        [Description("Fertilise (tick for yes)")]
        public bool Fertilise { get; set; }
        [Description("SeasonStart (dd-MMM)")]
        public string Season_Start { get; set; }
        [Description("SeasonEnd (dd-MMM)")]
        public string Season_End { get; set; }
        [Description("Season Allocation (kg/ha)")]
        public double Season_Allocation { get; set; }
        [Description("Mineral N to maintain soil above (kg/ha)")]
        public double TriggerN { get; set; }
        [Description("Amount of N to apply (kg/ha)")]
        public double NApplicationAmount { get; set; }
        [Description("Minimum days for Fertiliser spreader to return")]
        public double Return_days { get; set; }
        [Description("Depth to calculate mineral N (mm)")]
        public double Top_Depth { get; set; }
       
        //Class members
        [JsonIgnore] private bool FertiliserIsAvailable { get; set; }
        [JsonIgnore] public bool SeasonIsOpen { get; set; }
        [JsonIgnore] private bool CropIsActive { get; set; }
        [JsonIgnore] private bool FertSpreaderIsAvailable { get; set; }
        [JsonIgnore] private bool SoilNIsLow { get; set; }
        [JsonIgnore] public double Top_SoilN { get; set; }
        [JsonIgnore] public double Accumulated_depth { get; set; }
        [JsonIgnore] public double Days_since_fertiliser { get; set; }
        [JsonIgnore] public double Season_Application { get; set; }
        
        //Variables for date logic testing
        [JsonIgnore] public string StartString { get; set; }
        [JsonIgnore] public string EndString { get; set; }
        [JsonIgnore] public DateTime StartDate { get; set; }
        [JsonIgnore] public DateTime EndDate { get; set; }
        [JsonIgnore] public int TodayYear { get; set; }
        [JsonIgnore] public int TodayMonth { get; set; }
        [JsonIgnore] public int StartMonth { get; set; }
        [JsonIgnore] public int EndMonth { get; set; }
        [JsonIgnore] public int TodayDay { get; set; }
        [JsonIgnore] public int StartDay { get; set; }
        [JsonIgnore] public int EndDay { get; set; }
              
        //Determine daily requirement for fertiliser
        [EventSubscribe("StartOfDay")]
        private void OnStartOfDay(object sender, EventArgs e)
        { 
            //Can we irrigate?
            FertiliserIsAvailable = false; 
            if (Fertilise)
                FertiliserIsAvailable = true; 
    
            //Are we Allowed to Irrigate?
            TodayYear = Clock.Today.Year;
            StartString = Season_Start + "-" + TodayYear.ToString();
            EndString = Season_End + "-" + TodayYear.ToString();
            StartDate = DateTime.Parse(StartString);
            EndDate = DateTime.Parse(EndString);
            TodayMonth = Clock.Today.Month;
            TodayDay = Clock.Today.Day;
            StartDay = StartDate.Day;
            StartMonth = StartDate.Month;
            EndDay = EndDate.Day;
            EndMonth = EndDate.Month;
          
            SeasonIsOpen = false;
            //if we are in the spring and after the start date then yes
            if ((Clock.Today.Month > 6) && (Clock.Today >= StartDate))
                SeasonIsOpen = true;
            //if we are in the autumn and before the end date then yes
            if ((Clock.Today.Month <= 6) && (Clock.Today <= EndDate))
                SeasonIsOpen = true;
          
            //Is there a crop in the ground that needs irrigation?
            //CropIsActive = false;
            //if ((phenology.Stage >= 3.0) && (phenology.Stage < 6.0))
            CropIsActive = true;
          
            //Is the irrigator available?
            FertSpreaderIsAvailable = false;
            Days_since_fertiliser += 1;
            if (Days_since_fertiliser >= Return_days)
                FertSpreaderIsAvailable = true;
          
            //Is the soil N low enough to require fertiliser?
            SoilNIsLow = false;
            double CurrentRootDepth = 0;
            double RootDepth = root.Depth;
            CurrentRootDepth = Math.Max(RootDepth, CurrentRootDepth);
          
            Accumulated_depth = 0;
            Top_SoilN = 0;
            for (int layer = 0; Accumulated_depth < Top_Depth; layer++)
            {
                Top_SoilN += NO3.kgha[layer];
                Accumulated_depth += soilPhysical.Thickness[layer];
            }
            if (Top_SoilN <= TriggerN)
                SoilNIsLow = true;
                
            //Lets bloody well fertilise then!!!!
            if ((FertiliserIsAvailable) && (SeasonIsOpen) && (CropIsActive) && (FertSpreaderIsAvailable) && (SoilNIsLow)) //The conditions are rife for fertiliser
            {
                Fertiliser.Apply(NApplicationAmount, "UreaN", 10);
                Days_since_fertiliser = 0;
                Season_Application += NApplicationAmount;
                summary.WriteMessage(this, "Automatic Fertiliser", MessageType.Diagnostic);
            
            }
        }
    }
}
```
          Manager MulchResidues
```csharp
using Models.Surface;
using Models.Core;
using Newtonsoft.Json;
using Models.Interfaces;
using APSIM.Shared.Utilities;
using System.Xml.Serialization;
using System;
        
namespace Models
{
    [Serializable] 
    [System.Xml.Serialization.XmlInclude(typeof(Model))]
    public class Script : Model
    {
        [Link] private SurfaceOrganicMatter SurfOM;
        
        //Determine daily requirement for fertiliser
        [EventSubscribe("Pruning")]
        private void OnPrun(object sender, EventArgs e)
        { 
            SurfOM.Incorporate(80,50);
        }
    }
}
```
        ZoneAgregate
        Report ZoneAgregateReport: EventNames=[Clock].DoReport
      Simulation Orchard_LIN
        Memo ReadMe
          * This is a Gold3 orchard
        Clock: Start=2013-06-21; End=2023-05-01
        Summary SummaryFile
        Weather: FileName=WeatherFiles\Paengaroa.met
        MicroClimate: a_interception=0; b_interception=1; c_interception=0; d_interception=0; SoilHeatFluxFraction=0.4; MinimumHeightDiffForNewLayer=0; NightInterceptionFraction=0.5; ReferenceHeight=2
        SoilArbitrator Soil Arbitrator
        Manager AutomaticFertiliser: same as PatternTest.Decidious.AutomaticFertiliser
        Manager ResetDate: same as NZ Kiwifruit Expts.Experiment.Orchard_BAY.ResetDate
        RectangularZone Row: Length=100; Width=1.3; Slope=0; AspectAngle=0; Altitude=50
          Report RowZoneReport: EventNames=[Clock].DoReport
          Report ReportBoth: EventNames=[Clock].DoReport
          SurfaceOrganicMatter: InitialResidueName=wheat_stubble; InitialResidueType=wheat; InitialResidueMass=500; InitialStandingFraction=0; InitialCPR=0; InitialCNR=100
          Plant STRUM
          Fertiliser
          Manager AgrgateZoneVariables
            script: same as in NZ AppleExperiments.Manawatu_1994.Manawatu_94.Row.AgrgateZoneVariables
          Irrigation
          BiomassRemovalEvents Pick: same as NZ Kiwifruit Expts.Experiment.Orchard_BAY.Row.Pick
          BiomassRemovalEvents Prune: same as USA AppleExperiments.Prosser_Apple_Deep.DeepSoil.Row.Prune
          Operations
            2017-12-04  [Irrigation].apply(	1.3	)
            2017-12-07  [Irrigation].apply(	7.6	)
            2017-12-09  [Irrigation].apply(	7.6	)
            2017-12-11  [Irrigation].apply(	7.6	)
            2017-12-13  [Irrigation].apply(	7.5	)
            2017-12-15  [Irrigation].apply(	7.3	)
            2017-12-17  [Irrigation].apply(	7.6	)
            2017-12-19  [Irrigation].apply(	7.5	)
            2017-12-21  [Irrigation].apply(	7.5	)
            2017-12-23  [Irrigation].apply(	7.2	)
            2017-12-25  [Irrigation].apply(	7.5	)
            2017-12-31  [Irrigation].apply(	6.1	)
            2018-01-02  [Irrigation].apply(	5.8	)
            2018-01-30  [Irrigation].apply(	5.3	)
            2018-08-17  [Irrigation].apply(	2.0	)
            2018-10-06  [Irrigation].apply(	6.0	)
            2018-11-21  [Irrigation].apply(	1.7	)
            2018-12-07  [Irrigation].apply(	8.2	)
            2018-12-08  [Irrigation].apply(	0.4	)
            2019-01-07  [Irrigation].apply(	7.2	)
            2019-01-09  [Irrigation].apply(	7.5	)
            2019-01-11  [Irrigation].apply(	7.1	)
            2019-01-13  [Irrigation].apply(	7.2	)
            2019-01-21  [Irrigation].apply(	7.6	)
            2019-01-23  [Irrigation].apply(	7.3	)
            2019-01-25  [Irrigation].apply(	7.5	)
            2019-01-27  [Irrigation].apply(	7.4	)
            2019-01-29  [Irrigation].apply(	8.6	)
            2019-01-30  [Irrigation].apply(	7.5	)
            2019-01-31  [Irrigation].apply(	2.4	)
            2019-02-01  [Irrigation].apply(	7.2	)
            2019-02-03  [Irrigation].apply(	7.4	)
            2019-02-05  [Irrigation].apply(	4.2	)
            2019-02-07  [Irrigation].apply(	4.5	)
            2019-02-09  [Irrigation].apply(	4.3	)
            2019-02-11  [Irrigation].apply(	6.0	)
            2019-02-13  [Irrigation].apply(	5.6	)
            2019-02-15  [Irrigation].apply(	5.1	)
            2019-02-17  [Irrigation].apply(	7.3	)
            2019-02-19  [Irrigation].apply(	7.2	)
            2019-02-20  [Irrigation].apply(	0.1	)
            2019-02-21  [Irrigation].apply(	7.3	)
            2019-02-27  [Irrigation].apply(	4.6	)
            2019-03-01  [Irrigation].apply(	5.3	)
            2019-03-03  [Irrigation].apply(	4.4	)
            2019-03-05  [Irrigation].apply(	4.5	)
            2019-03-07  [Irrigation].apply(	4.5	)
            2019-08-23  [Irrigation].apply(	1.8	)
            2019-10-03  [Irrigation].apply(	7.1	)
            2019-11-05  [Irrigation].apply(	6.1	)
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            2019-11-29  [Irrigation].apply(	5.9	)
            2019-12-11  [Irrigation].apply(	7.9	)
            2019-12-17  [Irrigation].apply(	5.4	)
            2019-12-25  [Irrigation].apply(	5.5	)
            2020-01-01  [Irrigation].apply(	0.2	)
            2020-01-05  [Irrigation].apply(	4.0	)
            2020-01-31  [Irrigation].apply(	10.1)
            2020-02-04  [Irrigation].apply(	5.7	)
            2020-02-05  [Irrigation].apply(	1.2	)
            2020-02-08  [Irrigation].apply(	8.3	)
            2020-02-10  [Irrigation].apply(	8.0	)
            2020-02-12  [Irrigation].apply(	4.9	)
            2020-02-14  [Irrigation].apply(	9.4	)
            2020-02-16  [Irrigation].apply(	9.0	)
            2020-02-17  [Irrigation].apply(	9.3	)
            2020-02-20  [Irrigation].apply(	8.9	)
            2020-02-22  [Irrigation].apply(	8.8	)
            2020-03-02  [Irrigation].apply(	0.6	)
            2020-08-21  [Irrigation].apply(	3.8	)
            2020-09-16  [Irrigation].apply(	0.8	)
            2020-10-17  [Irrigation].apply(	1.5	)
            2020-12-10  [Irrigation].apply(	7.8	)
            2021-01-18  [Irrigation].apply(	5.0	)
            2021-01-22  [Irrigation].apply(	2.7	)
            2021-01-24  [Irrigation].apply(	4.8	)
            2021-03-26  [Irrigation].apply(	10.7)
            2021-09-29  [Irrigation].apply(	2.3	)
            2021-12-09  [Irrigation].apply(	6.2	)
            2021-12-28  [Irrigation].apply(	4.7	)
            2023-08-25  [Irrigation].apply(	1.0	)
            2023-12-20  [Irrigation].apply(	6.4	)
            2023-12-22  [Irrigation].apply(	0.3	)
            2023-12-23  [Irrigation].apply(	6.8	)
            2023-12-26  [Irrigation].apply(	6.7	)
            2024-02-09  [Irrigation].apply(	6.9	)
          Soil: SoilType=Buried-allophanic Orthic Pumice Soils; Latitude=-41; Longitude=174; DataSource=Based on profile descriptions provided by Smap (Oropi_1a1)
            Chemical: PHUnits=Water
              Thickness  PH  CEC
              180        7   15.123
              180        7   8.039
              475        7   5.947
              1165       7   5.599
            Physical
              Thickness  ParticleSizeSand  ParticleSizeSilt  ParticleSizeClay  Rocks  BD     AirDry  LL15   DUL    SAT    KS
              180        57.5              34                8.5               0      0.894  0.082   0.125  0.275  0.566  1920
              180        64                29.5              6.5               0      1.043  0.111   0.111  0.249  0.534  1200
              275        56.5              32                11.5              0      0.96   0.126   0.126  0.276  0.536  1920
              288.3      56.5              32                11.5              0      0.96   0.146   0.146  0.336  0.536  1920
              299.8      54.5              35                10.5              0      0.984  0.162   0.162  0.412  0.557  1440
              388.3      54.5              35                10.5              0      0.984  0.162   0.162  0.392  0.557  1440
              388.3      54.5              35                10.5              0      0.984  0.162   0.162  0.392  0.557  1440
              SoilCrop DEROPAPYSoil: LL=[0.15, 0.111, 0.126, 0.146, 0.162, 0.162, 0.162]; KL=[0.078, 0.078, 0.078, 0.078, 0.078, 0.078, 0.06]; XF=[1, 0.79, 1, 1, 1, 1, 1]
                LL, KL, XF source: Calculated (layer 7)
              SoilCrop SCRUMSoil: same as NZ Kiwifruit Expts.Experiment.Orchard_LIN.Row.Soil.Physical.DEROPAPYSoil
              SoilCrop STRUMSoil: LL=[0.15, 0.111, 0.126, 0.146, 0.162, 0.162, 0.162]; KL=[0.116, 0.077, 0.042, 0.013, 0.005, 0, 0.06]; XF=[1, 1, 1, 1, 1, 1, 1]
                LL, KL, XF source: Calculated (layer 7)
              SoilCrop SPRUMSoil: same as NZ Kiwifruit Expts.Experiment.Orchard_LIN.Row.Soil.Physical.STRUMSoil
            WaterBalance SoilWater: SummerDate=1-oct; SummerU=9; SummerCona=4.4; WinterDate=1-apr; WinterU=4; WinterCona=2; DiffusConst=88; DiffusSlope=35; Salb=0.13; CN2Bare=77; CNRed=37; CNCov=0.8; DischargeWidth=0; CatchmentArea=0; PSIDul=-100
              Thickness  SWCON  KLAT
              180        0.4    0
              180        0.5    0
              475        0.45   0
              1165       0.45   0
            Organic: FOMCNRatio=40; CarbonUnits=Total
              Thickness  Carbon  SoilCNRatio  FBiom  FInert  FOM
              50         6       11           0.079  0.432   124.07
              50         6       11           0.061  0.492   115.105
              50         6       11           0.048  0.543   106.788
              50         4.949   11           0.038  0.596   99.072
              50         3.383   11           0.031  0.651   91.914
              50         2.334   11           0.025  0.699   85.272
              50         1.63    11           0.021  0.743   79.111
              50         1.159   11           0.018  0.781   73.394
              50         0.843   11           0.016  0.816   68.091
              50         0.631   11           0.015  0.847   63.171
              250        0.33    11           0.012  0.918   43.417
              250        0.218   11           0.01   0.977   29.84
              500        0.201   11           0.01   0.991   14.095
              500        0.2     11           0.01   0.996   6.658
            Water: Thickness=[180, 180, 275, 288.3, 299.8, 388.3, 388.3]; InitialValues=[0.275, 0.249, 0.276, 0.336, 0.412, 0.392, 0.392]; InitialPAWmm=401.435; RelativeTo=LL15; FilledFromTop=false
            Solute NO3: Thickness=[180, 180, 475, 1165]; InitialValues=[7.084, 4.067, 0.061, 0.06]; InitialValuesUnits=ppm; WaterTableConcentration=0; D0=0; DepthConstant=0; MaxDepthSoluteAccessible=0; RunoffEffectivenessAtMovingSolute=0; MaxEffectiveRunoff=0
            Solute NH4: Thickness=[180, 180, 475, 1165]; InitialValues=[1.063, 0.61, 0.009, 0.009]; InitialValuesUnits=ppm; WaterTableConcentration=0; D0=0; DepthConstant=0; MaxDepthSoluteAccessible=0; RunoffEffectivenessAtMovingSolute=0; MaxEffectiveRunoff=0
            Solute Urea: Thickness=[180, 180, 475, 1165]; InitialValues=[0, 0, 0, 0]; InitialValuesUnits=kg/ha; WaterTableConcentration=0; D0=0; DepthConstant=0; MaxDepthSoluteAccessible=0; RunoffEffectivenessAtMovingSolute=0; MaxEffectiveRunoff=0
            Nutrient
            LayerStructure: Thickness=[180, 180, 475, 388.3, 388.3, 388.3]
            OutputLayers: Thickness=[400, 400, 400, 400, 200]
            SoilTemperature Temperature
          StrumTreeInstance KiwiFruit: TreeType=Deciduous; RowSpacing=4; InterRowSpacing=4; AlleyZoneWidthFrac=0.1; AgeAtSimulationStart=6; YearsToMaxDimension=6; TrunkMassAtMaxDimension=12; WoodDensity=500; BudBreakDAWS=90; StartFullCanopyDAWS=125; StartLeafFallDAWS=331; EndLeafFallDAWS=365; GRINZ=true; MaxRD=3000; Proot=0.4; Pleaf=0.4; Ptrunk=0.2; CanopyBaseHeight=1850; MaxPrunedHeight=2050; MaxHeight=4000; MaxPrunedWidth=4000; MaxWidth=4000; RootNConc=0.01; LeafNConc=0.02; TrunkNConc=0.01; FruitNConc=0.02; ExtinctCoeff=0.8; BaseCover=0; MaxCover=0.96; RUE=0.92; GSMax=0.009; R50=200; WaterStress=true; Number=960; PotentialFWPerFruit=110; DMC=0.17; FruitDensity=1.02; DateMaxBloom=1-oct; DAFStartLinearGrowth=90; DAFEndLinearGrowth=200; DAFMaxSize=240; TotalSolarRadiation=0
      Simulation Orchard_OPK
        Memo ReadMe
          * This is a Gold3 orchard
        Clock: Start=2013-06-21; End=2022-05-22
        Summary SummaryFile
        Weather: FileName=WeatherFiles\WhakataneAeroAws.met
        MicroClimate: a_interception=0; b_interception=1; c_interception=0; d_interception=0; SoilHeatFluxFraction=0.4; MinimumHeightDiffForNewLayer=0; NightInterceptionFraction=0.5; ReferenceHeight=2
        SoilArbitrator Soil Arbitrator
        Manager AutomaticFertiliser: same as PatternTest.Decidious.AutomaticFertiliser
        Manager ResetDate: same as NZ Kiwifruit Expts.Experiment.Orchard_BAY.ResetDate
        RectangularZone Row: Length=100; Width=1.3; Slope=0; AspectAngle=0; Altitude=50
          Report RowZoneReport: EventNames=[Clock].DoReport
          Report ReportBoth: EventNames=[Clock].DoReport
          SurfaceOrganicMatter: InitialResidueName=wheat_stubble; InitialResidueType=wheat; InitialResidueMass=500; InitialStandingFraction=0; InitialCPR=0; InitialCNR=100
          Plant STRUM
          Fertiliser
          Manager AgrgateZoneVariables
            script: same as in NZ AppleExperiments.Manawatu_1994.Manawatu_94.Row.AgrgateZoneVariables
          Irrigation
          Operations
            2016-12-31  [Irrigation].apply(	3.7	)
            2017-01-02  [Irrigation].apply(	3.8	)
            2017-01-03  [Irrigation].apply(	6.4	)
            2017-01-05  [Irrigation].apply(	3.4	)
            2017-01-07  [Irrigation].apply(	3.5	)
            2017-01-09  [Irrigation].apply(	3.4	)
            2017-01-10  [Irrigation].apply(	3.5	)
            2017-01-12  [Irrigation].apply(	3.6	)
            2017-01-14  [Irrigation].apply(	3.6	)
            2017-01-16  [Irrigation].apply(	3.5	)
            2017-01-17  [Irrigation].apply(	6.1	)
            2017-01-19  [Irrigation].apply(	3.5	)
            2017-01-21  [Irrigation].apply(	3.5	)
            2017-01-28  [Irrigation].apply(	3.4	)
            2017-01-30  [Irrigation].apply(	3.5	)
            2017-02-02  [Irrigation].apply(	3.9	)
            2017-02-04  [Irrigation].apply(	4.0	)
            2017-02-06  [Irrigation].apply(	3.9	)
            2017-02-07  [Irrigation].apply(	6.7	)
            2017-02-09  [Irrigation].apply(	4.0	)
            2017-02-11  [Irrigation].apply(	4.0	)
            2017-02-13  [Irrigation].apply(	4.0	)
            2017-02-14  [Irrigation].apply(	6.6	)
            2017-02-16  [Irrigation].apply(	3.9	)
            2017-06-08  [Irrigation].apply(	0.1	)
            2017-12-01  [Irrigation].apply(	0.6	)
            2017-12-02  [Irrigation].apply(	3.1	)
            2017-12-03  [Irrigation].apply(	0.6	)
            2017-12-04  [Irrigation].apply(	3.0	)
            2017-12-05  [Irrigation].apply(	1.9	)
            2017-12-06  [Irrigation].apply(	3.6	)
            2017-12-09  [Irrigation].apply(	0.3	)
            2017-12-10  [Irrigation].apply(	0.8	)
            2017-12-11  [Irrigation].apply(	3.4	)
            2017-12-12  [Irrigation].apply(	0.7	)
            2017-12-13  [Irrigation].apply(	3.3	)
            2017-12-14  [Irrigation].apply(	7.7	)
            2017-12-15  [Irrigation].apply(	4.3	)
            2017-12-16  [Irrigation].apply(	3.5	)
            2017-12-17  [Irrigation].apply(	0.7	)
            2017-12-18  [Irrigation].apply(	3.3	)
            2017-12-23  [Irrigation].apply(	4.0	)
            2017-12-25  [Irrigation].apply(	3.9	)
            2017-12-27  [Irrigation].apply(	4.0	)
            2017-12-28  [Irrigation].apply(	6.6	)
            2017-12-29  [Irrigation].apply(	3.9	)
            2017-12-30  [Irrigation].apply(	3.7	)
            2018-01-01  [Irrigation].apply(	3.7	)
            2018-01-03  [Irrigation].apply(	3.8	)
            2018-01-15  [Irrigation].apply(	3.8	)
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            2018-02-03  [Irrigation].apply(	3.2	)
            2018-02-08  [Irrigation].apply(	6.0	)
            2019-01-31  [Irrigation].apply(	4.6	)
            2019-02-02  [Irrigation].apply(	0.2	)
            2019-02-04  [Irrigation].apply(	6.3	)
            2019-02-09  [Irrigation].apply(	1.7	)
            2019-02-12  [Irrigation].apply(	6.2	)
            2019-02-13  [Irrigation].apply(	6.5	)
            2019-02-24  [Irrigation].apply(	1.2	)
            2019-11-29  [Irrigation].apply(	1.1	)
            2019-12-07  [Irrigation].apply(	0.4	)
            2020-01-10  [Irrigation].apply(	2.1	)
            2020-01-11  [Irrigation].apply(	1.4	)
            2020-01-17  [Irrigation].apply(	2.0	)
            2020-01-18  [Irrigation].apply(	1.3	)
            2021-02-02  [Irrigation].apply(	2.3	)
            2021-08-30  [Irrigation].apply(	0.0	)
            2021-11-25  [Irrigation].apply(	2.6	)
            2022-01-17  [Irrigation].apply(	4.1	)
          BiomassRemovalEvents Pick: same as NZ Kiwifruit Expts.Experiment.Orchard_BAY.Row.Pick
          BiomassRemovalEvents Prune: same as USA AppleExperiments.Prosser_Apple_Deep.DeepSoil.Row.Prune
          Soil: SoilType=Allophanic Orthic Pumice Soils; Latitude=-41; Longitude=174
            DataSource=Based on profile descriptions provided by Smap (Opotiki_1a1)
            Chemical: PHUnits=Water
              Thickness  PH  CEC
              210        7   15.39
              220        7   7.86369
              275        7   4.0213
              1295       7   4.49567
            Physical
              Thickness  ParticleSizeSand  ParticleSizeSilt  ParticleSizeClay  Rocks  BD     AirDry  LL15   DUL    SAT    KS
              210        55                36                9                 0      0.874  0.085   0.161  0.33   0.4    1920
              220        55                36                9                 0      1.009  0.125   0.137  0.313  0.407  1440
              275        62.5              34                3.5               0      1.026  0.092   0.092  0.32   0.375  1920
              323.8      65                26.5              8.5               0      1.053  0.109   0.109  0.37   0.42   1920
              323.8      65                26.5              8.5               0      1.053  0.119   0.119  0.39   0.51   1920
              323.8      65                26.5              8.5               0      1.053  0.119   0.119  0.39   0.51   1920
              323.8      65                26.5              8.5               0      1.053  0.109   0.109  0.32   0.431  1920
              Rocks source: Calculated
              SoilCrop SCRUMSoil: LL=[0.171, 0.157, 0.092, 0.109, 0.119, 0.119, 0.109]; KL=[0.077, 0.077, 0.077, 0.077, 0.077, 0.077, 0.077]; XF=[1, 1, 1, 1, 1, 1, 1]
              SoilCrop STRUMSoil: LL=[0.171, 0.157, 0.092, 0.109, 0.119, 0.119, 0.109]; KL=[0.112, 0.068, 0.045, 0.023, 0.011, 0.004, 0]; XF=[1, 1, 1, 1, 1, 1, 1]
              SoilCrop SPRUMSoil: same as NZ Kiwifruit Expts.Experiment.Orchard_OPK.Row.Soil.Physical.STRUMSoil
            WaterBalance SoilWater: SummerDate=1-oct; SummerU=9; SummerCona=4.4; WinterDate=1-apr; WinterU=4; WinterCona=2; DiffusConst=88; DiffusSlope=35; Salb=0.13; CN2Bare=77; CNRed=37; CNCov=0.8; DischargeWidth=0; CatchmentArea=0; PSIDul=-100
              Thickness  SWCON  KLAT
              210        0.4    0
              220        0.4    0
              275        0.45   0
              1295       0.3    0
            Organic: FOMCNRatio=40; CarbonUnits=Total
              Thickness  Carbon    SoilCNRatio  FBiom      FInert    FOM
              50         6         11           0.0788566  0.431898  124.07
              50         6         11           0.0610103  0.491926  115.105
              50         6         11           0.0477893  0.542739  106.788
              50         4.94864   11           0.037995   0.5956    99.0722
              50         3.38311   11           0.0307392  0.650815  91.9135
              50         2.3337    11           0.025364   0.69947   85.2722
              50         1.63026   11           0.0213819  0.742644  79.1107
              50         1.15873   11           0.0184319  0.781204  73.3945
              50         0.842658  11           0.0162465  0.815767  68.0912
              50         0.630787  11           0.0146275  0.846679  63.1712
              250        0.32975   11           0.0118814  0.917701  43.4169
              250        0.21756   11           0.0104198  0.97694   29.84
              500        0.200874  11           0.0100442  0.990833  14.0954
              500        0.200016  11           0.0100022  0.996255  6.6582
            Water: Thickness=[210, 220, 275, 323.8, 323.8, 323.8, 323.8]; InitialValues=[0.33, 0.313, 0.32, 0.37, 0.39, 0.39, 0.32]; InitialPAWmm=465.243; RelativeTo=LL15; FilledFromTop=false
            Solute NO3: Thickness=[210, 220, 275, 1295]; InitialValues=[7.24638, 2.60225, 0.0573329, 0.0558628]; InitialValuesUnits=ppm; WaterTableConcentration=0; D0=0; DepthConstant=0; MaxDepthSoluteAccessible=0; RunoffEffectivenessAtMovingSolute=0; MaxEffectiveRunoff=0
            Solute NH4: Thickness=[210, 220, 275, 1295]; InitialValues=[1.087, 0.39, 0.009, 0.008]; InitialValuesUnits=ppm; WaterTableConcentration=0; D0=0; DepthConstant=0; MaxDepthSoluteAccessible=0; RunoffEffectivenessAtMovingSolute=0; MaxEffectiveRunoff=0
            Solute Urea: Thickness=[210, 220, 275, 1295]; InitialValues=[0, 0, 0, 0]; InitialValuesUnits=kg/ha; WaterTableConcentration=0; D0=0; DepthConstant=0; MaxDepthSoluteAccessible=0; RunoffEffectivenessAtMovingSolute=0; MaxEffectiveRunoff=0
            Nutrient
            LayerStructure: Thickness=[210, 220, 275, 323.8, 323.8, 323.8, 323.8]
            OutputLayers: Thickness=[400, 400, 400, 400, 200]
            SoilTemperature Temperature
          StrumTreeInstance KiwiFruit: same as NZ Kiwifruit Expts.Experiment.Orchard_LIN.Row.KiwiFruit
      Simulation Orchard_MAK
        Clock: Start=2012-06-21; End=2020-07-01
        Summary SummaryFile
        Weather: FileName=WeatherFiles\TaurangaAeroEws.met
        MicroClimate: a_interception=0; b_interception=1; c_interception=0; d_interception=0; SoilHeatFluxFraction=0.4; MinimumHeightDiffForNewLayer=0; NightInterceptionFraction=0.5; ReferenceHeight=2
        SoilArbitrator Soil Arbitrator
        Manager AutoIrrigationDeficitBased
          AllowIrrigation = True
          depthPAWC = 3000
          triggerDeficit = 70
          irrigateAmount = 15
          returndays = 3
          IrrigateAlley = False
          script: same as in NZ Kiwifruit Expts.Experiment.Orchard_BAY.AutoIrrigationDeficitBased
        Manager AutomaticFertiliser: same as PatternTest.Decidious.AutomaticFertiliser
        Manager ResetDate: same as NZ Kiwifruit Expts.Experiment.Orchard_BAY.ResetDate
        RectangularZone Row: Length=100; Width=1.3; Slope=0; AspectAngle=0; Altitude=50
          Report RowZoneReport: EventNames=[Clock].DoReport
          Report ReportBoth: EventNames=[Clock].DoReport
          SurfaceOrganicMatter: InitialResidueName=wheat_stubble; InitialResidueType=wheat; InitialResidueMass=500; InitialStandingFraction=0; InitialCPR=0; InitialCNR=100
          Plant STRUM
          Fertiliser
          Manager AgrgateZoneVariables
            script: same as in NZ AppleExperiments.Manawatu_1994.Manawatu_94.Row.AgrgateZoneVariables
          Irrigation
          BiomassRemovalEvents Pick: same as NZ Kiwifruit Expts.Experiment.Orchard_BAY.Row.Pick
          BiomassRemovalEvents Prune: same as USA AppleExperiments.Prosser_Apple_Deep.DeepSoil.Row.Prune
          Soil: SoilType=Buried-allophanic Orthic Pumice Soils; Latitude=-41; Longitude=174; DataSource=Based on profile descriptions provided by Smap (Oropi_1a1)
            Chemical: PHUnits=Water
              Thickness  PH  CEC
              180        7   15.1225
              180        7   8.03879
              475        7   5.94674
              1165       7   5.5989
            Physical
              Thickness  ParticleSizeSand  ParticleSizeSilt  ParticleSizeClay  Rocks  BD     AirDry  LL15   DUL    SAT    KS
              180        57.5              34                8.5               0      0.894  0.082   0.165  0.395  0.591  1920
              180        64                29.5              6.5               0      1.043  0.074   0.111  0.299  0.534  1200
              475        56.5              32                11.5              0      0.96   0.16    0.16   0.361  0.566  1920
              388.3      54.5              35                10.5              0      0.984  0.162   0.162  0.392  0.557  1440
              388.3      54.5              35                10.5              0      0.984  0.162   0.162  0.392  0.557  1440
              388.3      54.5              35                10.5              0      0.984  0.162   0.162  0.392  0.557  1440
              Rocks source: Calculated
              SoilCrop BarleySoil: LL=[0.165, 0.111, 0.16, 0.162, 0.162, 0.162]; KL=[0.116, 0.077, 0.042, 0.013, 0.005, 0]; XF=[1, 1, 1, 1, 1, 1]
              SoilCrop CanolaSoil: LL=[0.165, 0.111, 0.16, 0.162, 0.162, 0.162]; KL=[0.113, 0.068, 0.031, 0.008, 0.002, 0]; XF=[1, 0.49, 1, 1, 1, 1]
              SoilCrop ChickpeaSoil: LL=[0.165, 0.111, 0.16, 0.162, 0.162, 0.162]; KL=[0.12, 0.056, 0.016, 0.002, 0, 0]; XF=[1, 1, 1, 1, 1, 1]
              SoilCrop ChicorySoil: LL=[0.165, 0.111, 0.16, 0.162, 0.162, 0.162]; KL=[0.087, 0.068, 0.052, 0.025, 0.015, 0.009]; XF=[1, 1, 1, 1, 1, 1]
              SoilCrop FababeanSoil: LL=[0.165, 0.111, 0.16, 0.162, 0.162, 0.162]; KL=[0.143, 0.058, 0.013, 0, 0, 0]; XF=[1, 0.49, 1, 0, 0, 0]
              SoilCrop FieldpeaSoil: LL=[0.165, 0.111, 0.16, 0.162, 0.162, 0.162]; KL=[0.143, 0.058, 0.013, 0, 0, 0]; XF=[1, 0.25, 1, 0, 0, 0]
              SoilCrop FodderBeetSoil: LL=[0.165, 0.111, 0.16, 0.162, 0.162, 0.162]; KL=[0.093, 0.065, 0.04, 0.014, 0.007, 0.002]; XF=[1, 0.64, 1, 1, 1, 1]
              SoilCrop GrapevineSoil: LL=[0.165, 0.111, 0.16, 0.162, 0.162, 0.162]; KL=[0.068, 0.057, 0.047, 0.026, 0.017, 0.012]; XF=[1, 0.479, 1, 1, 1, 1]
              SoilCrop ItalianRyegrassSoil: LL=[0.165, 0.111, 0.16, 0.162, 0.162, 0.162]; KL=[0.174, 0.059, 0.01, 0, 0, 0]; XF=[1, 0.49, 1, 0, 0, 0]
              SoilCrop KaleSoil: LL=[0.165, 0.111, 0.16, 0.162, 0.162, 0.162]; KL=[0.106, 0.07, 0.038, 0.012, 0.005, 0]; XF=[1, 0.64, 1, 1, 1, 1]
              SoilCrop LucerneSoil: LL=[0.165, 0.111, 0.16, 0.162, 0.162, 0.162]; KL=[0.086, 0.069, 0.053, 0.027, 0.016, 0.01]; XF=[1, 1, 1, 1, 1, 1]
              SoilCrop MaizeSoil: LL=[0.165, 0.111, 0.16, 0.162, 0.162, 0.162]; KL=[0.103, 0.072, 0.043, 0.016, 0.007, 0.002]; XF=[1, 0.64, 1, 1, 1, 1]
              SoilCrop OatsSoil: LL=[0.165, 0.111, 0.16, 0.162, 0.162, 0.162]; KL=[0.106, 0.07, 0.038, 0.012, 0.005, 0]; XF=[1, 0.79, 1, 1, 1, 1]
              SoilCrop PlantainForageSoil: LL=[0.165, 0.111, 0.16, 0.162, 0.162, 0.162]; KL=[0.106, 0.07, 0.038, 0.012, 0.005, 0]; XF=[1, 1, 1, 1, 1, 1]
              SoilCrop PotatoSoil: LL=[0.165, 0.111, 0.16, 0.162, 0.162, 0.162]; KL=[0.114, 0.043, 0.008, 0, 0, 0]; XF=[1, 0.25, 1, 0, 0, 0]
              SoilCrop RedCloverSoil: LL=[0.165, 0.111, 0.16, 0.162, 0.162, 0.162]; KL=[0.09, 0.067, 0.045, 0.019, 0.01, 0.005]; XF=[1, 1, 1, 1, 1, 1]
              SoilCrop AGPRyegrassSoil: LL=[0.165, 0.111, 0.16, 0.162, 0.162, 0.162]; KL=[0.114, 0.056, 0.018, 0.003, 0, 0]; XF=[1, 0.49, 1, 1, 1, 1]
              SoilCrop SoybeanSoil: LL=[0.165, 0.111, 0.16, 0.162, 0.162, 0.162]; KL=[0.108, 0.059, 0.023, 0.005, 0, 0]; XF=[1, 0.49, 1, 1, 1, 1]
              SoilCrop TriticaleSoil: LL=[0.165, 0.111, 0.16, 0.162, 0.162, 0.162]; KL=[0.106, 0.07, 0.038, 0.012, 0.005, 0]; XF=[1, 0.79, 1, 1, 1, 1]
              SoilCrop WheatSoil: LL=[0.165, 0.111, 0.16, 0.162, 0.162, 0.162]; KL=[0.114, 0.077, 0.045, 0.015, 0.007, 0]; XF=[1, 0.64, 1, 1, 1, 1]
              SoilCrop WhitecloverSoil: LL=[0.165, 0.111, 0.16, 0.162, 0.162, 0.162]; KL=[0.123, 0.037, 0.005, 0, 0, 0]; XF=[1, 0.298, 1, 0, 0, 0]
              SoilCrop AgPRyegrassSoil: LL=[0.165, 0.111, 0.16, 0.162, 0.162, 0.162]; KL=[0.105, 0.051, 0.016, 0.003, 0, 0]; XF=[1, 0.49, 1, 1, 1, 1]
              SoilCrop AgPWhiteCloverSoil: LL=[0.165, 0.111, 0.16, 0.162, 0.162, 0.162]; KL=[0.138, 0.029, 0.008, 0, 0, 0]; XF=[1, 0.391, 1, 0, 0, 0]
              SoilCrop AgPPaspalumSoil: LL=[0.165, 0.111, 0.16, 0.162, 0.162, 0.162]; KL=[0.089, 0.053, 0.024, 0.006, 0, 0]; XF=[1, 0.766, 1, 1, 1, 1]
              SoilCrop DEROPAPYSoil: LL=[0.165, 0.111, 0.16, 0.162, 0.162, 0.162]; KL=[0.078, 0.078, 0.078, 0.078, 0.078, 0.078]; XF=[1, 0.79, 1, 1, 1, 1]
              SoilCrop SCRUMSoil: LL=[0.165, 0.111, 0.16, 0.162, 0.162, 0.162]; KL=[0.078, 0.078, 0.078, 0.078, 0.078, 0.078]; XF=[1, 0.79, 1, 1, 1, 1]
              SoilCrop STRUMSoil: LL=[0.165, 0.111, 0.16, 0.162, 0.162, 0.162]; KL=[0.116, 0.077, 0.042, 0.013, 0.005, 0]; XF=[1, 1, 1, 1, 1, 1]
              SoilCrop SPRUMSoil: LL=[0.165, 0.111, 0.16, 0.162, 0.162, 0.162]; KL=[0.116, 0.077, 0.042, 0.013, 0.005, 0]; XF=[1, 1, 1, 1, 1, 1]
            WaterBalance SoilWater: SummerDate=1-oct; SummerU=9; SummerCona=4.4; WinterDate=1-apr; WinterU=4; WinterCona=2; DiffusConst=88; DiffusSlope=35; Salb=0.13; CN2Bare=77; CNRed=37; CNCov=0.8; DischargeWidth=0; CatchmentArea=0; PSIDul=-100
              Thickness  SWCON  KLAT
              180        0.4    0
              180        0.5    0
              475        0.3    0
              1165       0.4    0
            Organic: same as NZ Kiwifruit Expts.Experiment.Orchard_OPK.Row.Soil.Organic
            Water: Thickness=[180, 180, 475, 388.3, 388.3, 388.3]; InitialValues=[0.372, 0.28, 0.341, 0.369, 0.369, 0.369]; InitialPAWmm=394.7893; RelativeTo=LL15; FilledFromTop=false
            Solute NO3: Thickness=[180, 180, 475, 1165]; InitialValues=[7.08427, 4.06695, 0.0612745, 0.0598607]; InitialValuesUnits=ppm; WaterTableConcentration=0; D0=0; DepthConstant=0; MaxDepthSoluteAccessible=0; RunoffEffectivenessAtMovingSolute=0; MaxEffectiveRunoff=0
            Solute NH4: Thickness=[180, 180, 475, 1165]; InitialValues=[1.06264, 0.610043, 0.00919118, 0.0089834]; InitialValuesUnits=ppm; WaterTableConcentration=0; D0=0; DepthConstant=0; MaxDepthSoluteAccessible=0; RunoffEffectivenessAtMovingSolute=0; MaxEffectiveRunoff=0
            Solute Urea: same as NZ Kiwifruit Expts.Experiment.Orchard_LIN.Row.Soil.Urea
            Nutrient
            LayerStructure: Thickness=[180, 180, 475, 388.3, 388.3, 388.3]
            OutputLayers: Thickness=[400, 400, 400, 400, 200]
            SoilTemperature Temperature
          StrumTreeInstance KiwiFruit: same as NZ Kiwifruit Expts.Experiment.Orchard_BAY.Row.KiwiFruit
      Simulation Orchard_PYE
        Clock: Start=2012-06-21; End=2020-07-01
        Summary SummaryFile
        Weather: FileName=WeatherFiles\TaurangaAeroEws.met
        MicroClimate: a_interception=0; b_interception=1; c_interception=0; d_interception=0; SoilHeatFluxFraction=0.4; MinimumHeightDiffForNewLayer=0; NightInterceptionFraction=0.5; ReferenceHeight=2
        SoilArbitrator Soil Arbitrator
        Manager AutoIrrigationDeficitBased
          AllowIrrigation = True
          depthPAWC = 3000
          triggerDeficit = 50
          irrigateAmount = 15
          returndays = 3
          IrrigateAlley = False
          script: same as in NZ Kiwifruit Expts.Experiment.Orchard_BAY.AutoIrrigationDeficitBased
        Manager AutomaticFertiliser (disabled)
          AllowFertiliser = yes
          Depth2SoilN = 1500
          CriticalSoilN = 30
          FertNAmount = 50
          FertType = UreaN
          FertApplicationDepth = 10
          FertMinimumDays = 15
          script: same as in PatternTest.Decidious.AutomaticFertiliser
        Manager ResetDate: same as NZ Kiwifruit Expts.Experiment.Orchard_BAY.ResetDate
        RectangularZone Row: Length=100; Width=1.3; Slope=0; AspectAngle=0; Altitude=50
          Report RowZoneReport: EventNames=[Clock].DoReport
          Report ReportBoth: EventNames=[Clock].DoReport
          SurfaceOrganicMatter: InitialResidueName=wheat_stubble; InitialResidueType=wheat; InitialResidueMass=1500; InitialStandingFraction=0; InitialCPR=0; InitialCNR=80
          Plant STRUM
          Fertiliser
          Manager AgrgateZoneVariables
            script: same as in NZ AppleExperiments.Manawatu_1994.Manawatu_94.Row.AgrgateZoneVariables
          Irrigation
          BiomassRemovalEvents Pick: same as NZ Kiwifruit Expts.Experiment.Orchard_BAY.Row.Pick
          BiomassRemovalEvents Prune: same as USA AppleExperiments.Prosser_Apple_Deep.DeepSoil.Row.Prune
          Soil: SoilType=Typic Orthic Allophanic Soils; Latitude=-41; Longitude=174
            DataSource=Based on profile descriptions provided by Smap (Ngakura_2a1)
            Chemical: PHUnits=Water
              Thickness  PH  CEC
              200        7   14.3185
              725        7   6.37144
              1075       7   6.99978
            Physical
              Thickness  ParticleSizeSand  ParticleSizeSilt  ParticleSizeClay  Rocks  BD     AirDry  LL15   DUL    SAT    KS
              200        69.5              22                8.5               0      0.744  0.096   0.192  0.429  0.648  1920
              362.5      56                31                13                0.376  0.589  0.157   0.183  0.317  0.451  1440
              362.5      56                31                13                0.376  0.589  0.183   0.183  0.317  0.451  1440
              358.3      51.5              32                16.5              0.107  0.802  0.264   0.264  0.46   0.579  1440
              358.3      51.5              32                16.5              0.107  0.802  0.264   0.264  0.46   0.579  1440
              358.3      51.5              32                16.5              0.107  0.802  0.264   0.264  0.46   0.579  1440
              Rocks source: Calculated
              SoilCrop BarleySoil: LL=[0.192, 0.183, 0.183, 0.264, 0.264, 0.264]; KL=[0.113, 0.059, 0.026, 0.011, 0.005, 0]; XF=[1, 1, 1, 1, 1, 1]
              SoilCrop CanolaSoil: LL=[0.192, 0.183, 0.183, 0.264, 0.264, 0.264]; KL=[0.11, 0.049, 0.017, 0.006, 0, 0]; XF=[1, 1, 1, 1, 1, 1]
              SoilCrop ChickpeaSoil: LL=[0.192, 0.183, 0.183, 0.264, 0.264, 0.264]; KL=[0.115, 0.034, 0.007, 0, 0, 0]; XF=[1, 1, 1, 1, 1, 1]
              SoilCrop ChicorySoil: LL=[0.192, 0.183, 0.183, 0.264, 0.264, 0.264]; KL=[0.085, 0.059, 0.037, 0.023, 0.014, 0.009]; XF=[1, 1, 1, 1, 1, 1]
              SoilCrop FababeanSoil: LL=[0.192, 0.183, 0.183, 0.264, 0.264, 0.264]; KL=[0.136, 0.033, 0.005, 0, 0, 0]; XF=[1, 1, 1, 1, 1, 1]
              SoilCrop FieldpeaSoil: LL=[0.192, 0.183, 0.183, 0.264, 0.264, 0.264]; KL=[0.136, 0.033, 0.005, 0, 0, 0]; XF=[1, 0.81, 0.81, 0.81, 0.81, 0.81]
              SoilCrop FodderBeetSoil: LL=[0.192, 0.183, 0.183, 0.264, 0.264, 0.264]; KL=[0.092, 0.052, 0.025, 0.012, 0.006, 0.002]; XF=[1, 1, 1, 1, 1, 1]
              SoilCrop GrapevineSoil: LL=[0.192, 0.183, 0.183, 0.264, 0.264, 0.264]; KL=[0.068, 0.05, 0.035, 0.024, 0.016, 0.011]; XF=[1, 1, 1, 1, 1, 1]
              SoilCrop ItalianRyegrassSoil: LL=[0.192, 0.183, 0.183, 0.264, 0.264, 0.264]; KL=[0.164, 0.03, 0.005, 0, 0, 0]; XF=[1, 1, 1, 1, 1, 1]
              SoilCrop KaleSoil: LL=[0.192, 0.183, 0.183, 0.264, 0.264, 0.264]; KL=[0.104, 0.054, 0.024, 0.01, 0.004, 0]; XF=[1, 1, 1, 1, 1, 1]
              SoilCrop LucerneSoil: LL=[0.192, 0.183, 0.183, 0.264, 0.264, 0.264]; KL=[0.085, 0.06, 0.038, 0.024, 0.015, 0.01]; XF=[1, 1, 1, 1, 1, 1]
              SoilCrop MaizeSoil: LL=[0.192, 0.183, 0.183, 0.264, 0.264, 0.264]; KL=[0.101, 0.057, 0.028, 0.014, 0.007, 0.002]; XF=[1, 1, 1, 1, 1, 1]
              SoilCrop OatsSoil: LL=[0.192, 0.183, 0.183, 0.264, 0.264, 0.264]; KL=[0.104, 0.054, 0.024, 0.01, 0.004, 0]; XF=[1, 1, 1, 1, 1, 1]
              SoilCrop PlantainForageSoil: LL=[0.192, 0.183, 0.183, 0.264, 0.264, 0.264]; KL=[0.104, 0.054, 0.024, 0.01, 0.004, 0]; XF=[1, 1, 1, 1, 1, 1]
              SoilCrop PotatoSoil: LL=[0.192, 0.183, 0.183, 0.264, 0.264, 0.264]; KL=[0.108, 0.023, 0.004, 0, 0, 0]; XF=[1, 0.81, 0.81, 0.81, 0.81, 0.81]
              SoilCrop RedCloverSoil: LL=[0.192, 0.183, 0.183, 0.264, 0.264, 0.264]; KL=[0.089, 0.055, 0.03, 0.017, 0.009, 0.005]; XF=[1, 1, 1, 1, 1, 1]
              SoilCrop AGPRyegrassSoil: LL=[0.192, 0.183, 0.183, 0.264, 0.264, 0.264]; KL=[0.11, 0.036, 0.008, 0, 0, 0]; XF=[1, 1, 1, 1, 1, 1]
              SoilCrop SoybeanSoil: LL=[0.192, 0.183, 0.183, 0.264, 0.264, 0.264]; KL=[0.105, 0.041, 0.012, 0.003, 0, 0]; XF=[1, 1, 1, 1, 1, 1]
              SoilCrop TriticaleSoil: LL=[0.192, 0.183, 0.183, 0.264, 0.264, 0.264]; KL=[0.104, 0.054, 0.024, 0.01, 0.004, 0]; XF=[1, 1, 1, 1, 1, 1]
              SoilCrop WheatSoil: LL=[0.192, 0.183, 0.183, 0.264, 0.264, 0.264]; KL=[0.112, 0.061, 0.028, 0.013, 0.006, 0]; XF=[1, 1, 1, 1, 1, 1]
              SoilCrop WhitecloverSoil: LL=[0.192, 0.183, 0.183, 0.264, 0.264, 0.264]; KL=[0.115, 0.018, 0.003, 0, 0, 0]; XF=[1, 0.826, 0.826, 0.826, 0.826, 0.826]
              SoilCrop AgPRyegrassSoil: LL=[0.192, 0.183, 0.183, 0.264, 0.264, 0.264]; KL=[0.101, 0.033, 0.008, 0, 0, 0]; XF=[1, 1, 1, 1, 1, 1]
              SoilCrop AgPWhiteCloverSoil: LL=[0.192, 0.183, 0.183, 0.264, 0.264, 0.264]; KL=[0.127, 0.011, 0, 0, 0, 0]; XF=[1, 1, 1, 0, 0, 0]
              SoilCrop AgPPaspalumSoil: LL=[0.192, 0.183, 0.183, 0.264, 0.264, 0.264]; KL=[0.087, 0.039, 0.014, 0.005, 0, 0]; XF=[1, 1, 1, 1, 1, 1]
              SoilCrop DEROPAPYSoil: LL=[0.192, 0.183, 0.183, 0.264, 0.264, 0.264]; KL=[0.077, 0.077, 0.077, 0.077, 0.077, 0.077]; XF=[1, 1, 1, 1, 1, 1]
              SoilCrop SCRUMSoil: LL=[0.192, 0.183, 0.183, 0.264, 0.264, 0.264]; KL=[0.077, 0.077, 0.077, 0.077, 0.077, 0.077]; XF=[1, 1, 1, 1, 1, 1]
              SoilCrop STRUMSoil: LL=[0.192, 0.183, 0.183, 0.264, 0.264, 0.264]; KL=[0.113, 0.059, 0.026, 0.011, 0.005, 0]; XF=[1, 1, 1, 1, 1, 1]
              SoilCrop SPRUMSoil: LL=[0.192, 0.183, 0.183, 0.264, 0.264, 0.264]; KL=[0.113, 0.059, 0.026, 0.011, 0.005, 0]; XF=[1, 1, 1, 1, 1, 1]
            WaterBalance SoilWater: SummerDate=1-oct; SummerU=9; SummerCona=4.4; WinterDate=1-apr; WinterU=4; WinterCona=2; DiffusConst=88; DiffusSlope=35; Salb=0.13; CN2Bare=77; CNRed=37; CNCov=0.8; DischargeWidth=0; CatchmentArea=0; PSIDul=-100
              Thickness  SWCON  KLAT
              200        0.4    0
              725        0.4    0
              1075       0.4    0
            Organic: same as NZ Kiwifruit Expts.Experiment.Orchard_BAY.Row.Soil.Organic
            Water: Thickness=[200, 362.5, 362.5, 358.3, 358.3, 358.3]; InitialValues=[0.405, 0.304, 0.304, 0.44, 0.44, 0.44]; InitialPAWmm=319.507; RelativeTo=LL15; FilledFromTop=false
            Solute NO3: Thickness=[200, 725, 1075]; InitialValues=[8.51254, 1.56922, 0.0734322]; InitialValuesUnits=ppm; WaterTableConcentration=0; D0=0; DepthConstant=0; MaxDepthSoluteAccessible=0; RunoffEffectivenessAtMovingSolute=0; MaxEffectiveRunoff=0
            Solute NH4: Thickness=[200, 725, 1075]; InitialValues=[1.27688, 0.235384, 0.0110195]; InitialValuesUnits=ppm; WaterTableConcentration=0; D0=0; DepthConstant=0; MaxDepthSoluteAccessible=0; RunoffEffectivenessAtMovingSolute=0; MaxEffectiveRunoff=0
            Solute Urea: Thickness=[200, 725, 1075]; InitialValues=[0, 0, 0]; InitialValuesUnits=kg/ha; WaterTableConcentration=0; D0=0; DepthConstant=0; MaxDepthSoluteAccessible=0; RunoffEffectivenessAtMovingSolute=0; MaxEffectiveRunoff=0
            Nutrient
            LayerStructure: Thickness=[200, 362.5, 362.5, 358.3, 358.3, 358.3]
            OutputLayers: Thickness=[400, 400, 400, 400, 200]
            SoilTemperature Temperature
          StrumTreeInstance KiwiFruit: same as NZ Kiwifruit Expts.Experiment.Orchard_BAY.Row.KiwiFruit
      Simulation Orchard_OCR
        Clock: Start=2012-06-21; End=2020-07-01
        Summary SummaryFile
        Weather: FileName=WeatherFiles\TaurangaAeroEws.met
        MicroClimate: a_interception=0; b_interception=1; c_interception=0; d_interception=0; SoilHeatFluxFraction=0.4; MinimumHeightDiffForNewLayer=0; NightInterceptionFraction=0.5; ReferenceHeight=2
        SoilArbitrator Soil Arbitrator
        Manager AutoIrrigationDeficitBased: same as NZ Kiwifruit Expts.Experiment.Orchard_BAY.AutoIrrigationDeficitBased
        Manager AutomaticFertiliser: same as PatternTest.Decidious.AutomaticFertiliser
        Manager ResetDate: same as NZ Kiwifruit Expts.Experiment.Orchard_BAY.ResetDate
        RectangularZone Row: Length=100; Width=1.3; Slope=0; AspectAngle=0; Altitude=50
          Report RowZoneReport: EventNames=[Clock].DoReport
          Report ReportBoth: EventNames=[Clock].DoReport
          SurfaceOrganicMatter: InitialResidueName=wheat_stubble; InitialResidueType=wheat; InitialResidueMass=500; InitialStandingFraction=0; InitialCPR=0; InitialCNR=100
          Plant STRUM
          Fertiliser
          Manager AgrgateZoneVariables
            script: same as in NZ AppleExperiments.Manawatu_1994.Manawatu_94.Row.AgrgateZoneVariables
          Irrigation
          BiomassRemovalEvents Pick: same as NZ Kiwifruit Expts.Experiment.Orchard_BAY.Row.Pick
          BiomassRemovalEvents Prune: same as USA AppleExperiments.Prosser_Apple_Deep.DeepSoil.Row.Prune
          Soil: SoilType=Typic Orthic Pumice Soils; Latitude=-41; Longitude=174
            DataSource=Based on profile descriptions provided by Smap (Turangi_8a1)
            Chemical: PHUnits=Water
              Thickness  PH  CEC
              150        7   12.915
              125        7   9.26612
              100        7   4.38429
              300        7   3.29409
              1325       7   1.88826
            Physical
              Thickness  ParticleSizeSand  ParticleSizeSilt  ParticleSizeClay  Rocks  BD     AirDry  LL15   DUL    SAT    KS
              150        80                15                5                 0      1.129  0.036   0.072  0.244  0.502  3600
              125        75                20                5                 0      1.146  0.037   0.075  0.229  0.495  1920
              100        87.5              9.5               3                 0      1.153  0.015   0.017  0.116  0.492  2400
              300        80                15                5                 0      1.198  0.053   0.053  0.204  0.475  1920
              331.3      87.5              9.5               3                 0      1.183  0.015   0.015  0.134  0.481  2400
              331.3      87.5              9.5               3                 0      1.183  0.015   0.015  0.134  0.481  2400
              331.3      87.5              9.5               3                 0      1.183  0.015   0.015  0.134  0.481  2400
              331.3      87.5              9.5               3                 0      1.183  0.015   0.015  0.134  0.48   2400
              Rocks source: Calculated
              SoilCrop BarleySoil: LL=[0.072, 0.075, 0.017, 0.053, 0.015, 0.015, 0.015, 0.015]; KL=[0.14, 0.102, 0.079, 0.05, 0.024, 0.011, 0.004, 0]; XF=[1, 1, 1, 1, 1, 1, 1, 1]
              SoilCrop CanolaSoil
                LL=[0.072, 0.075, 0.017, 0.053, 0.015, 0.015, 0.015, 0.015]
                KL=[0.137564, 0.0928732, 0.0673435, 0.0380301, 0.0154332, 0.00598915, 0, 0]
                XF=[1, 1, 1, 1, 1, 1, 1, 1]
              SoilCrop ChickpeaSoil
                LL=[0.072, 0.075, 0.017, 0.053, 0.015, 0.015, 0.015, 0.015]
                KL=[0.149508, 0.0829358, 0.0512095, 0.0217319, 0.00561811, 0, 0, 0]
                XF=[1, 1, 1, 1, 1, 1, 1, 1]
              SoilCrop ChicorySoil
                LL=[0.072, 0.075, 0.017, 0.053, 0.015, 0.015, 0.015, 0.015]
                KL=[0.102995, 0.0860849, 0.074336, 0.0572671, 0.0379401, 0.0246279, 0.0159865, 0.0103773]
                XF=[1, 1, 1, 1, 1, 1, 1, 1]
              SoilCrop FababeanSoil
                LL=[0.072, 0.075, 0.017, 0.053, 0.015, 0.015, 0.015, 0.015]
                KL=[0.179819, 0.0904185, 0.0515189, 0.0189527, 0.00447632, 0, 0, 0]
                XF=[1, 1, 1, 1, 1, 1, 1, 1]
              SoilCrop FieldpeaSoil: same as NZ Kiwifruit Expts.Experiment.Orchard_OCR.Row.Soil.Physical.FababeanSoil
              SoilCrop FodderBeetSoil
                LL=[0.072, 0.075, 0.017, 0.053, 0.015, 0.015, 0.015, 0.015]
                KL=[0.112352, 0.0853396, 0.0681451, 0.045679, 0.0242967, 0.0125252, 0.00645683, 0.00231797]
                XF=[1, 1, 1, 1, 1, 1, 1, 1]
              SoilCrop GrapevineSoil
                LL=[0.072, 0.075, 0.017, 0.053, 0.015, 0.015, 0.015, 0.015]
                KL=[0.0808132, 0.0700983, 0.0623972, 0.0507354, 0.0366015, 0.025981, 0.0184422, 0.0130909]
                XF=[1, 1, 1, 1, 1, 1, 1, 1]
              SoilCrop ItalianRyegrassSoil
                LL=[0.072, 0.075, 0.017, 0.053, 0.015, 0.015, 0.015, 0.015]
                KL=[0.222285, 0.0974131, 0.0495985, 0.0149388, 0.00303683, 0, 0, 0]
                XF=[1, 1, 1, 1, 1, 1, 1, 1]
              SoilCrop KaleSoil
                LL=[0.072, 0.075, 0.017, 0.053, 0.015, 0.015, 0.015, 0.015]
                KL=[0.128433, 0.0935132, 0.0721313, 0.0454653, 0.0219447, 0.0102163, 0.00348536, 0]
                XF=[1, 1, 1, 1, 1, 1, 1, 1]
              SoilCrop LucerneSoil
                LL=[0.072, 0.075, 0.017, 0.053, 0.015, 0.015, 0.015, 0.015]
                KL=[0.102298, 0.0861434, 0.0748427, 0.0582876, 0.0392844, 0.0259637, 0.0171599, 0.0113413]
                XF=[1, 1, 1, 1, 1, 1, 1, 1]
              SoilCrop MaizeSoil
                LL=[0.072, 0.075, 0.017, 0.053, 0.015, 0.015, 0.015, 0.015]
                KL=[0.123587, 0.0938736, 0.0749596, 0.0502469, 0.0267263, 0.0137777, 0.00710252, 0.00254977]
                XF=[1, 1, 1, 1, 1, 1, 1, 1]
              SoilCrop OatsSoil: same as NZ Kiwifruit Expts.Experiment.Orchard_OCR.Row.Soil.Physical.KaleSoil
              SoilCrop PlantainForageSoil: same as NZ Kiwifruit Expts.Experiment.Orchard_OCR.Row.Soil.Physical.KaleSoil
              SoilCrop PotatoSoil
                LL=[0.072, 0.075, 0.017, 0.053, 0.015, 0.015, 0.015, 0.015]
                KL=[0.144899, 0.0684456, 0.037055, 0.0124472, 0.00274606, 0, 0, 0]
                XF=[1, 1, 1, 1, 1, 1, 1, 1]
              SoilCrop RedCloverSoil
                LL=[0.072, 0.075, 0.017, 0.053, 0.015, 0.015, 0.015, 0.015]
                KL=[0.107767, 0.0856959, 0.0710444, 0.0509056, 0.0300809, 0.0173176, 0.00996975, 0.0057396]
                XF=[1, 1, 1, 1, 1, 1, 1, 1]
              SoilCrop AGPRyegrassSoil
                LL=[0.072, 0.075, 0.017, 0.053, 0.015, 0.015, 0.015, 0.015]
                KL=[0.141735, 0.0817741, 0.0521415, 0.0234287, 0.00662838, 0, 0, 0]
                XF=[1, 1, 1, 1, 1, 1, 1, 1]
              SoilCrop SoybeanSoil
                LL=[0.072, 0.075, 0.017, 0.053, 0.015, 0.015, 0.015, 0.015]
                KL=[0.132728, 0.0839291, 0.0576836, 0.0296157, 0.0103412, 0.00297673, 0, 0]
                XF=[1, 1, 1, 1, 1, 1, 1, 1]
              SoilCrop TriticaleSoil: same as NZ Kiwifruit Expts.Experiment.Orchard_OCR.Row.Soil.Physical.KaleSoil
              SoilCrop WheatSoil
                LL=[0.072, 0.075, 0.017, 0.053, 0.015, 0.015, 0.015, 0.015]
                KL=[0.137252, 0.102225, 0.0803268, 0.052328, 0.0266061, 0.0130816, 0.00643198, 0]
                XF=[1, 1, 1, 1, 1, 1, 1, 1]
              SoilCrop WhitecloverSoil: LL=[0.072, 0.075, 0.017, 0.053, 0.015, 0.015, 0.015, 0.015]; KL=[0.158689, 0.0634519, 0.0299726, 0.00790068, 0, 0, 0, 0]; XF=[1, 1, 1, 1, 0, 0, 0, 0]
              SoilCrop AgPRyegrassSoil
                LL=[0.072, 0.075, 0.017, 0.053, 0.015, 0.015, 0.015, 0.015]
                KL=[0.129924, 0.0749596, 0.0477963, 0.0214763, 0.00607601, 0, 0, 0]
                XF=[1, 1, 1, 1, 1, 1, 1, 1]
              SoilCrop AgPWhiteCloverSoil: LL=[0.072, 0.075, 0.017, 0.053, 0.015, 0.015, 0.015, 0.015]; KL=[0.183059, 0.0563304, 0.0214763, 0.00699524, 0, 0, 0, 0]; XF=[1, 1, 1, 1, 0, 0, 0, 0]
              SoilCrop AgPPaspalumSoil
                LL=[0.072, 0.075, 0.017, 0.053, 0.015, 0.015, 0.015, 0.015]
                KL=[0.10841, 0.0731906, 0.0530714, 0.0299704, 0.0121624, 0.00471987, 0, 0]
                XF=[1, 1, 1, 1, 1, 1, 1, 1]
              SoilCrop DEROPAPYSoil
                LL=[0.072, 0.075, 0.017, 0.053, 0.015, 0.015, 0.015, 0.015]
                KL=[0.0909131, 0.0909131, 0.0909131, 0.0909131, 0.0909131, 0.0909131, 0.0909131, 0.0909131]
                XF=[1, 1, 1, 1, 1, 1, 1, 1]
              SoilCrop SCRUMSoil: same as NZ Kiwifruit Expts.Experiment.Orchard_OCR.Row.Soil.Physical.DEROPAPYSoil
              SoilCrop STRUMSoil: same as NZ Kiwifruit Expts.Experiment.Orchard_OCR.Row.Soil.Physical.BarleySoil
              SoilCrop SPRUMSoil: same as NZ Kiwifruit Expts.Experiment.Orchard_OCR.Row.Soil.Physical.BarleySoil
            WaterBalance SoilWater: SummerDate=1-oct; SummerU=9; SummerCona=4.4; WinterDate=1-apr; WinterU=4; WinterCona=2; DiffusConst=88; DiffusSlope=35; Salb=0.13; CN2Bare=77; CNRed=37; CNCov=0.8; DischargeWidth=0; CatchmentArea=0; PSIDul=-100
              Thickness  SWCON  KLAT
              150        0.5    0
              125        0.45   0
              100        0.5    0
              300        0.45   0
              1325       0.5    0
            Organic: same as NZ Kiwifruit Expts.Experiment.Orchard_OPK.Row.Soil.Organic
            Water: Thickness=[150, 125, 100, 300, 331.3, 331.3, 331.3, 331.3]; InitialPAWmm=232.154; RelativeTo=LL15; FilledFromTop=false
              InitialValues=[0.2268, 0.2136, 0.1061, 0.1889, 0.1221, 0.1221, 0.1221, 0.1221]
            Solute NO3: Thickness=[150, 125, 100, 300, 1325]; InitialValues=[5.60968, 5.52647, 1.41149, 0.0491014, 0.049724]; InitialValuesUnits=ppm; WaterTableConcentration=0; D0=0; DepthConstant=0; MaxDepthSoluteAccessible=0; RunoffEffectivenessAtMovingSolute=0; MaxEffectiveRunoff=0
            Solute NH4: Thickness=[150, 125, 100, 300, 1325]; InitialValues=[0.841453, 0.82897, 0.211724, 0.00736522, 0.0074586]; InitialValuesUnits=ppm; WaterTableConcentration=0; D0=0; DepthConstant=0; MaxDepthSoluteAccessible=0; RunoffEffectivenessAtMovingSolute=0; MaxEffectiveRunoff=0
            Solute Urea: Thickness=[150, 125, 100, 300, 1325]; InitialValues=[0, 0, 0, 0, 0]; InitialValuesUnits=kg/ha; WaterTableConcentration=0; D0=0; DepthConstant=0; MaxDepthSoluteAccessible=0; RunoffEffectivenessAtMovingSolute=0; MaxEffectiveRunoff=0
            Nutrient
            LayerStructure: Thickness=[150, 125, 100, 300, 331.3, 331.3, 331.3, 331.3]
            OutputLayers: Thickness=[400, 400, 400, 400, 200]
            SoilTemperature Temperature
          StrumTreeInstance KiwiFruit: same as NZ Kiwifruit Expts.Experiment.Orchard_BAY.Row.KiwiFruit
      Simulation Orchard_PNG
        Memo ReadMe
          * This is a Gold3 orchard
        Clock: Start=2013-06-21; End=2020-07-01
        Summary SummaryFile
        Weather: FileName=WeatherFiles\Paengaroa.met
        MicroClimate: a_interception=0; b_interception=1; c_interception=0; d_interception=0; SoilHeatFluxFraction=0.4; MinimumHeightDiffForNewLayer=0; NightInterceptionFraction=0.5; ReferenceHeight=2
        SoilArbitrator Soil Arbitrator
        Manager AutoIrrigationDeficitBased: same as NZ Kiwifruit Expts.Experiment.Orchard_BAY.AutoIrrigationDeficitBased
        Manager AutomaticFertiliser: same as PatternTest.Decidious.AutomaticFertiliser
        Manager ResetDate: same as NZ Kiwifruit Expts.Experiment.Orchard_BAY.ResetDate
        RectangularZone Row: Length=100; Width=4; Slope=0; AspectAngle=0; Altitude=50
          Report RowZoneReport: EventNames=[Clock].DoReport
          Report ReportBoth: EventNames=[Clock].DoReport
          SurfaceOrganicMatter: InitialResidueName=wheat_stubble; InitialResidueType=wheat; InitialResidueMass=500; InitialStandingFraction=0; InitialCPR=0; InitialCNR=100
          Plant STRUM
          Fertiliser
          Manager AgrgateZoneVariables
            script: same as in NZ AppleExperiments.Manawatu_1994.Manawatu_94.Row.AgrgateZoneVariables
          Irrigation
          BiomassRemovalEvents Pick: same as NZ Kiwifruit Expts.Experiment.Orchard_BAY.Row.Pick
          BiomassRemovalEvents Prune: same as USA AppleExperiments.Prosser_Apple_Deep.DeepSoil.Row.Prune
          Soil: SoilType=Buried-allophanic Orthic Pumice Soils; Latitude=-41; Longitude=174; DataSource=Based on profile descriptions provided by Smap (Oropi_1a1)
            Chemical: PHUnits=Water
              Thickness  PH  CEC
              180        7   15.1225
              180        7   8.03879
              475        7   5.94674
              1165       7   5.5989
            Physical
              Thickness  ParticleSizeSand  ParticleSizeSilt  ParticleSizeClay  Rocks  BD     AirDry  LL15   DUL    SAT    KS
              180        57.5              34                8.5               0      0.894  0.082   0.165  0.395  0.591  1920
              180        64                29.5              6.5               0      1.043  0.074   0.111  0.299  0.534  1200
              475        56.5              32                11.5              0      0.96   0.16    0.16   0.361  0.566  1920
              388.3      54.5              35                10.5              0      0.984  0.162   0.162  0.392  0.557  1440
              388.3      54.5              35                10.5              0      0.984  0.162   0.162  0.392  0.557  1440
              388.3      54.5              35                10.5              0      0.984  0.162   0.162  0.392  0.557  1440
              Rocks source: Calculated
              SoilCrop DEROPAPYSoil: LL=[0.165, 0.111, 0.16, 0.162, 0.162, 0.162]; KL=[0.078, 0.078, 0.078, 0.078, 0.078, 0.078]; XF=[1, 0.79, 1, 1, 1, 1]
              SoilCrop SCRUMSoil: LL=[0.165, 0.111, 0.16, 0.162, 0.162, 0.162]; KL=[0.078, 0.078, 0.078, 0.078, 0.078, 0.078]; XF=[1, 0.79, 1, 1, 1, 1]
              SoilCrop STRUMSoil: LL=[0.165, 0.111, 0.16, 0.162, 0.162, 0.162]; KL=[0.116, 0.077, 0.042, 0.013, 0.005, 0]; XF=[1, 1, 1, 1, 1, 1]
              SoilCrop SPRUMSoil: LL=[0.165, 0.111, 0.16, 0.162, 0.162, 0.162]; KL=[0.116, 0.077, 0.042, 0.013, 0.005, 0]; XF=[1, 1, 1, 1, 1, 1]
            WaterBalance SoilWater: same as NZ Kiwifruit Expts.Experiment.Orchard_MAK.Row.Soil.SoilWater
            Organic: same as NZ Kiwifruit Expts.Experiment.Orchard_OPK.Row.Soil.Organic
            Water: Thickness=[180, 180, 475, 388.3, 388.3, 388.3]; InitialValues=[0.372, 0.2802, 0.3409, 0.369, 0.369, 0.369]; InitialPAWmm=394.7778; RelativeTo=LL15; FilledFromTop=false
            Solute NO3: same as NZ Kiwifruit Expts.Experiment.Orchard_MAK.Row.Soil.NO3
            Solute NH4: same as NZ Kiwifruit Expts.Experiment.Orchard_MAK.Row.Soil.NH4
            Solute Urea: same as NZ Kiwifruit Expts.Experiment.Orchard_LIN.Row.Soil.Urea
            Nutrient
            LayerStructure: Thickness=[180, 180, 475, 388.3, 388.3, 388.3]
            OutputLayers: Thickness=[400, 400, 400, 400, 200]
            SoilTemperature Temperature
          StrumTreeInstance KiwiFruit: same as NZ Kiwifruit Expts.Experiment.Orchard_LIN.Row.KiwiFruit
      Simulation Kiwifruit
        Clock: Start=2008-07-01; End=2011-06-01
        Summary SummaryFile
        Weather: FileName=WeatherFiles\Omarunui.met
        MicroClimate: a_interception=0; b_interception=1; c_interception=0; d_interception=0; SoilHeatFluxFraction=0.4; MinimumHeightDiffForNewLayer=0; NightInterceptionFraction=0.5; ReferenceHeight=2
        SoilArbitrator Soil Arbitrator
        Manager ResetDate: same as NZ Kiwifruit Expts.Experiment.Orchard_BAY.ResetDate
        RectangularZone Row: Length=100; Width=3; Slope=0; AspectAngle=0; Altitude=50
          Report RowZoneReport: EventNames=[Clock].DoReport
          Report ReportBoth: EventNames=[Clock].DoReport
          SurfaceOrganicMatter: InitialResidueName=wheat_stubble; InitialResidueType=wheat; InitialResidueMass=500; InitialStandingFraction=0; InitialCPR=0; InitialCNR=100
          Plant STRUM
          Fertiliser
          Irrigation
          Operations
            2008-10-14  [Irrigation].apply(15)
            2008-10-15  [Irrigation].apply(15)
            2008-10-16  [Irrigation].apply(15)
            2008-10-19  [Irrigation].apply(9)
            2008-10-31  [Irrigation].apply(12)
            2008-11-01  [Irrigation].apply(12)
            2008-11-03  [Irrigation].apply(12)
            2008-11-04  [Irrigation].apply(12)
            2008-11-05  [Irrigation].apply(12)
            2008-11-06  [Irrigation].apply(6)
            2008-11-07  [Irrigation].apply(6)
            2008-11-08  [Irrigation].apply(9)
            2008-11-12  [Irrigation].apply(6)
            2008-11-13  [Irrigation].apply(6)
            2008-11-15  [Irrigation].apply(9)
            2008-11-16  [Irrigation].apply(9)
            2008-11-17  [Irrigation].apply(9)
            2008-11-19  [Irrigation].apply(9)
            2008-11-20  [Irrigation].apply(9)
            2008-11-21  [Irrigation].apply(3)
            2008-11-23  [Irrigation].apply(6)
            2008-11-24  [Irrigation].apply(6)
            2008-11-25  [Irrigation].apply(6)
            2008-11-26  [Irrigation].apply(6)
            2008-11-27  [Irrigation].apply(9)
            2008-11-28  [Irrigation].apply(6)
            2008-11-30  [Irrigation].apply(6)
            2008-12-01  [Irrigation].apply(6)
            2008-12-02  [Irrigation].apply(6)
            2008-12-03  [Irrigation].apply(6)
            2008-12-04  [Irrigation].apply(6)
            2008-12-05  [Irrigation].apply(15)
            2008-12-06  [Irrigation].apply(6)
            2008-12-07  [Irrigation].apply(6)
            2008-12-08  [Irrigation].apply(6)
            2008-12-11  [Irrigation].apply(9)
            2008-12-12  [Irrigation].apply(9)
            2008-12-13  [Irrigation].apply(9)
            2008-12-14  [Irrigation].apply(9)
            2008-12-17  [Irrigation].apply(9)
            2008-12-18  [Irrigation].apply(9)
            2008-12-19  [Irrigation].apply(9)
            2008-12-20  [Irrigation].apply(9)
            2008-12-21  [Irrigation].apply(9)
            2008-12-29  [Irrigation].apply(6)
            2008-12-30  [Irrigation].apply(6)
            2008-12-31  [Irrigation].apply(6)
            2009-01-01  [Irrigation].apply(12)
            2009-01-02  [Irrigation].apply(12)
            2009-01-03  [Irrigation].apply(12)
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            2009-09-08  [Irrigation].apply(7.5)
            2010-05-09  [Irrigation].apply(50)
          BiomassRemovalEvents Pick: same as NZ Kiwifruit Expts.Experiment.Orchard_BAY.Row.Pick
          BiomassRemovalEvents Prune: same as USA AppleExperiments.Prosser_Apple_Deep.DeepSoil.Row.Prune
          Manager AgrgateZoneVariables
            script: same as in NZ AppleExperiments.Manawatu_1994.Manawatu_94.Row.AgrgateZoneVariables
          Soil: Latitude=0; Longitude=0
            LayerStructure: Thickness=[200, 200, 200, 200, 200, 200, 300, 300, 400, 800]
            Chemical: Thickness=[100, 200, 300, 300, 300, 300]; PH=[6.6, 6.2, 5.7, 5.5, 5.5, 5.5]; PHUnits=Water
            Water: Thickness=[300, 300, 300, 300, 300, 1500]; InitialValues=[0.306, 0.25, 0.312, 0.339, 0.284, 0.426]; InitialPAWmm=354.9; RelativeTo=LL15; FilledFromTop=false
            Physical
              Thickness  ParticleSizeSand  ParticleSizeSilt  ParticleSizeClay  Rocks  BD  AirDry  LL15   DUL   SAT
              300        5                 65                30                0.137  1   0.1     0.18   0.36  0.5
              300        5                 65                30                0.396  1   0.135   0.138  0.28  0.35
              300        5                 65                30                0.171  1   0.2     0.2    0.36  0.48
              300        5                 65                30                0      1   0.22    0.22   0.39  0.55
              300        5                 65                30                0.24   1   0.2     0.2    0.32  0.46
              1500       5                 65                30                0      1   0.3     0.3    0.48  0.58
              Rocks, ParticleSizeSand, ParticleSizeSilt, ParticleSizeClay source: Calculated
              SoilCrop SPRUMSoil: LL=[0.165, 0.111, 0.16, 0.162, 0.162, 0.162]; KL=[0.116, 0.077, 0.042, 0.013, 0.005, 0]; XF=[1, 1, 1, 1, 1, 1]
              SoilCrop SCRUMSoil: LL=[0.165, 0.111, 0.16, 0.162, 0.162, 0.162]; KL=[0.078, 0.078, 0.078, 0.078, 0.078, 0.078]; XF=[1, 0.79, 1, 1, 1, 1]
              SoilCrop STRUMSoil: LL=[0.165, 0.111, 0.16, 0.162, 0.162, 0.162]; KL=[0.116, 0.077, 0.042, 0.013, 0.005, 0]; XF=[1, 1, 1, 1, 1, 1]
            WaterBalance SoilWater: SummerDate=1-Nov; SummerU=9; SummerCona=4.4; WinterDate=1-Apr; WinterU=9; WinterCona=4.4; DiffusConst=0; DiffusSlope=0; Salb=0.3; CN2Bare=68; CNRed=20; CNCov=0.8; DischargeWidth=0; CatchmentArea=0; PSIDul=-100
              Thickness  SWCON  KLAT
              150        0.55   0
              150        0.55   0
              100        0.55   0
              200        0.55   0
              200        0.55   0
              200        0.55   0
              200        0.55   0
              200        0.55   0
              200        0.55   0
              200        0.55   0
              200        0.55   0
              200        0.55   0
              400        0.55   0
            Organic: same as PatternTest.Decidious.Row.Soil.Organic
            Solute NO3: same as USA AppleExperiments.Prosser_Apple_Deep.Factors.Permutation.Soil._.Soil.NO3
            Solute NH4: same as PatternTest.Decidious.Row.Soil.NH4
            Solute Urea: same as PatternTest.Decidious.Row.Soil.Urea
            Nutrient
            OutputLayers: Thickness=[300, 300, 300, 300, 300, 300]
            SoilTemperature Temperature
          Manager AutomaticFertiliser: same as NZ Avocado.FarNorthIrrAvocado.Row.AutomaticFertiliser
          StrumTreeInstance KiwiFruit: same as NZ Kiwifruit Expts.Experiment.Orchard_BAY.Row.KiwiFruit
  Folder Avocado_Scenarios (disabled)
    Experiment Avocado_Longterm
      Memo ScenarioDescription
        *	Progressive water stress treatments.

        *	Progressive stress by withholding irrigation monthly  from the end of the irrigation window.

        *	Long-term simulations run continously for 30 years.
      Factors
        Permutation
          Factor Irr
            CompositeFactor Nil: Specifications=[AutoIrrigationDeficitBased].Script.AllowIrrigation = false
            CompositeFactor FullYear
              Specifications:
                [AutoIrrigationDeficitBased].Script.SeasonStart = 1-Jan
                [AutoIrrigationDeficitBased].Script.SeasonEnd = 31-Dec
            CompositeFactor FullSeasonIrr
              Specifications:
                [AutoIrrigationDeficitBased].Script.SeasonStart = 1-Oct
                [AutoIrrigationDeficitBased].Script.SeasonEnd = 30-Apr
            CompositeFactor Oct_Mar
              Specifications:
                [AutoIrrigationDeficitBased].Script.SeasonStart = 1-Oct
                [AutoIrrigationDeficitBased].Script.SeasonEnd = 31-Mar
            CompositeFactor Oct_Feb
              Specifications:
                [AutoIrrigationDeficitBased].Script.SeasonStart = 1-Oct
                [AutoIrrigationDeficitBased].Script.SeasonEnd = 28-Feb
            CompositeFactor Oct_Jan
              Specifications:
                [AutoIrrigationDeficitBased].Script.SeasonStart = 1-Oct
                [AutoIrrigationDeficitBased].Script.SeasonEnd = 31-Jan
            CompositeFactor Oct_Dec
              Specifications:
                [AutoIrrigationDeficitBased].Script.SeasonStart = 1-Oct
                [AutoIrrigationDeficitBased].Script.SeasonEnd = 31-Dec
            CompositeFactor Oct_Nov
              Specifications:
                [AutoIrrigationDeficitBased].Script.SeasonStart = 1-Oct
                [AutoIrrigationDeficitBased].Script.SeasonEnd = 30-Nov
          Factor SoilType
            CompositeFactor Waikiwi_33a2: Specifications=[Soil]
              Soil Waikiwi_33a2: SoilType=Typic Firm Brown Soils; LocalName=Waikiwi_33a2; Latitude=-41; Longitude=174
                DataSource=Profile descriptions provided by Smap based on the work done by Trevor Webb.
                Chemical: Thickness=[200, 100, 250, 1450, 1000]; PH=[7, 7, 7, 7, 7]; PHUnits=Water
                Physical
                  Thickness  ParticleSizeSand  ParticleSizeSilt  ParticleSizeClay  Rocks  BD     AirDry  LL15   DUL    SAT    KS
                  200        12.5              57.5              30                0      1.19   0.107   0.214  0.418  0.512  1440
                  100        12.5              57.5              30                0      1.253  0.112   0.224  0.395  0.49   1440
                  250        12.5              57.5              30                0      1.357  0.226   0.226  0.37   0.454  960
                  362.5      12.5              57.5              30                0      1.442  0.254   0.254  0.393  0.424  192
                  362.5      12.5              57.5              30                0      1.442  0.254   0.254  0.393  0.424  192
                  362.5      12.5              57.5              30                0      1.442  0.254   0.254  0.393  0.424  192
                  362.5      12.5              57.5              30                0      1.442  0.254   0.254  0.393  0.424  192
                  1000       12.5              57.5              30                0      1.442  0.254   0.254  0.393  0.424  192
                  Rocks source: Calculated
                  SoilCrop SPRUMSoil: LL=[0.214, 0.224, 0.226, 0.254, 0.254, 0.254, 0.254, 0.254]; KL=[0.087, 0.056, 0.034, 0.012, 0.004, 0, 0, 0]; XF=[1, 1, 1, 0.766, 0.766, 0.766, 0.766, 0.766]
                  SoilCrop STRUMSoil: LL=[0.214, 0.224, 0.226, 0.254, 0.254, 0.254, 0.254, 0.254]; KL=[0.078, 0.078, 0.078, 0.078, 0.078, 0.078, 0.078, 0.078]; XF=[1, 1, 1, 1, 1, 1, 1, 1]
                WaterBalance SoilWater: SummerDate=1-oct; SummerU=9; SummerCona=4.4; WinterDate=1-apr; WinterU=4; WinterCona=2; DiffusConst=88; DiffusSlope=35; Salb=0.13; CN2Bare=88; CNRed=20; CNCov=0.8; DischargeWidth=0; CatchmentArea=0; PSIDul=-100
                  Thickness  SWCON  KLAT
                  200        0.5    0
                  100        0.5    0
                  250        0.3    0
                  1450       0.2    0
                  1000       0.2    0
                Organic: FOMCNRatio=40; CarbonUnits=Total
                  Thickness  Carbon  SoilCNRatio  FBiom  FInert  FOM
                  50         5       11.1         0.079  0.396   124.07
                  50         5       11.1         0.061  0.457   115.105
                  50         5       11.1         0.048  0.507   106.788
                  50         4.13    11.1         0.038  0.562   99.072
                  50         2.834   11.1         0.031  0.622   91.914
                  50         1.966   11.1         0.025  0.675   85.272
                  50         1.384   11.1         0.021  0.722   79.111
                  50         0.993   11.1         0.018  0.765   73.394
                  50         0.732   11.1         0.016  0.803   68.091
                  50         0.557   11.1         0.015  0.838   63.171
                  250        0.307   11.1         0.012  0.916   43.417
                  250        0.215   11.1         0.01   0.977   29.84
                  500        0.201   11.1         0.01   0.991   14.095
                  500        0.2     11.1         0.01   0.996   6.658
                  1000       0.2     11.1         0.01   0.996   6.658
                Water: Thickness=[200, 100, 250, 362.5, 362.5, 362.5, 362.5, 1000]; InitialValues=[0.398, 0.378, 0.356, 0.379, 0.379, 0.379, 0.379, 0.379]; InitialPAWmm=390.95; RelativeTo=LL15; FilledFromTop=false
                LayerStructure: Thickness=[200, 100, 250, 362.5, 362.5, 362.5, 362.5, 1000]
                Solute NO3: Thickness=[200, 100, 250, 1450, 1000]; InitialValues=[5.323, 5.053, 0.043, 0.041, 0.041]; InitialValuesUnits=ppm; WaterTableConcentration=0; D0=0; DepthConstant=0; MaxDepthSoluteAccessible=0; RunoffEffectivenessAtMovingSolute=0; MaxEffectiveRunoff=0
                Solute NH4: Thickness=[200, 100, 250, 1450, 1000]; InitialValues=[0.798, 0.758, 0.007, 0.006, 0.006]; InitialValuesUnits=ppm; WaterTableConcentration=0; D0=0; DepthConstant=0; MaxDepthSoluteAccessible=0; RunoffEffectivenessAtMovingSolute=0; MaxEffectiveRunoff=0
                Solute Urea: Thickness=[200, 100, 250, 1450, 1000]; InitialValues=[0, 0, 0, 0, 0]; InitialValuesUnits=kg/ha; WaterTableConcentration=0; D0=0; DepthConstant=0; MaxDepthSoluteAccessible=0; RunoffEffectivenessAtMovingSolute=0; MaxEffectiveRunoff=0
                OutputLayers: Thickness=[300, 300, 300, 300, 300, 300, 1200]
                Nutrient
                SoilTemperature Temperature
            CompositeFactor Windermere_16a1: Specifications=[Soil]
              Soil Windermere_16a1: SoilType=Mellow Humic Organic Soils; LocalName=Windermere_16a1; Latitude=-41; Longitude=174
                DataSource=Profile descriptions provided by Smap based on the work done by Trevor Webb.
                Chemical: Thickness=[200, 110, 1690, 1000]; PH=[7, 7, 7, 7]; PHUnits=Water
                Physical
                  Thickness  ParticleSizeSand  ParticleSizeSilt  ParticleSizeClay  Rocks  BD     AirDry  LL15   DUL    SAT    KS
                  200        10                80                10                0      0.3    0.093   0.186  0.636  0.804  960
                  110        3                 67                30                0      0.3    0.101   0.186  0.636  0.804  720
                  338        45                28                27                0      1.476  0.208   0.208  0.357  0.412  192
                  338        45                28                27                0      1.476  0.208   0.208  0.357  0.412  192
                  338        45                28                27                0      1.476  0.208   0.208  0.357  0.412  192
                  338        45                28                27                0      1.476  0.208   0.208  0.357  0.412  192
                  338        45                28                27                0      1.476  0.208   0.208  0.357  0.412  192
                  1000       45                28                27                0      1.476  0.208   0.208  0.357  0.412  192
                  Rocks source: Calculated
                  SoilCrop SPRUMSoil: LL=[0.186, 0.186, 0.208, 0.208, 0.208, 0.208, 0.208, 0.208]; KL=[0.115, 0.074, 0.024, 0.009, 0.004, 0, 0, 0]; XF=[1, 1, 0.766, 0.766, 0.766, 0.766, 0.766, 0.766]
                  SoilCrop STRUMSoil: LL=[0.186, 0.186, 0.208, 0.208, 0.208, 0.208, 0.208, 0.208]; KL=[0.078, 0.078, 0.078, 0.078, 0.078, 0.078, 0.078, 0.078]; XF=[1, 1, 1, 1, 1, 1, 1, 1]
                WaterBalance SoilWater: SummerDate=1-oct; SummerU=9; SummerCona=4.4; WinterDate=1-apr; WinterU=4; WinterCona=2; DiffusConst=88; DiffusSlope=35; Salb=0.13; CN2Bare=90; CNRed=16; CNCov=0.8; DischargeWidth=0; CatchmentArea=0; PSIDul=-100
                  Thickness  SWCON  KLAT
                  200        0.3    0
                  110        0.2    0
                  1690       0.2    0
                  1000       0.2    0
                Organic: FOMCNRatio=40; CarbonUnits=Total
                  Thickness  Carbon  SoilCNRatio  FBiom  FInert  FOM
                  50         30      12.3         0.079  0.858   124.07
                  50         30      12.3         0.061  0.858   115.105
                  50         30      12.3         0.048  0.858   106.788
                  50         24.598  12.3         0.038  0.865   99.072
                  50         16.555  12.3         0.031  0.879   91.914
                  50         11.163  12.3         0.025  0.891   85.272
                  50         7.549   12.3         0.021  0.902   79.111
                  50         5.126   12.3         0.018  0.912   73.394
                  50         3.502   12.3         0.016  0.922   68.091
                  50         2.413   12.3         0.015  0.931   63.171
                  250        0.867   12.3         0.012  0.955   43.417
                  250        0.29    12.3         0.01   0.983   29.84
                  500        0.204   12.3         0.01   0.991   14.095
                  500        0.2     12.3         0.01   0.996   6.658
                  1000       0.2     12.3         0.01   0.996   6.658
                Water: Thickness=[200, 110, 338, 338, 338, 338, 338, 1000]; InitialValues=[0.591, 0.591, 0.342, 0.342, 0.342, 0.342, 0.342, 0.342]; InitialPAWmm=486.01; RelativeTo=LL15; FilledFromTop=false
                LayerStructure: Thickness=[200, 110, 338, 338, 338, 338, 338, 1000]
                Solute NO3: Thickness=[200, 110, 1690, 1000]; InitialValues=[21.111, 19.21, 0.04, 0.04]; InitialValuesUnits=ppm; WaterTableConcentration=0; D0=0; DepthConstant=0; MaxDepthSoluteAccessible=0; RunoffEffectivenessAtMovingSolute=0; MaxEffectiveRunoff=0
                Solute NH4: Thickness=[200, 110, 1690, 1000]; InitialValues=[3.167, 2.881, 0.006, 0.006]; InitialValuesUnits=ppm; WaterTableConcentration=0; D0=0; DepthConstant=0; MaxDepthSoluteAccessible=0; RunoffEffectivenessAtMovingSolute=0; MaxEffectiveRunoff=0
                Solute Urea: Thickness=[200, 110, 1690, 1000]; InitialValues=[0, 0, 0, 0]; InitialValuesUnits=kg/ha; WaterTableConcentration=0; D0=0; DepthConstant=0; MaxDepthSoluteAccessible=0; RunoffEffectivenessAtMovingSolute=0; MaxEffectiveRunoff=0
                OutputLayers: Thickness=[300, 300, 300, 300, 300, 300, 1200]
                Nutrient
                SoilTemperature Temperature
            CompositeFactor Patua_10a1: Specifications=[Soil]
              Soil Patua_10a1: SoilType=Typic Impeded Allophanic Soils; LocalName=Patua_10a1; Latitude=-41; Longitude=174
                DataSource=Profile descriptions provided by Smap based on the work done by Trevor Webb.
                Chemical: Thickness=[125, 250, 125, 1500, 1000]; PH=[7, 7, 7, 7, 7]; PHUnits=Water
                Physical
                  Thickness  ParticleSizeSand  ParticleSizeSilt  ParticleSizeClay  Rocks     BD     AirDry  LL15   DUL    SAT    KS
                  125        35                47.5              17.5              0         0.801  0.116   0.232  0.497  0.607  1920
                  250        35                42.5              22.5              0         0.765  0.191   0.294  0.447  0.621  1920
                  125        85                10                5                 0.382044  0.575  0.145   0.145  0.274  0.45   1920
                  300        85                10                5                 0.667708  0.369  0.092   0.092  0.172  0.266  960
                  300        85                10                5                 0.667708  0.369  0.092   0.092  0.172  0.266  960
                  300        85                10                5                 0.667708  0.369  0.092   0.092  0.172  0.266  960
                  300        85                10                5                 0.667708  0.369  0.092   0.092  0.172  0.266  960
                  300        85                10                5                 0.667708  0.369  0.092   0.092  0.172  0.266  960
                  1000       85                10                5                 0.667708  0.369  0.092   0.092  0.172  0.266  960
                  Rocks source: Calculated
                  SoilCrop SPRUMSoil
                    LL=[0.232, 0.294, 0.145, 0.092, 0.092, 0.092, 0.092, 0.092, 0.092]
                    KL=[0.096, 0.066, 0.038, 0.015, 0, 0, 0, 0, 0]
                    XF=[1, 1, 1, 0.141, 0, 0, 0, 0, 0]
                  SoilCrop STRUMSoil
                    LL=[0.232, 0.294, 0.145, 0.092, 0.092, 0.092, 0.092, 0.092, 0.092]
                    KL=[0.078, 0.078, 0.078, 0.078, 0.078, 0.078, 0.078, 0.078, 0.078]
                    XF=[1, 1, 1, 1, 1, 1, 1, 1, 1]
                WaterBalance SoilWater: SummerDate=1-oct; SummerU=9; SummerCona=4.4; WinterDate=1-apr; WinterU=4; WinterCona=2; DiffusConst=88; DiffusSlope=35; Salb=0.13; CN2Bare=92; CNRed=18; CNCov=0.8; DischargeWidth=0; CatchmentArea=0; PSIDul=-100
                  Thickness  SWCON  KLAT
                  125        0.4    0
                  250        0.3    0
                  125        0.5    0
                  1500       0.45   0
                  1000       0.45   0
                Organic: FOMCNRatio=40; CarbonUnits=Total
                  Thickness  Carbon  SoilCNRatio  FBiom  FInert  FOM
                  50         10      11.1         0.079  0.575   124.07
                  50         10      11.1         0.061  0.575   115.105
                  50         10      11.1         0.048  0.614   106.788
                  50         8.224   11.1         0.038  0.662   99.072
                  50         5.578   11.1         0.031  0.709   91.914
                  50         3.805   11.1         0.025  0.75    85.272
                  50         2.617   11.1         0.021  0.785   79.111
                  50         1.82    11.1         0.018  0.816   73.394
                  50         1.286   11.1         0.016  0.844   68.091
                  50         0.928   11.1         0.015  0.868   63.171
                  250        0.419   11.1         0.012  0.924   43.417
                  250        0.23    11.1         0.01   0.978   29.84
                  500        0.201   11.1         0.01   0.991   14.095
                  500        0.2     11.1         0.01   0.996   6.658
                  1000       0.2     11.1         0.01   0.996   6.658
                Water: Thickness=[125, 250, 125, 300, 300, 300, 300, 300, 1000]; InitialPAWmm=258.875; RelativeTo=LL15; FilledFromTop=false
                  InitialValues=[0.471, 0.432, 0.261, 0.164, 0.164, 0.164, 0.164, 0.164, 0.164]
                LayerStructure: Thickness=[125, 250, 125, 300, 300, 300, 300, 300, 1000]
                Solute NO3: Thickness=[125, 250, 125, 1500, 1000]; InitialValues=[7.907, 5.818, 0.102, 0.159, 0.159]; InitialValuesUnits=ppm; WaterTableConcentration=0; D0=0; DepthConstant=0; MaxDepthSoluteAccessible=0; RunoffEffectivenessAtMovingSolute=0; MaxEffectiveRunoff=0
                Solute NH4: Thickness=[125, 250, 125, 1500, 1000]; InitialValues=[1.186, 0.873, 0.015, 0.024, 0.024]; InitialValuesUnits=ppm; WaterTableConcentration=0; D0=0; DepthConstant=0; MaxDepthSoluteAccessible=0; RunoffEffectivenessAtMovingSolute=0; MaxEffectiveRunoff=0
                Solute Urea: Thickness=[125, 250, 125, 1500, 1000]; InitialValues=[0, 0, 0, 0, 0]; InitialValuesUnits=kg/ha; WaterTableConcentration=0; D0=0; DepthConstant=0; MaxDepthSoluteAccessible=0; RunoffEffectivenessAtMovingSolute=0; MaxEffectiveRunoff=0
                OutputLayers: Thickness=[300, 300, 300, 300, 300, 300, 1200]
                Nutrient
                SoilTemperature Temperature
            Memo Notes
              ### Notes about this factor

              _Rogerio Cichota_

              Eyre_23a3 is a Weathered Orthic Recent soil
              Darnley_4a2 is a Typic Argillic Pallic Soil
              Waikiwi_33a2 is a Typic Firm Brown Soil
              Windermere_16a1 is a Mellow Humic Organic Soil
              Patua_10a1 is a Typic Impeded Allophanic Soil

              ==========================================================================================

              **Summmaries, selected properties**

              | SoilName | RootingDepth | BD_TopLayer | BDMax_AnyLayer | PAW_Top100cm | PAW_Total | KSat_TopLayer | KSatMin_AnyLayer | Carbon_TopLayer | CN2Bare | CNReduction |
              |:-------- | ------------:| -----------:| --------------:| ------------:| ---------:| -------------:| ----------------:| ---------------:| -------:| -----------:|
              |          |         (mm) |     (kg/m³) |        (kg/m³) |         (mm) |      (mm) |        (mm/h) |           (mm/h) |             (%) |     (-) |         (-) |
              | Eyre_23a3 | 710 | 0.841 | 0.841 | 53.5 | 79.5 | 1440 | 1440 | 2.97 | 99.0 | 39.0 |
              | Darnley_4a2 | 700 | 1.254 | 1.388 | 102.0 | 160.0 | 1440 | 1.2 | 3.90 | 89.0 | 20.0 |
              | Waikiwi_33a2 | 2000 | 1.189 | 1.441 | 156.5 | 295.5 | 1440 | 192 | 4.78 | 88.0 | 20.0 |
              | Windermere_16a1 | 2000 | 0.300 | 1.476 | 242.3 | 391.3 | 960 | 192 | 28.65 | 90.0 | 16.0 |
              | Patua_10a1 | 800 | 0.801 | 0.801 | 127.5 | 207.5 | 1920 | 960 | 10.00 | 92.0 | 18.0 |
              | Templeton_1a2 | 2000 | 1.332 | 1.693 | 171.3 | 328.3 | 1440 | 24 | 3.72 | 88.0 | 20.0 |
              | Flaxton_4a1 | 2000 | 1.186 | 1.414 | 171.2 | 405.2 | 1440 | 24 | 5.43 | 93.0 | 16.0 |
          Factor VCSN_Weather
            CompositeFactor FarNorth: Specifications=[Weather]
              Weather: FileName=WeatherFiles\Kaitaia.met
            CompositeFactor Whangarei: Specifications=[Weather]
              Weather: FileName=Whangarei.met
            CompositeFactor BayofPlenty: Specifications=[Weather]
              Weather: FileName=WeatherFiles\Te Puke.met
            CompositeFactor Waikato: Specifications=[Weather]
              Weather: FileName=WeatherFiles\VCS_Ruakura.met
            CompositeFactor Gisborne: Specifications=[Weather]
              Weather: FileName=WeatherFiles\VCS_Gisborne.met
            CompositeFactor Auckland: Specifications=[Weather]
              Weather: FileName=WeatherFiles\VCS_Pukekohe.met
      Simulation BOP
        Clock: Start=1984-10-20; End=2016-10-20
        Summary SummaryFile
        Weather: FileName=WeatherFiles\Kaitaia.met
        MicroClimate: a_interception=0; b_interception=1; c_interception=0; d_interception=0; SoilHeatFluxFraction=0.4; MinimumHeightDiffForNewLayer=0; NightInterceptionFraction=0.5; ReferenceHeight=2
        SoilArbitrator Soil Arbitrator
        Manager AutoIrrigationDeficitBased
          AllowIrrigation = True
          SeasonStart = 1-oct
          SeasonEnd = 1-apr
          depthPAWC = 1000
          triggerDeficit = 90
          irrigateAmount = 15
          returndays = 1
          IrrigateAlley = False
          script: same as in NZ Avocado.FarNorthIrrAvocado.AutoIrrigationDeficitBased
        Manager ResetDate
```csharp
using Newtonsoft.Json;
using Models.PMF.Organs;
using Models.Soils.Nutrients;
using Models.Interfaces;
using System;
using Models.Core;
using System.Collections.Generic;
using System.Text;
using Models.Soils;
using Models.PMF;
using Models;
using System.Xml.Serialization;
using APSIM.Shared.Utilities;
using Models.Climate;



namespace Models
{
    [Serializable] 
    //[System.Xml.Serialization.XmlInclude(typeof(Model))]
    public class Script : Model
    {
    
     [Link] private Clock Clock;
        
    //[Separator("Manager to summarise variables")]
        //[Description(" Date to end the simulation year and reset: ")]
        //public string ResetDate { get; set; }
                  
        [JsonIgnore] public double SimulationYear { get; set; }
        [JsonIgnore] public double DAS { get; set; }
        
         [EventSubscribe("StartOfSimulation")]
        private void DoStartOfSimulation(object sender, EventArgs e)
        {
                DAS = 0;
                SimulationYear = 1983;
        }
        
        [EventSubscribe("StartOfDay")]
        private void OnStartOfDay(object sender, EventArgs e)
        {
            DAS += 1;
            //if (DateUtilities.DatesAreEqual(ResetDate, Clock.Today.Date))
            if (DateUtilities.DatesAreEqual("20-Oct", Clock.Today.Date))
            {
                SimulationYear += 1;
                DAS = 1;
                
            }
        }
    
    }
}
```
        RectangularZone Row: Length=100; Width=1.3; Slope=0; AspectAngle=0; Altitude=50
          Report RowZoneReport: EventNames=[Clock].DoReport
          Report ZoneAgregateReport: EventNames=[Clock].DoReport
          Manager AgrgateZoneVariables: same as NZ AppleExperiments.Apple_Tall.Row.AgrgateZoneVariables
          SurfaceOrganicMatter: InitialResidueName=wheat_stubble; InitialResidueType=wheat; InitialResidueMass=500; InitialStandingFraction=0; InitialCPR=0; InitialCNR=100
          Fertiliser
          Irrigation
          Plant STRUM
          Soil: Latitude=0; Longitude=0
            LayerStructure: Thickness=[300, 300, 300, 200, 200, 200, 400, 400, 400, 600]
            Chemical: PHUnits=Water
              Thickness  PH   CEC
              195        6.6  20.535
              495        6.2  11.385
              195        5.7  12.272
              1115       5.5  5.125
            Water: Thickness=[195, 495, 195, 1115]; InitialValues=[0.4, 0.4, 0.4, 0.484]; InitialPAWmm=397.66; RelativeTo=LL15; FilledFromTop=true
            Physical
              Thickness  ParticleSizeSand  ParticleSizeSilt  ParticleSizeClay  Rocks  BD   AirDry  LL15  DUL   SAT
              400        5                 65                30                0.206  1    0.09    0.2   0.42  0.6
              400        5                 65                30                0      1    0.22    0.22  0.4   0.62
              400        5                 65                30                0      0.8  0.22    0.22  0.55  0.64
              300        5                 65                30                0      0.8  0.3     0.3   0.52  0.64
              100        5                 65                30                0      0.8  0.3     0.3   0.52  0.65
              100        5                 65                30                0      0.8  0.3     0.3   0.52  0.6
              1300       5                 65                30                0      0.8  0.3     0.3   0.52  0.6
              Rocks, ParticleSizeSand, ParticleSizeSilt, ParticleSizeClay source: Calculated
              SoilCrop STRUMSoil: LL=[0.18, 0.24, 0.3, 0.3, 0.3, 0.3, 0.3]; KL=[1, 1, 1, 1, 1, 1, 1]; XF=[1, 1, 1, 1, 1, 1, 1]
              SoilCrop SPRUMSoil: LL=[0.18, 0.24, 0.3, 0.3, 0.3, 0.3, 0.3]; KL=[0.11, 0.11, 0.11, 0.11, 0.11, 0.11, 0.11]; XF=[1, 1, 1, 1, 1, 1, 1]
            WaterBalance SoilWater: SummerDate=1-Nov; SummerU=9; SummerCona=4.4; WinterDate=1-Apr; WinterU=9; WinterCona=4.4; DiffusConst=88; DiffusSlope=35.4; Salb=0.3; CN2Bare=68; CNRed=20; CNCov=0.8; DischargeWidth=0; CatchmentArea=0; PSIDul=-100
              Thickness  SWCON  KLAT
              150        0.55   0
              150        0.55   0
              100        0.55   0
              200        0.55   0
              200        0.55   0
              200        0.55   0
              200        0.55   0
              200        0.55   0
              200        0.55   0
              200        0.55   0
              200        0.55   0
            Organic: FOMCNRatio=40; CarbonUnits=Total
              Thickness  Carbon  SoilCNRatio  FBiom  FInert  FOM
              50         5       11.1         0.079  0.397   124.07
              50         5       11.1         0.061  0.457   115.105
              50         5       11.1         0.048  0.507   106.788
              50         4.13    11.1         0.038  0.562   99.072
              50         2.834   11.1         0.031  0.622   91.913
              50         1.966   11.1         0.025  0.675   85.272
              50         1.384   11.1         0.021  0.722   79.111
              50         0.993   11.1         0.018  0.765   73.394
              50         0.732   11.1         0.016  0.803   68.091
              50         0.556   11.1         0.015  0.838   63.171
              250        0.307   11.1         0.012  0.916   43.417
              250        0.214   11.1         0.01   0.977   29.84
              500        0.201   11.1         0.01   0.991   14.095
              500        0.2     11.1         0.01   0.996   6.658
            OutputLayers: Thickness=[300, 300, 300, 400, 200]
            Solute NO3: Thickness=[195, 495, 195, 1115]; InitialValues=[4.95, 15, 1.667, 1.786]; InitialValuesUnits=ppm; WaterTableConcentration=0; D0=0; DepthConstant=0; MaxDepthSoluteAccessible=0; RunoffEffectivenessAtMovingSolute=0; MaxEffectiveRunoff=0
            Solute NH4: Thickness=[195, 495, 195, 1115]; InitialValues=[0, 0, 0, 0]; InitialValuesUnits=ppm; WaterTableConcentration=0; D0=0; DepthConstant=0; MaxDepthSoluteAccessible=0; RunoffEffectivenessAtMovingSolute=0; MaxEffectiveRunoff=0
            Solute Urea: Thickness=[195, 495, 195, 1115]; InitialValues=[0, 0, 0, 0]; InitialValuesUnits=kg/ha; WaterTableConcentration=0; D0=0; DepthConstant=0; MaxDepthSoluteAccessible=0; RunoffEffectivenessAtMovingSolute=0; MaxEffectiveRunoff=0
            Nutrient
            SoilTemperature Temperature
          BiomassRemovalEvents Pick: same as NZ AppleExperiments.Apple_Dwarf.Row.Pick
          BiomassRemovalEvents Prune: NameOfPlantToRemoveFrom=STRUM; RemovalType=3
            BiomassRemovalFractions:
              PlantName  OrganName  TypeString  LiveToRemove  DeadToRemove  LiveToResidue  DeadToResidue
              STRUM      Root       Pruning     0             0             0              0
              STRUM      Leaf       Pruning     0             0             0.2            0.2
              STRUM      Trunk      Pruning     0             0             0.3            0.3
              STRUM      Fruit      Pruning     0             0             0              0
          Manager AutomaticFertiliser
            Fertilise = True
            Season_Start = 1-Aug
            Season_End = 30-Apr
            Season_Allocation = 100000
            TriggerN = 50
            NApplicationAmount = 25
            Return_days = 3
            Top_Depth = 600
            script: same as in NZ AppleExperiments.Manawatu_1994.Manawatu_94.Row.AutomaticFertiliser
          StrumTreeInstance Avocado: TreeType=Ever green; RowSpacing=7; InterRowSpacing=7; AlleyZoneWidthFrac=0.1; AgeAtSimulationStart=10; YearsToMaxDimension=6; TrunkMassAtMaxDimension=15; WoodDensity=500; BudBreakDAWS=70; StartFullCanopyDAWS=260; StartLeafFallDAWS=310; EndLeafFallDAWS=360; GRINZ=true; MaxRD=3000; Proot=0.3; Pleaf=0.5; Ptrunk=0.2; CanopyBaseHeight=1800; MaxPrunedHeight=5000; MaxHeight=5700; MaxPrunedWidth=5800; MaxWidth=6500; RootNConc=0.01; LeafNConc=0.02; TrunkNConc=0.01; FruitNConc=0.02; ExtinctCoeff=0.5; BaseCover=0.85; MaxCover=0.96; RUE=0.9; GSMax=0.005; R50=200; WaterStress=true; Number=150; PotentialFWPerFruit=250; DMC=0.29; FruitDensity=0.43; DateMaxBloom=20-oct; DAFStartLinearGrowth=130; DAFEndLinearGrowth=340; DAFMaxSize=366; TotalSolarRadiation=0
        RectangularZone Alley: Length=100; Width=2.2; Slope=0; AspectAngle=0; Altitude=50
          Report AlleyZoneReport: EventNames=[Clock].DoReport
          Manager AgrgateZoneVariables: same as NZ AppleExperiments.Apple_Tall.Row.AgrgateZoneVariables
          SurfaceOrganicMatter: InitialResidueName=wheat_stubble; InitialResidueType=wheat; InitialResidueMass=500; InitialStandingFraction=0; InitialCPR=0; InitialCNR=100
          Fertiliser
          Irrigation
          Plant SPRUM
          SprumPastureInstance BasePasture: same as NZ AppleExperiments.Apple_Tall.Alley.BasePasture
          BiomassRemovalEvents OnCut: same as NZ AppleExperiments.Apple_Dwarf.Alley.Mow
          Operations IrrigationOperations
          Soil: same as Avocado_Scenarios.Avocado_Longterm.BOP.Row.Soil
        ZoneAgregate
  Folder Kiwifruit_Scenarios (disabled)
    Experiment Kiwifruit_Longterm
      Memo ScenarioDescription
        KIWIFRUIT MANAGEMENT

        *	NZ Kiwifruit harvest season is March - May

        SCENARIO DETAILS

        *	Progressive water stress treatments.

        *	Progressive stress by withholding irrigation monthly  from the end of the irrigation window.

        *	Long-term simulations run continously for 30 years.
      Factors
        Permutation
          Factor Irr: same as Avocado_Scenarios.Avocado_Longterm.Factors.Permutation.Irr
          Factor SoilType
            CompositeFactor Waikiwi_33a2: Specifications=[Soil]
              Soil Waikiwi_33a2: SoilType=Typic Firm Brown Soils; LocalName=Waikiwi_33a2; Latitude=-41; Longitude=174
                DataSource=Profile descriptions provided by Smap based on the work done by Trevor Webb.
                Chemical: Thickness=[200, 100, 250, 1450, 1000]; PH=[7, 7, 7, 7, 7]; PHUnits=Water
                Physical
                  Thickness  ParticleSizeSand  ParticleSizeSilt  ParticleSizeClay  Rocks  BD     AirDry  LL15   DUL    SAT    KS
                  200        12.5              57.5              30                0      1.19   0.107   0.214  0.418  0.512  1440
                  100        12.5              57.5              30                0      1.253  0.112   0.224  0.395  0.49   1440
                  250        12.5              57.5              30                0      1.357  0.226   0.226  0.37   0.454  960
                  362.5      12.5              57.5              30                0      1.442  0.254   0.254  0.393  0.424  192
                  362.5      12.5              57.5              30                0      1.442  0.254   0.254  0.393  0.424  192
                  362.5      12.5              57.5              30                0      1.442  0.254   0.254  0.393  0.424  192
                  362.5      12.5              57.5              30                0      1.442  0.254   0.254  0.393  0.424  192
                  1000       12.5              57.5              30                0      1.442  0.254   0.254  0.393  0.424  192
                  Rocks source: Calculated
                  SoilCrop SPRUMSoil: same as Avocado_Scenarios.Avocado_Longterm.Factors.Permutation.SoilType.Waikiwi_33a2.Waikiwi_33a2.Physical.SPRUMSoil
                  SoilCrop STRUMSoil: LL=[0.214, 0.224, 0.226, 0.254, 0.254, 0.254, 0.254, 0.254]; KL=[0.078, 0.078, 0.078, 0.078, 0.078, 0.078, 0.078, 0]; XF=[1, 1, 1, 1, 1, 1, 1, 1]
                WaterBalance SoilWater: same as Avocado_Scenarios.Avocado_Longterm.Factors.Permutation.SoilType.Waikiwi_33a2.Waikiwi_33a2.SoilWater
                Organic: same as Avocado_Scenarios.Avocado_Longterm.Factors.Permutation.SoilType.Waikiwi_33a2.Waikiwi_33a2.Organic
                Water: Thickness=[200, 100, 250, 362.5, 362.5, 362.5, 362.5, 1000]; InitialValues=[0.398, 0.378, 0.356, 0.379, 0.379, 0.379, 0.379, 0.379]; InitialPAWmm=390.95; RelativeTo=LL15; FilledFromTop=false
                LayerStructure: Thickness=[200, 100, 250, 362.5, 362.5, 362.5, 362.5, 1000]
                Solute NO3: same as Avocado_Scenarios.Avocado_Longterm.Factors.Permutation.SoilType.Waikiwi_33a2.Waikiwi_33a2.NO3
                Solute NH4: same as Avocado_Scenarios.Avocado_Longterm.Factors.Permutation.SoilType.Waikiwi_33a2.Waikiwi_33a2.NH4
                Solute Urea: same as Avocado_Scenarios.Avocado_Longterm.Factors.Permutation.SoilType.Waikiwi_33a2.Waikiwi_33a2.Urea
                OutputLayers: Thickness=[300, 300, 300, 300, 300, 300, 1200]
                Nutrient
                SoilTemperature Temperature
            CompositeFactor Windermere_16a1: Specifications=[Soil]
              Soil Windermere_16a1: SoilType=Mellow Humic Organic Soils; LocalName=Windermere_16a1; Latitude=-41; Longitude=174
                DataSource=Profile descriptions provided by Smap based on the work done by Trevor Webb.
                Chemical: Thickness=[200, 110, 1690, 1000]; PH=[7, 7, 7, 7]; PHUnits=Water
                Physical
                  Thickness  ParticleSizeSand  ParticleSizeSilt  ParticleSizeClay  Rocks  BD     AirDry  LL15   DUL    SAT    KS
                  200        10                80                10                0      0.3    0.093   0.186  0.636  0.804  960
                  110        3                 67                30                0      0.3    0.101   0.186  0.636  0.804  720
                  338        45                28                27                0      1.476  0.208   0.208  0.357  0.412  192
                  338        45                28                27                0      1.476  0.208   0.208  0.357  0.412  192
                  338        45                28                27                0      1.476  0.208   0.208  0.357  0.412  192
                  338        45                28                27                0      1.476  0.208   0.208  0.357  0.412  192
                  338        45                28                27                0      1.476  0.208   0.208  0.357  0.412  192
                  1000       45                28                27                0      1.476  0.208   0.208  0.357  0.412  192
                  Rocks source: Calculated
                  SoilCrop SPRUMSoil: same as Avocado_Scenarios.Avocado_Longterm.Factors.Permutation.SoilType.Windermere_16a1.Windermere_16a1.Physical.SPRUMSoil
                  SoilCrop STRUMSoil: LL=[0.186, 0.186, 0.208, 0.208, 0.208, 0.208, 0.208, 0.208]; KL=[0.078, 0.078, 0.078, 0.078, 0.078, 0.078, 0.078, 0]; XF=[1, 1, 1, 1, 1, 1, 1, 1]
                WaterBalance SoilWater: same as Avocado_Scenarios.Avocado_Longterm.Factors.Permutation.SoilType.Windermere_16a1.Windermere_16a1.SoilWater
                Organic: same as Avocado_Scenarios.Avocado_Longterm.Factors.Permutation.SoilType.Windermere_16a1.Windermere_16a1.Organic
                Water: Thickness=[200, 110, 338, 338, 338, 338, 338, 1000]; InitialValues=[0.591, 0.591, 0.342, 0.342, 0.342, 0.342, 0.342, 0.342]; InitialPAWmm=486.01; RelativeTo=LL15; FilledFromTop=false
                LayerStructure: Thickness=[200, 110, 338, 338, 338, 338, 338, 1000]
                Solute NO3: same as Avocado_Scenarios.Avocado_Longterm.Factors.Permutation.SoilType.Windermere_16a1.Windermere_16a1.NO3
                Solute NH4: same as Avocado_Scenarios.Avocado_Longterm.Factors.Permutation.SoilType.Windermere_16a1.Windermere_16a1.NH4
                Solute Urea: same as Avocado_Scenarios.Avocado_Longterm.Factors.Permutation.SoilType.Windermere_16a1.Windermere_16a1.Urea
                OutputLayers: Thickness=[300, 300, 300, 300, 300, 300, 1200]
                Nutrient
                SoilTemperature Temperature
            CompositeFactor Patua_10a1: Specifications=[Soil]
              Soil Patua_10a1: SoilType=Typic Impeded Allophanic Soils; LocalName=Patua_10a1; Latitude=-41; Longitude=174
                DataSource=Profile descriptions provided by Smap based on the work done by Trevor Webb.
                Chemical: Thickness=[125, 250, 125, 1500, 1000]; PH=[7, 7, 7, 7, 7]; PHUnits=Water
                Physical
                  Thickness  ParticleSizeSand  ParticleSizeSilt  ParticleSizeClay  Rocks     BD     AirDry  LL15   DUL    SAT    KS
                  125        35                47.5              17.5              0         0.801  0.116   0.232  0.497  0.607  1920
                  250        35                42.5              22.5              0         0.765  0.191   0.294  0.447  0.621  1920
                  125        85                10                5                 0.382044  0.575  0.145   0.145  0.274  0.45   1920
                  300        85                10                5                 0.667708  0.369  0.092   0.092  0.172  0.266  960
                  300        85                10                5                 0.667708  0.369  0.092   0.092  0.172  0.266  960
                  300        85                10                5                 0.667708  0.369  0.092   0.092  0.172  0.266  960
                  300        85                10                5                 0.667708  0.369  0.092   0.092  0.172  0.266  960
                  300        85                10                5                 0.667708  0.369  0.092   0.092  0.172  0.266  960
                  1000       85                10                5                 0.667708  0.369  0.092   0.092  0.172  0.266  960
                  Rocks source: Calculated
                  SoilCrop SPRUMSoil: same as Avocado_Scenarios.Avocado_Longterm.Factors.Permutation.SoilType.Patua_10a1.Patua_10a1.Physical.SPRUMSoil
                  SoilCrop STRUMSoil
                    LL=[0.232, 0.294, 0.145, 0.092, 0.092, 0.092, 0.092, 0.092, 0.092]
                    KL=[0.078, 0.078, 0.078, 0.078, 0, 0, 0, 0, 0]
                    XF=[1, 1, 1, 1, 1, 1, 1, 1, 1]
                WaterBalance SoilWater: same as Avocado_Scenarios.Avocado_Longterm.Factors.Permutation.SoilType.Patua_10a1.Patua_10a1.SoilWater
                Organic: same as Avocado_Scenarios.Avocado_Longterm.Factors.Permutation.SoilType.Patua_10a1.Patua_10a1.Organic
                Water: Thickness=[125, 250, 125, 300, 300, 300, 300, 300, 1000]; InitialPAWmm=258.875; RelativeTo=LL15; FilledFromTop=false
                  InitialValues=[0.471, 0.432, 0.261, 0.164, 0.164, 0.164, 0.164, 0.164, 0.164]
                LayerStructure: Thickness=[125, 250, 125, 300, 300, 300, 300, 300, 1000]
                Solute NO3: same as Avocado_Scenarios.Avocado_Longterm.Factors.Permutation.SoilType.Patua_10a1.Patua_10a1.NO3
                Solute NH4: same as Avocado_Scenarios.Avocado_Longterm.Factors.Permutation.SoilType.Patua_10a1.Patua_10a1.NH4
                Solute Urea: same as Avocado_Scenarios.Avocado_Longterm.Factors.Permutation.SoilType.Patua_10a1.Patua_10a1.Urea
                OutputLayers: Thickness=[300, 300, 300, 300, 300, 300, 1200]
                Nutrient
                SoilTemperature Temperature
            Memo Notes: same as Avocado_Scenarios.Avocado_Longterm.Factors.Permutation.SoilType.Notes
          Factor VCSN_Weather
            CompositeFactor FarNorth: Specifications=[Weather]
              Weather: FileName=WeatherFiles\MeasuredMetFiles\Kaitaia-Aero.met
            CompositeFactor FarNorth1: Specifications=[Weather]
              Weather: FileName=KiwiFruitWeather\Kiwi_Kaitaia.met
            CompositeFactor BayofPlenty: Specifications=[Weather]
              Weather: FileName=WeatherFiles\Te Puke.met
            CompositeFactor Whangarei: Specifications=[Weather]
              Weather: FileName=WeatherFiles\Whangarei.met
            CompositeFactor PalmerstonNorth: Specifications=[Weather]
              Weather: FileName=WeatherFiles\MeasuredMetFiles\PalmerstonNorth-Turitea.met
            CompositeFactor HawkesBay: Specifications=[Weather]
              Weather: FileName=WeatherFiles\VCSN\VCS_Whakatu.met
            CompositeFactor Nelson: Specifications=[Weather]
              Weather: FileName=WeatherFiles\Nelson.met
      Simulation Bayles
        Clock: Start=1984-07-01; End=2016-06-30
        Summary SummaryFile
        Weather: FileName=WeatherFiles\Kaitaia.met
        MicroClimate: a_interception=0; b_interception=1; c_interception=0; d_interception=0; SoilHeatFluxFraction=0.4; MinimumHeightDiffForNewLayer=0; NightInterceptionFraction=0.5; ReferenceHeight=2
        SoilArbitrator Soil Arbitrator
        Manager AutoIrrigationDeficitBased
          SeasonStart = 1-oct
          AllowIrrigation = True
          SeasonEnd = 1-apr
          depthPAWC = 1000
          triggerDeficit = 50
          irrigateAmount = 15
          ProportionApplied = 1
          returndays = 3
```csharp
using Newtonsoft.Json;
using APSIM.Shared.Utilities;
using System.Xml.Serialization;
using Models.Soils;
using Models.PMF;
using Models.Core;
using System;
using Models.Interfaces;

        
namespace Models
{
    [Serializable] 
    [System.Xml.Serialization.XmlInclude(typeof(Model))]
    public class Script : Model
    {
        [Link] private Clock Clock;
        [Link] private Zone patch;
        [Link] private ISummary summary;
        //[Link] private Irrigation Irrigation;
        [Link] private Soil Soil;
        [Link(IsOptional = true)] private IPlant existingCrop;
        [Link] private IPhysical soilPhysical;
        [Link] private ISoilWater waterBalance;
        [Link(Type = LinkType.Scoped, ByName = true)] private Zone Row;
        //[Link(Type = LinkType.Scoped, ByName = true)] private Zone Alley;
       
        // Parameters from user interface
        [Separator("Manager for controlling automatic irrigation")]
        [Description(" Allow this manager to control irrigation?")]
        public bool AllowIrrigation { get; set; }
      
        [Separator(" Parameters for the irrigation system")]
        [Description(" Start of irrigation season (d-mmm)")]
        public string SeasonStart { get; set; }
        [Description(" End of irrigation season (d-mmm)")]
        public string SeasonEnd { get; set; }
        [Description(" Depth to calculate PAWC and deficit (mm)")]
        public double depthPAWC { get; set; }
        [Description(" Deficit to trigger irrigations (% PAWC)")]
        public double triggerDeficit { get; set; }
        [Description(" Irrigation amount to apply each event (mm)")]
        public double irrigateAmount { get; set; }
        [Description("ProportionOfAppliedWater")]
        public double ProportionApplied { get; set; }
        [Description(" Minimum days for irrigation to return")]
        public double returndays { get; set; }
        
        //[Description("Is the Alley zone irrigated?")]
       // public bool IrrigateAlley {get; set;}

        //Class members
        [JsonIgnore] public double IrrigLayerSWDeficit { get; set; }
        [JsonIgnore] public double TopSWC { get; set; }
        [JsonIgnore] public double DaysSinceIrrigation { get; set; }
        [JsonIgnore] public double AmountToApply { get; set; }
        [JsonIgnore] public double SeasonAppliedAmount { get; set; }
        
        private bool IrrigationIsAllowed { get; set; }
        private bool SeasonIsOpen { get; set; }
        private bool CropIsActive { get; set; }
        private bool IrrigatorIsAvailable { get; set; }
        private bool SoilIsDry { get; set; }
        private double TopDUL;
        private double TopLL;
        private int nLayers;

    
        //Calculate static soil variables
        [EventSubscribe("StartOfSimulation")]
        private void OnStartOfSimulation(object sender, EventArgs e)
        {
            
            //Can we irrigate at all?
            IrrigationIsAllowed = false; 
            if (AllowIrrigation)
                IrrigationIsAllowed = true; 

            //Calculate soil water variables
            double depthFromSurface = 0.0;
            double fracLayer = 0.0;
            nLayers = soilPhysical.Thickness.Length;
            for (int layer = 0; layer < nLayers; layer++)
            {
                fracLayer = Math.Min(1.0, (depthPAWC - depthFromSurface) / soilPhysical.Thickness[layer]);
                TopLL += soilPhysical.LL15mm[layer] * fracLayer;
                TopDUL += soilPhysical.DULmm[layer] * fracLayer;
                depthFromSurface += soilPhysical.Thickness[layer];
                if (depthFromSurface >= depthPAWC)
                    layer = nLayers;
            }
        }
             
        //Determine daily requirement for irrigation
        [EventSubscribe("StartOfDay")]
        private void OnStartOfDay(object sender, EventArgs e)
        {
            AmountToApply = 0.0;
            DaysSinceIrrigation += 1;

            //Can we irrigate today?          
            SeasonIsOpen = DateUtilities.WithinDates(SeasonStart, Clock.Today, SeasonEnd);
            if (!SeasonIsOpen)
                SeasonAppliedAmount = 0;

            //Is there a crop in the ground that needs irrigation?
            CropIsActive = false;
            if (existingCrop != null)
            {
                string currentCrop = (string)patch.Get("[CropManagement].Script.CurrentCrop");
                if ( existingCrop.IsAlive)
                {
                    CropIsActive = true;
                }
            }
          
            //Is the irrigator available?
            IrrigatorIsAvailable = false;
            if (DaysSinceIrrigation >= returndays)
                IrrigatorIsAvailable = true;
          
            //Is the soil dry enough to require irrigation?
            SoilIsDry = false;
            double depthFromSurface = 0.0;
            double fracLayer = 0.0;
            TopSWC = 0.0;
            for (int layer = 0; layer < nLayers; layer++)
            //for (int layer = 0; depthFromSurface < depthPAWC + soilPhysical.Thickness[layer]; layer++)
            {
                fracLayer = Math.Min(1.0, (depthPAWC - depthFromSurface) / soilPhysical.Thickness[layer]);
                TopSWC += waterBalance.SWmm[layer] * fracLayer;
                depthFromSurface += soilPhysical.Thickness[layer];
                if (depthFromSurface >= depthPAWC)
                    layer = nLayers;
            }
            
            IrrigLayerSWDeficit = TopSWC - TopDUL;
            if (Math.Max(0.0, -IrrigLayerSWDeficit) >= (TopDUL - TopLL) * (100 - triggerDeficit) / 100)
                SoilIsDry = true;

            //Are all the conditions ratifying irrigation
            if (IrrigationIsAllowed && SeasonIsOpen && CropIsActive && IrrigatorIsAvailable && SoilIsDry)
            {
                //Lets irrigate well !!!!
                Irrigation irrigRow = (Irrigation)Row.Get("Irrigation");
                irrigRow.Apply(irrigateAmount * ProportionApplied, depth: 0);
                DaysSinceIrrigation = 0;
                //if (IrrigateAlley)
                //{
                  // Irrigation irrigAlley = (Irrigation)Alley.Get("Irrigation");
                  // irrigAlley.Apply(irrigateAmount * ProportionApplied , depth: 0);
                   //DaysSinceIrrigation = 0;
            
                //}
            }
        }
    }
}
```
        Manager AutomaticFertiliser: same as NZ Kiwifruit Expts.Experiment.Orchard_PYE.AutomaticFertiliser
        Manager ResetDate
```csharp
using Newtonsoft.Json;
using Models.PMF.Organs;
using Models.Soils.Nutrients;
using Models.Interfaces;
using System;
using Models.Core;
using System.Collections.Generic;
using System.Text;
using Models.Soils;
using Models.PMF;
using Models;
using System.Xml.Serialization;
using APSIM.Shared.Utilities;
using Models.Climate;



namespace Models
{
    [Serializable] 
    //[System.Xml.Serialization.XmlInclude(typeof(Model))]
    public class Script : Model
    {
    
     [Link] private Clock Clock;
        
    //[Separator("Manager to summarise variables")]
        //[Description(" Date to end the simulation year and reset: ")]
        //public string ResetDate { get; set; }
                  
        [JsonIgnore] public double SimulationYear { get; set; }
        [JsonIgnore] public double DAS { get; set; }
        
         [EventSubscribe("StartOfSimulation")]
        private void DoStartOfSimulation(object sender, EventArgs e)
        {
                DAS = 0;
                SimulationYear = 1983;
        }
        
        [EventSubscribe("StartOfDay")]
        private void OnStartOfDay(object sender, EventArgs e)
        {
            DAS += 1;
            //if (DateUtilities.DatesAreEqual(ResetDate, Clock.Today.Date))
            if (DateUtilities.DatesAreEqual("1-Jul", Clock.Today.Date))
            {
                SimulationYear += 1;
                DAS = 1;
                
            }
        }
    
    }
}
```
        RectangularZone Row: Length=100; Width=1; Slope=0; AspectAngle=0; Altitude=50
          Report RowZoneReport: EventNames=[Clock].DoReport
          SurfaceOrganicMatter: InitialResidueName=wheat_stubble; InitialResidueType=wheat; InitialResidueMass=500; InitialStandingFraction=0; InitialCPR=0; InitialCNR=100
          Plant STRUM
          Fertiliser
          Irrigation
          BiomassRemovalEvents Pick: NameOfPlantToRemoveFrom=STRUM; RemovalType=2
            BiomassRemovalFractions:
              PlantName  OrganName  TypeString  LiveToRemove  DeadToRemove  LiveToResidue  DeadToResidue
              STRUM      Root       Harvesting  0             0             0              0
              STRUM      Leaf       Harvesting  0             0             0              0
              STRUM      Trunk      Harvesting  0             0             0              0
              STRUM      Fruit      Harvesting  0.8           0             0.2            0
          BiomassRemovalEvents Prune: same as NZ AppleExperiments.Manawatu_1994.Manawatu_94.Row.Prune
          Soil: SoilType=Typic Orthic Allophanic Soils; LocalName=Ngakura_2a1; Latitude=-41; Longitude=174
            DataSource=Profile descriptions provided by Smap based on the work done by Trevor Webb.
            Chemical: PHUnits=Water
              Thickness  PH  CEC
              200        7   14.3185
              725        7   6.37144
              1075       7   6.99978
            Physical
              Thickness  ParticleSizeSand  ParticleSizeSilt  ParticleSizeClay  Rocks  BD     AirDry  LL15   DUL    SAT    KS
              200        69.5              22                8.5               0      0.744  0.096   0.192  0.429  0.648  1920
              362.5      56                31                13                0.376  0.589  0.157   0.183  0.417  0.551  1440
              362.5      56                31                13                0.376  0.589  0.183   0.183  0.417  0.551  1440
              358.3      51.5              32                16.5              0.107  0.802  0.264   0.264  0.46   0.579  1440
              358.3      51.5              32                16.5              0.107  0.802  0.264   0.264  0.46   0.579  1440
              358.3      51.5              32                16.5              0.107  0.802  0.264   0.264  0.46   0.579  1440
              Rocks source: Calculated
              SoilCrop BarleySoil: LL=[0.192, 0.183, 0.183, 0.264, 0.264, 0.264]; KL=[0.113, 0.059, 0.026, 0.011, 0.005, 0]; XF=[1, 1, 1, 1, 1, 1]
              SoilCrop CanolaSoil: LL=[0.192, 0.183, 0.183, 0.264, 0.264, 0.264]; KL=[0.11, 0.049, 0.017, 0.006, 0, 0]; XF=[1, 1, 1, 1, 1, 1]
              SoilCrop ChickpeaSoil: LL=[0.192, 0.183, 0.183, 0.264, 0.264, 0.264]; KL=[0.115, 0.034, 0.007, 0, 0, 0]; XF=[1, 1, 1, 1, 1, 1]
              SoilCrop ChicorySoil: LL=[0.192, 0.183, 0.183, 0.264, 0.264, 0.264]; KL=[0.085, 0.059, 0.037, 0.023, 0.014, 0.009]; XF=[1, 1, 1, 1, 1, 1]
              SoilCrop FababeanSoil: LL=[0.192, 0.183, 0.183, 0.264, 0.264, 0.264]; KL=[0.136, 0.033, 0.005, 0, 0, 0]; XF=[1, 1, 1, 1, 1, 1]
              SoilCrop FieldpeaSoil: LL=[0.192, 0.183, 0.183, 0.264, 0.264, 0.264]; KL=[0.136, 0.033, 0.005, 0, 0, 0]; XF=[1, 0.81, 0.81, 0.81, 0.81, 0.81]
              SoilCrop FodderBeetSoil: LL=[0.192, 0.183, 0.183, 0.264, 0.264, 0.264]; KL=[0.092, 0.052, 0.025, 0.012, 0.006, 0.002]; XF=[1, 1, 1, 1, 1, 1]
              SoilCrop GrapevineSoil: LL=[0.192, 0.183, 0.183, 0.264, 0.264, 0.264]; KL=[0.068, 0.05, 0.035, 0.024, 0.016, 0.011]; XF=[1, 1, 1, 1, 1, 1]
              SoilCrop ItalianRyegrassSoil: LL=[0.192, 0.183, 0.183, 0.264, 0.264, 0.264]; KL=[0.164, 0.03, 0.005, 0, 0, 0]; XF=[1, 1, 1, 1, 1, 1]
              SoilCrop KaleSoil: LL=[0.192, 0.183, 0.183, 0.264, 0.264, 0.264]; KL=[0.104, 0.054, 0.024, 0.01, 0.004, 0]; XF=[1, 1, 1, 1, 1, 1]
              SoilCrop LucerneSoil: LL=[0.192, 0.183, 0.183, 0.264, 0.264, 0.264]; KL=[0.085, 0.06, 0.038, 0.024, 0.015, 0.01]; XF=[1, 1, 1, 1, 1, 1]
              SoilCrop MaizeSoil: LL=[0.192, 0.183, 0.183, 0.264, 0.264, 0.264]; KL=[0.101, 0.057, 0.028, 0.014, 0.007, 0.002]; XF=[1, 1, 1, 1, 1, 1]
              SoilCrop OatsSoil: LL=[0.192, 0.183, 0.183, 0.264, 0.264, 0.264]; KL=[0.104, 0.054, 0.024, 0.01, 0.004, 0]; XF=[1, 1, 1, 1, 1, 1]
              SoilCrop PlantainForageSoil: LL=[0.192, 0.183, 0.183, 0.264, 0.264, 0.264]; KL=[0.104, 0.054, 0.024, 0.01, 0.004, 0]; XF=[1, 1, 1, 1, 1, 1]
              SoilCrop PotatoSoil: LL=[0.192, 0.183, 0.183, 0.264, 0.264, 0.264]; KL=[0.108, 0.023, 0.004, 0, 0, 0]; XF=[1, 0.81, 0.81, 0.81, 0.81, 0.81]
              SoilCrop RedCloverSoil: LL=[0.192, 0.183, 0.183, 0.264, 0.264, 0.264]; KL=[0.089, 0.055, 0.03, 0.017, 0.009, 0.005]; XF=[1, 1, 1, 1, 1, 1]
              SoilCrop AGPRyegrassSoil: LL=[0.192, 0.183, 0.183, 0.264, 0.264, 0.264]; KL=[0.11, 0.036, 0.008, 0, 0, 0]; XF=[1, 1, 1, 1, 1, 1]
              SoilCrop SoybeanSoil: LL=[0.192, 0.183, 0.183, 0.264, 0.264, 0.264]; KL=[0.105, 0.041, 0.012, 0.003, 0, 0]; XF=[1, 1, 1, 1, 1, 1]
              SoilCrop TriticaleSoil: LL=[0.192, 0.183, 0.183, 0.264, 0.264, 0.264]; KL=[0.104, 0.054, 0.024, 0.01, 0.004, 0]; XF=[1, 1, 1, 1, 1, 1]
              SoilCrop WheatSoil: LL=[0.192, 0.183, 0.183, 0.264, 0.264, 0.264]; KL=[0.112, 0.061, 0.028, 0.013, 0.006, 0]; XF=[1, 1, 1, 1, 1, 1]
              SoilCrop WhitecloverSoil: LL=[0.192, 0.183, 0.183, 0.264, 0.264, 0.264]; KL=[0.115, 0.018, 0.003, 0, 0, 0]; XF=[1, 0.826, 0.826, 0.826, 0.826, 0.826]
              SoilCrop AgPRyegrassSoil: LL=[0.192, 0.183, 0.183, 0.264, 0.264, 0.264]; KL=[0.101, 0.033, 0.008, 0, 0, 0]; XF=[1, 1, 1, 1, 1, 1]
              SoilCrop AgPWhiteCloverSoil: LL=[0.192, 0.183, 0.183, 0.264, 0.264, 0.264]; KL=[0.127, 0.011, 0, 0, 0, 0]; XF=[1, 1, 1, 0, 0, 0]
              SoilCrop AgPPaspalumSoil: LL=[0.192, 0.183, 0.183, 0.264, 0.264, 0.264]; KL=[0.087, 0.039, 0.014, 0.005, 0, 0]; XF=[1, 1, 1, 1, 1, 1]
              SoilCrop DEROPAPYSoil: LL=[0.192, 0.183, 0.183, 0.264, 0.264, 0.264]; KL=[0.077, 0.077, 0.077, 0.077, 0.077, 0.077]; XF=[1, 1, 1, 1, 1, 1]
              SoilCrop SCRUMSoil: LL=[0.192, 0.183, 0.183, 0.264, 0.264, 0.264]; KL=[0.077, 0.077, 0.077, 0.077, 0.077, 0.077]; XF=[1, 1, 1, 1, 1, 1]
              SoilCrop STRUMSoil: LL=[0.192, 0.183, 0.183, 0.264, 0.264, 0.264]; KL=[0.113, 0.059, 0.026, 0.011, 0.005, 0]; XF=[1, 1, 1, 1, 1, 1]
              SoilCrop SPRUMSoil: LL=[0.192, 0.183, 0.183, 0.264, 0.264, 0.264]; KL=[0.113, 0.059, 0.026, 0.011, 0.005, 0]; XF=[1, 1, 1, 1, 1, 1]
            Water: Thickness=[200, 362.5, 362.5, 358.3, 358.3, 358.3]; InitialValues=[0.429, 0.417, 0.417, 0.46, 0.46, 0.46]; InitialPAWmm=427.73; RelativeTo=LL15; FilledFromTop=false
            WaterBalance SoilWater: SummerDate=1-oct; SummerU=9; SummerCona=4.4; WinterDate=1-apr; WinterU=4; WinterCona=2; DiffusConst=88; DiffusSlope=35; Salb=0.13; CN2Bare=77; CNRed=37; CNCov=0.8; DischargeWidth=0; CatchmentArea=0; PSIDul=-100
              Thickness  SWCON  KLAT
              200        0.4    0
              725        0.4    0
              1075       0.4    0
            Organic: FOMCNRatio=40; CarbonUnits=Total
              Thickness  Carbon    SoilCNRatio  FBiom      FInert    FOM
              50         10        11.1         0.0788566  0.575     124.07
              50         10        11.1         0.0610103  0.575     115.105
              50         10        11.1         0.0477893  0.613573  106.788
              50         8.22356   11.1         0.037995   0.662199  99.0722
              50         5.57835   11.1         0.0307392  0.709226  91.9135
              50         3.80522   11.1         0.025364   0.749972  85.2722
              50         2.61665   11.1         0.0213819  0.785433  79.1107
              50         1.81993   11.1         0.0184319  0.816456  73.3945
              50         1.28587   11.1         0.0162465  0.843742  68.0912
              50         0.927881  11.1         0.0146275  0.867834  63.1712
              250        0.419234  11.1         0.0118814  0.923972  43.4169
              250        0.22967   11.1         0.0104198  0.978156  29.84
              500        0.201477  11.1         0.0100442  0.990841  14.0954
              500        0.200027  11.1         0.0100022  0.996255  6.6582
            Solute NO3: Thickness=[200, 725, 1075]; InitialValues=[8.513, 1.569, 0.073]; InitialValuesUnits=ppm; WaterTableConcentration=0; D0=0; DepthConstant=0; MaxDepthSoluteAccessible=0; RunoffEffectivenessAtMovingSolute=0; MaxEffectiveRunoff=0
            Solute NH4: Thickness=[200, 725, 1075]; InitialValues=[1.27688, 0.235384, 0.0110195]; InitialValuesUnits=ppm; WaterTableConcentration=0; D0=0; DepthConstant=0; MaxDepthSoluteAccessible=0; RunoffEffectivenessAtMovingSolute=0; MaxEffectiveRunoff=0
            Solute Urea: Thickness=[200, 725, 1075]; InitialValues=[0, 0, 0]; InitialValuesUnits=kg/ha; WaterTableConcentration=0; D0=0; DepthConstant=0; MaxDepthSoluteAccessible=0; RunoffEffectivenessAtMovingSolute=0; MaxEffectiveRunoff=0
            Nutrient
            LayerStructure: Thickness=[200, 362.5, 362.5, 358.3, 358.3, 358.3]
            OutputLayers: Thickness=[600, 600, 800, 400]
            SoilTemperature Temperature
          Manager AutomaticFertiliser
            Fertilise = True
            Season_Start = 1-Aug
            Season_End = 30-Apr
            Season_Allocation = 100000
            TriggerN = 50
            NApplicationAmount = 25
            Return_days = 3
            Top_Depth = 600
            script: same as in NZ Kiwifruit Expts.Experiment.Orchard_BAY.Row.AutomaticFertiliser
          Manager MulchResidues
            script: same as in NZ Kiwifruit Expts.Experiment.Orchard_BAY.Row.MulchResidues
          StrumTreeInstance KiwiFruit: TreeType=Deciduous; RowSpacing=4; InterRowSpacing=4; AlleyZoneWidthFrac=0.75; AgeAtSimulationStart=6; YearsToMaxDimension=6; TrunkMassAtMaxDimension=12; WoodDensity=500; BudBreakDAWS=90; StartFullCanopyDAWS=125; StartLeafFallDAWS=331; EndLeafFallDAWS=365; GRINZ=true; MaxRD=3000; Proot=0.4; Pleaf=0.4; Ptrunk=0.2; CanopyBaseHeight=1850; MaxPrunedHeight=2050; MaxHeight=4000; MaxPrunedWidth=4000; MaxWidth=4000; RootNConc=0.01; LeafNConc=0.02; TrunkNConc=0.01; FruitNConc=0.02; ExtinctCoeff=0.8; BaseCover=0; MaxCover=0.96; RUE=0.9; GSMax=0.009; R50=200; WaterStress=true; Number=960; PotentialFWPerFruit=100; DMC=0.17; FruitDensity=1.02; DateMaxBloom=1-oct; DAFStartLinearGrowth=90; DAFEndLinearGrowth=200; DAFMaxSize=240; TotalSolarRadiation=0
        ZoneAgregate
        Report ZoneAgregateReport: EventNames=[Clock].DoReport
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